Mon Aug 31 18:37:27 CEST 2015
$PROBLEM    Poisson Estimation 1
$INPUT      STUD ID MDV DV TIME DAYS TFLA SEX AGE DURP DURD FLAG PCM
            DRUG DOSE FOLL STRT STR PDV DIF TRA MEAN VAR RATI
$DATA      /home/USER/andth549/Adopt-A-Model/Data/nm01_all_pcm_short.csv
            IGNORE=@
$PRED

;-----------------------------------------------
 ;Covariates
 IF(NEWIND.NE.2) NFLG=0
 NFLG=NFLG+1

   ;IF(NEWIND.NE.2) PSDV=0
   ;PDV=PSDV
   ;PSDV =  DV
;-----------------------------------------------
 ;Placebo parameters
 TVBAS= THETA(1)/10
 PHI  = LOG(TVBAS/(1-TVBAS))+ETA(1)
 BAS  = 10*EXP(PHI)/(1+EXP(PHI))

 PEF  = EXP(LOG(THETA(2)/(1- THETA(2)))+ETA(2))/(1+EXP(LOG(THETA(2)/(1- THETA(2)))+ETA(2)))

 PHA  = THETA(3)*EXP(ETA(3))

 PLC = (1- PEF*(1-EXP(-(LOG(2)/PHA*DAYS))))

 COV = 0
 IF(PCM.EQ.1) COV = THETA(12)
;-----------------------------------------------
 ;Model for lambda
 TVLAM = BAS*PLC/10
 PHL = LOG(TVLAM/(1-TVLAM)) +COV
 LAM  = 10*EXP(PHL)/(1+EXP(PHL))

;-----------------------------------------------
 ;Markov elements
 TE = THETA(11)*EXP(ETA(9))
 TEF = TE*DAYS

 PIN00=EXP(LOG(THETA(4)/(1-THETA(4)))+ETA(4)+TEF)/(1+EXP(LOG(THETA(4)/(1-THETA(4)))+ETA(4)+TEF))
 PIN09=EXP(LOG(THETA(5)/(1-THETA(5)))+ETA(4)+TEF)/(1+EXP(LOG(THETA(5)/(1-THETA(5)))+ETA(4)+TEF))
 IF(PDV.EQ.0) PIN0 = PIN00
 IF(PDV.EQ.1) PIN0 = (8*PIN00+1*PIN09)/9
 IF(PDV.EQ.2) PIN0 = (7*PIN00+2*PIN09)/9
 IF(PDV.EQ.3) PIN0 = (6*PIN00+3*PIN09)/9
 IF(PDV.EQ.4) PIN0 = (5*PIN00+4*PIN09)/9
 IF(PDV.EQ.5) PIN0 = (4*PIN00+5*PIN09)/9
 IF(PDV.EQ.6) PIN0 = (3*PIN00+6*PIN09)/9
 IF(PDV.EQ.7) PIN0 = (2*PIN00+7*PIN09)/9
 IF(PDV.EQ.8) PIN0 = (1*PIN00+8*PIN09)/9
 IF(PDV.EQ.9) PIN0 =  PIN09
 IF(PDV.EQ.10)PIN0 = EXP(LOG(THETA(6)/(1-THETA(6)))+ETA(4)+TEF)/(1+EXP(LOG(THETA(6)/(1-THETA(6)))+ETA(4)+TEF))
 IF(NEWIND.NE.2) PIN0=0
;-----------------------------------------------
 PIN1= .5*EXP(LOG(THETA(7)/(1-THETA(7)))+ETA(5))/(1+EXP(LOG(THETA(7)/(1-THETA(7)))+ETA(5)))
 PIN1=PIN1*(1-PIN0)
 IF(NEWIND.NE.2) PIN1=0
                           PIN1D=PIN1*2
 IF(PDV.EQ.0.OR.PDV.EQ.10) PIN1D=PIN1
;-----------------------------------------------
 PIN2= .5*EXP(LOG(THETA(8)/(1-THETA(8)))+ETA(6))/(1+EXP(LOG(THETA(8)/(1-THETA(8)))+ETA(6)))
 PIN2=PIN2*(1-PIN0-PIN1D)
 IF(NEWIND.NE.2) PIN2=0
                          PIN2D=PIN2*2
 IF(PDV.LE.1.OR.PDV.GE.9) PIN2D=PIN2
;-----------------------------------------------
 PIN3= .5*EXP(LOG(THETA(9)/(1-THETA(9)))+ETA(7))/(1+EXP(LOG(THETA(9)/(1-THETA(9)))+ETA(7)))
 PIN3=PIN3*(1-PIN0-PIN1D-PIN2D)
 IF(NEWIND.NE.2) PIN3=0
                          PIN3D=PIN3*2
 IF(PDV.LE.2.OR.PDV.GE.8) PIN3D=PIN3

;-----------------------------------------------
 ;Total probabilities
 PTOT=PIN0+PIN1D+PIN2D+PIN3D

;-----------------------------------------------
 PH =  LOG(THETA(10)/(1- THETA(10)))+ETA(8)
 TH =  EXP(PH)/(1+EXP(PH))
 DIS = -TH*LAM /(10-LAM)

;-----------------------------------------------
 ;Truncated Poisson distribution
 SUM0=1/(LAM*(1-DIS))         *EXP(-(LAM*(1-DIS)))
 SUM1=                         EXP(-(LAM*(1-DIS)+DIS))
 SUM2=  (LAM*(1-DIS)+2*DIS)   *EXP(-(LAM*(1-DIS)+ 2*DIS))/2
 SUM3=  (LAM*(1-DIS)+3*DIS)**2*EXP(-(LAM*(1-DIS)+ 3*DIS))/6
 SUM4=  (LAM*(1-DIS)+4*DIS)**3*EXP(-(LAM*(1-DIS)+ 4*DIS))/24
 SUM5=  (LAM*(1-DIS)+5*DIS)**4*EXP(-(LAM*(1-DIS)+ 5*DIS))/120
 SUM6=  (LAM*(1-DIS)+6*DIS)**5*EXP(-(LAM*(1-DIS)+ 6*DIS))/720
 SUM7=  (LAM*(1-DIS)+7*DIS)**6*EXP(-(LAM*(1-DIS)+ 7*DIS))/5040
 SUM8=  (LAM*(1-DIS)+8*DIS)**7*EXP(-(LAM*(1-DIS)+ 8*DIS))/40320
 SUM9=  (LAM*(1-DIS)+9*DIS)**8*EXP(-(LAM*(1-DIS)+ 9*DIS))/362880
 SUM10= (LAM*(1-DIS)+10*DIS)**9*EXP(-(LAM*(1-DIS)+ 10*DIS))/3628800
 SUM =  (LAM*(1-DIS))*(SUM0+SUM1+SUM2+SUM3+SUM4+SUM5+SUM6+SUM7+SUM8+SUM9+SUM10)

 ;-----------------------------------------------
 ;Y
 IF(DV.LE.1) THEN
 LFAC=0
 ELSE
 LFAC = DV*LOG(DV)-DV +LOG(DV*(1+4*DV*(1+2*DV)))/6 +LOG(3.1415)/2
 ENDIF

 GP=EXP(LOG(LAM)+(DV-1)*LOG(LAM*(1-DIS)+DIS*DV)+LOG(1-DIS)-(LAM*(1-DIS)+DIS*DV)- LFAC)

 ;DIF = DV-PDV
 ;IF(NEWIND.NE.2) DIF = 0

                           YY =      (1-PTOT)*(GP/SUM)
 IF(DIF.EQ.0)              YY = PIN0+(1-PTOT)*(GP/SUM)
 IF(DIF.EQ.1.OR.DIF.EQ.-1) YY = PIN1+(1-PTOT)*(GP/SUM)
 IF(DIF.EQ.2.OR.DIF.EQ.-2) YY = PIN2+(1-PTOT)*(GP/SUM)
 IF(DIF.EQ.3.OR.DIF.EQ.-3) YY = PIN3+(1-PTOT)*(GP/SUM)
 IF(NEWIND.NE.2)           YY =      (1-PTOT)*(GP/SUM)

  Y= -2*LOG(YY)

   ;TRA = PDV*100+DV

;-----------------------------------------------
 ;Simulation
 IF (ICALL.EQ.4) THEN
    PRN=0
    N=0
       CALL RANDOM (2,R)
       DO WHILE (R.GT.PRN)

 IF(N.LE.1) THEN
 LFAC=0
 ELSE
 LFAC = N*LOG(N)-N +LOG(N*(1+4*N*(1+2*N)))/6 +LOG(3.1415)/2
 ENDIF

 GP=EXP(LOG(LAM)+(N-1)*LOG(LAM*(1-DIS)+DIS*N)+LOG(1-DIS)-(LAM*(1-DIS)+DIS*N)- LFAC)

 DIF = N-PDV
 IF(NEWIND.NE.2) DIF = 0

                           YY =      (1-PTOT)*(GP/SUM)
 IF(DIF.EQ.0)              YY = PIN0+(1-PTOT)*(GP/SUM)
 IF(DIF.EQ.1.OR.DIF.EQ.-1) YY = PIN1+(1-PTOT)*(GP/SUM)
 IF(DIF.EQ.2.OR.DIF.EQ.-2) YY = PIN2+(1-PTOT)*(GP/SUM)
 IF(DIF.EQ.3.OR.DIF.EQ.-3) YY = PIN3+(1-PTOT)*(GP/SUM)
 IF(NEWIND.NE.2)           YY =      (1-PTOT)*(GP/SUM)

       PRN=YY+PRN
       IF (R.GT.PRN) N=N+1
       END DO
 DV=N
 PSDV=DV

 ENDIF

 IF (ICALL.EQ.4) THEN
 TRA=PDV*100+DV
 ENDIF
;-----------------------------------------------

    IF (ICALL.EQ.4) THEN
;mean of observed counts
 IF(NEWIND.NE.2) MEA=0
 MEA=MEA+DV
 IF(NEWIND.NE.2) MEAN=0
 MEAN=MEA/NFLG
;variance of observed counts
 IF(NEWIND.NE.2) MES=0
   MES=MES+DV**2
IF(NEWIND.NE.2) MEAS=0
   MEAS=MES/NFLG
IF(NEWIND.NE.2) VAR=0
   VAR=MEAS-MEAN**2
RATI=VAR/MEAN
IF(MEAN.EQ.0) RATI=1
    ENDIF

; IPRED=0
; IWRES=0
; IRES=0

$THETA  (0,6.14,10) ; 1. BASELINE
$THETA  (0,0.220,1) ; 2. PLACEBO EFFECT
$THETA  (0,36.0) ; 3. PLACEBO HALF TIME
$THETA  (0,0.729,1) ; 4. PROBABILITY OF INFLATION 0
$THETA  (0,0.134,1) ; 5. PROBABILITY OF INFLATION 0
$THETA  (0,0.527,1) ; 6. PROBABILITY OF INFLATION 0
$THETA  (0,0.282,1) ; 7. PROBABILITY OF INFLATION 1
$THETA  (0,0.00708,1) ; 8. PROBABILITY OF INFLATION 2
$THETA  (0,0.000415,1) ; 9. PROBABILITY OF INFLATION 3
$THETA  (0,0.994,1) ; 10. DIS
$THETA  (0,0.00604) ; 11. TE0
$THETA  (0,.392) ; 12. COV
$OMEGA  0.537
$OMEGA  4.02
$OMEGA  .522
$OMEGA  BLOCK(3)
 3.42
 2.13 3.80
 -.392 3.59 6.03
$OMEGA  0  FIX
$OMEGA  25.3
$OMEGA  1.25
$ESTIMATION METHOD=1 LAPLACE -2LL MAXEVAL=9999 PRINT=1 MSFO=msf001
$COVARIANCE PRINT=E UNCONDITIONAL
;$SIM (12345) (678910 UNI) ONLYSIM NOPRED

NM-TRAN MESSAGES
 WARNINGS AND ERRORS (IF ANY) FOR PROBLEM    1
 (WARNING  2) NM-TRAN INFERS THAT THE DATA ARE POPULATION.
 (WARNING  3) THERE MAY BE AN ERROR IN THE ABBREVIATED CODE. THE FOLLOWING
 ONE OR MORE RANDOM VARIABLES ARE DEFINED WITH "IF" STATEMENTS THAT DO NOT
 PROVIDE DEFINITIONS FOR BOTH THE "THEN" AND "ELSE" CASES. IF ALL
 CONDITIONS FAIL, THE VALUES OF THESE VARIABLES WILL BE ZERO.
   PIN0
 (WARNING  27) THE ABBREVIATED CODE CONTAINS A SIMULATION BLOCK BUT THERE IS
 NO $SIMULATION RECORD.

1NONLINEAR MIXED EFFECTS MODEL PROGRAM (NONMEM) VERSION 7.3.0
 ORIGINALLY DEVELOPED BY STUART BEAL, LEWIS SHEINER, AND ALISON BOECKMANN
 CURRENT DEVELOPERS ARE ROBERT BAUER, ICON DEVELOPMENT SOLUTIONS,
 AND ALISON BOECKMANN. IMPLEMENTATION, EFFICIENCY, AND STANDARDIZATION
 PERFORMED BY NOUS INFOSYSTEMS.
 PROBLEM NO.:         1
 Poisson Estimation 1
 TOT. NO. OF OBS RECS:    22492
 TOT. NO. OF INDIVIDUALS:    231
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 #TBLN:      1
 #METH: Laplacian Conditional Estimation
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
 #TERM:
0MINIMIZATION TERMINATED
 DUE TO ROUNDING ERRORS (ERROR=134)
 NO. OF FUNCTION EVALUATIONS USED:      706
 NO. OF SIG. DIGITS UNREPORTABLE

 ETABAR IS THE ARITHMETIC MEAN OF THE ETA-ESTIMATES,
 AND THE P-VALUE IS GIVEN FOR THE NULL HYPOTHESIS THAT THE TRUE MEAN IS 0.

 ETABAR:         3.5434E-02  2.2446E-01 -5.3964E-02 -5.3413E-02 -1.9427E-01 -1.4892E-01  0.0000E+00 -9.5380E-01  3.0886E-01
 SE:             4.4642E-02  1.0141E-01  1.9480E-02  8.9814E-02  9.3087E-02  6.9483E-02  0.0000E+00  1.6698E-01  5.1220E-02
 N:                     231         231         231         231         231         231         231         231         231

 P VAL.:         4.2735E-01  2.6863E-02  5.6010E-03  5.5204E-01  3.6895E-02  3.2088E-02  1.0000E+00  1.1192E-08  1.6441E-09

 ETAshrink(%):   9.8546E+00  2.0509E+01  5.0055E+01  1.6702E+01  2.4908E+01  2.3717E+01  1.0000E+02  4.8500E+01  3.2584E+01
 EBVshrink(%):   5.7368E+00  1.5589E+01  6.1647E+01  1.0068E+01  1.3624E+01  3.4227E+01  0.0000E+00  7.5734E+01  1.0000E+02
 EPSshrink(%):   1.0000E+02

 #TERE:
 Elapsed estimation time in seconds:  5659.06
0R MATRIX ALGORITHMICALLY SINGULAR
 AND ALGORITHMICALLY NON-POSITIVE-SEMIDEFINITE
0R MATRIX IS OUTPUT
0S MATRIX UNOBTAINABLE
0COVARIANCE STEP ABORTED
 Elapsed covariance time in seconds:  4495.99

 ********************                         LAPLACIAN CONDITIONAL ESTIMATION                       ********************
 #OBJT:**************                       MINIMUM VALUE OF OBJECTIVE FUNCTION                      ********************
 #OBJV:********************************************    49403.311       **************************************************

 ********************                         LAPLACIAN CONDITIONAL ESTIMATION                       ********************
 ********************                             FINAL PARAMETER ESTIMATE                           ********************

 THETA - VECTOR OF FIXED EFFECTS PARAMETERS   *********
         TH 1      TH 2      TH 3      TH 4      TH 5      TH 6      TH 7      TH 8      TH 9      TH10      TH11      TH12
         6.21E+00  1.90E-01  2.77E+01  5.55E-01  1.20E-01  4.44E-01  3.59E-01  4.73E-03  4.03E-04  9.93E-01  6.44E-03  3.64E-01

 OMEGA - COV MATRIX FOR RANDOM EFFECTS - ETAS  ********
            ETA1      ETA2      ETA3      ETA4      ETA5      ETA6      ETA7      ETA8      ETA9
 ETA1
+        5.69E-01
 ETA2
+        0.00E+00  3.78E+00
 ETA3
+        0.00E+00  0.00E+00  3.53E-01
 ETA4
+        0.00E+00  0.00E+00  0.00E+00  2.70E+00
 ETA5
+        0.00E+00  0.00E+00  0.00E+00  2.45E+00  3.57E+00
 ETA6
+        0.00E+00  0.00E+00  0.00E+00 -7.55E-01  8.06E-01  1.92E+00
 ETA7
+        0.00E+00  0.00E+00  0.00E+00  0.00E+00  0.00E+00  0.00E+00  0.00E+00
 ETA8
+        0.00E+00  0.00E+00  0.00E+00  0.00E+00  0.00E+00  0.00E+00  0.00E+00  2.44E+01
 ETA9
+        0.00E+00  0.00E+00  0.00E+00  0.00E+00  0.00E+00  0.00E+00  0.00E+00  0.00E+00  1.34E+00

 OMEGA - CORR MATRIX FOR RANDOM EFFECTS - ETAS  *******
            ETA1      ETA2      ETA3      ETA4      ETA5      ETA6      ETA7      ETA8      ETA9
 ETA1
+        7.54E-01
 ETA2
+        0.00E+00  1.94E+00
 ETA3
+        0.00E+00  0.00E+00  5.94E-01
 ETA4
+        0.00E+00  0.00E+00  0.00E+00  1.64E+00
 ETA5
+        0.00E+00  0.00E+00  0.00E+00  7.91E-01  1.89E+00
 ETA6
+        0.00E+00  0.00E+00  0.00E+00 -3.32E-01  3.08E-01  1.39E+00
 ETA7
+        0.00E+00  0.00E+00  0.00E+00  0.00E+00  0.00E+00  0.00E+00  0.00E+00
 ETA8
+        0.00E+00  0.00E+00  0.00E+00  0.00E+00  0.00E+00  0.00E+00  0.00E+00  4.94E+00
 ETA9
+        0.00E+00  0.00E+00  0.00E+00  0.00E+00  0.00E+00  0.00E+00  0.00E+00  0.00E+00  1.16E+00
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 #CPUT: Total CPU Time in Seconds,    10125.155
