31.05.2016
12:09
; Script generated by the pharmML2Nmtran Converter v.0.3.0
; Source	: PharmML 0.6.1
; Target	: NMTRAN 7.3.0
; Model 	: Executable_sibrotuzumab
; Dated 	: Tue May 31 12:09:01 CEST 2016
$PROBLEM    "generated by MDL2PharmML v.6.0"
$INPUT      ID TIME=TIME WT AMT RATE DV MDV
$DATA      Simulated_sibrotuzumab.csv IGNORE=@
$SUBROUTINE ADVAN13 TOL=9
$MODEL      COMP (COMP1) ;AC
            COMP (COMP2) ;AP
$PK
POP_CLL = THETA(1)
POP_V1 = THETA(2)
POP_V2 = THETA(3)
POP_Q = THETA(4)
POP_VMAX = THETA(5)
POP_KM = THETA(6)
BETA_CLL_WT = THETA(7)
BETA_V1_WT = THETA(8)
BETA_V2_WT = THETA(9)
BETA_VMAX_WT = THETA(10)
RUV_PROP = THETA(11)
RUV_ADD = THETA(12)

ETA_CLL =  ETA(1)
ETA_V1 =  ETA(2)
ETA_V2 =  ETA(3)
ETA_VMAX =  ETA(4)

CLL_WT = (POP_CLL*(1+(BETA_CLL_WT*(WT-75))))
V1_WT = (POP_V1*(1+(BETA_V1_WT*(WT-75))))
V2_WT = (POP_V2*(1+(BETA_V2_WT*(WT-75))))
VMAX_WT = (POP_VMAX*(1+(BETA_VMAX_WT*(WT-75))))

CLL = (CLL_WT*EXP(ETA_CLL))

V1 = (V1_WT*EXP(ETA_V1))

V2 = (V2_WT*EXP(ETA_V2))

VMAX = (VMAX_WT*EXP(ETA_VMAX))

KM = POP_KM

Q = POP_Q

A_0(1) = 0
A_0(2) = 0

$DES
AC_DES = A(1)
AP_DES = A(2)
CC_DES = (AC_DES/V1)
CP_DES = (AP_DES/V2)
DADT(1) = (((Q*(CP_DES-CC_DES))-(CLL*CC_DES))-((VMAX*CC_DES)/(KM+CC_DES)))
DADT(2) = (Q*(CC_DES-CP_DES))

$ERROR
AC = A(1)
AP = A(2)
CC = (AC/V1)
CP = (AP/V2)
IPRED = CC
W = RUV_ADD+RUV_PROP*IPRED
Y = IPRED+W*EPS(1)
IRES = DV - IPRED
IWRES = IRES/W

$THETA  (0.001,0.0221) ; POP_CLL
 (0.001,4.13) ; POP_V1
 (0.001,3.19) ; POP_V2
 (0.001,0.0376) ; POP_Q
 (0.001,0.0338) ; POP_VMAX
 (0.001,8.0) ; POP_KM
 0.0182 ; BETA_CLL_WT
 0.0125 ; BETA_V1_WT
 0.0105 ; BETA_V2_WT
 0.00934 ; BETA_VMAX_WT
 (0.001,0.0491) ; RUV_PROP
 (0.001,0.093) ; RUV_ADD
$OMEGA  0.57  STANDARD  ;    PPV_CLL
 0.2  STANDARD  ;     PPV_V1
 0.2  STANDARD  ;     PPV_V2
 0.29  FIX  STANDARD  ;   PPV_VMAX
$SIGMA  1.0  FIX
$SIMULATION (706122692) ONLYSIMULATION NSUBPROBLEMS=20
$TABLE      ID MDV TIME DV ONEHEADER NOPRINT NOAPPEND FILE=npctab.dta

NM-TRAN MESSAGES
 WARNINGS AND ERRORS (IF ANY) FOR PROBLEM    1
 (WARNING  2) NM-TRAN INFERS THAT THE DATA ARE POPULATION.

1NONLINEAR MIXED EFFECTS MODEL PROGRAM (NONMEM) VERSION 7.3.0
 ORIGINALLY DEVELOPED BY STUART BEAL, LEWIS SHEINER, AND ALISON BOECKMANN
 CURRENT DEVELOPERS ARE ROBERT BAUER, ICON DEVELOPMENT SOLUTIONS,
 AND ALISON BOECKMANN. IMPLEMENTATION, EFFICIENCY, AND STANDARDIZATION
 PERFORMED BY NOUS INFOSYSTEMS.
 PROBLEM NO.:         1
 "generated by MDL2PharmML v.6.0"
 TOT. NO. OF OBS RECS:      160
 TOT. NO. OF INDIVIDUALS:     20
 GENERAL NONLINEAR KINETICS MODEL USING LSODA (ADVAN13)
 PROBLEM NO.:         1     SUBPROBLEM NO.:      1
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 SIMULATION STEP PERFORMED
 PROBLEM NO.:         1     SUBPROBLEM NO.:      2
 SIMULATION STEP PERFORMED
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 #CPUT: Total CPU Time in Seconds,        0.484
