Thu Aug 23 13:40:28 CEST 2012
$SIZES      NO=800 LIM6=800
$PROBLEM    Tumor model sKIT,VEGFR3
$INPUT      STUD=DROP IDX=DROP ID CYCL=DROP TIME DAYS=DROP TWEK FLAG
            AMT=DROP DV DVX=DROP DVXX=DROP DOS1=DROP DOS PLA CL
            V2=DROP Q=DROP V3=DROP KA=DROP TTP=DROP TTPC=DROP TTD=DROP
            TTDC=DROP EVI=DROP EVID MDV=DROP ROW=DROP VBAS=DROP
            VMRT=DROP VEC=DROP VSLO=DROP BAS2=DROP MRT2=DROP EC52=DROP
            BAS3 MRT3 EC53 SBAS SMRT SEC5 SLO BAS
$DATA       GIST_BIOMARKER_090505.csv IGN=# ACCEPT=(FLAG.EQ.1)
            ACCEPT=(FLAG.EQ.4)
$SUBROUTINE ADVAN6 TOL=5
$MODEL      NCOMP=4
$PK

"FIRST
" COMMON /PRCOMG/ IDUM1,IDUM2,IMAX,IDUM4,IDUM5
" INTEGER IDUM1,IDUM2,IMAX,IDUM4,IDUM5
" IMAX=100000000

AUC=DOS/CL

;-----sKIT--------------------------
  BASE    =         SBAS
  MRT     =         SMRT
  EMAX    =         1
  EC50    =         SEC5
  SLOPE   =         SLO
  KOUT    =         1/MRT

 ;-----VEGFR3---------------
  BASE3   =         BAS3
  EC503   =         EC53
  KOUT3   =         1/MRT3

 IF(TIME.EQ.0)THEN
   OBASE = BAS                             ; observed baseline response at time 0
 ENDIF

  W1     = THETA(4)*OBASE
  IBASE  = OBASE+ETA(5)*W1                ; observed baseline response + uncertanity

TVKL =      THETA(1)/24/7
KL   =      TVKL*EXP(ETA(1))
TVKDS =     THETA(2)/24/7                 ; KSKIT
KDS   =     TVKDS*EXP(ETA(2))
TVLAM  =    THETA(3)/24/7
LAM  =      TVLAM*EXP(ETA(3))

TVDRU =     THETA(5)/24/7
DRUG =      TVDRU*EXP(ETA(4))

TVKD3 =     THETA(6)/24/7                 ; KVEGFR3
KD3   =     TVKD3;*EXP(ETA(2))

A_0(1)=BASE
A_0(2)=BASE
A_0(3)=BASE3
A_0(4)=IBASE                              ; TUMOR

AUC=DOS/CL

$DES

;-------------------sKIT-----------------------
  EFF      =       EMAX*AUC/(EC50+AUC)
  PLAC     =       BASE*(1+SLOPE*T)
  KIN      =       PLAC*KOUT

;-------------------VEGFR3-----------------------
  EFF3     =       EMAX*AUC/(EC503+AUC)                                                    ;concentration mmol/L
  KIN3     =       BASE3*KOUT3

DADT(1)  =      KIN*(1-EFF)-KOUT*A(1)     ;SKIT
DADT(2)  =      KIN-KOUT*A(2)
DADT(3)  =      KIN3*(1-EFF3)-KOUT3*A(3)     ;VEGFR3

;-------------------TUMOR-----------------------------------------
SKIT=((A(1)-A(2))/A(2))*KDS
VEG3=((A(3)-BASE3)/BASE3)*KD3

AUC1= AUC*DRUG

DADT(4)  =      KL*A(4)-(AUC1+(-SKIT)+(-VEG3))*EXP(-(LAM*T))*A(4)

$ERROR

AA1 =A(1)
AA2 =A(2)
AA3 =A(3)
TUM=A(4)

STRT=0
IF(PLA.EQ.1)STRT=1

  IF(FLAG.EQ.4) THEN                                 ; VEGF
  IPRED  =  A(4)
  W      =  IPRED*THETA(4)

  Y      =  IPRED+W*EPS(1)
  IRES   =  DV -  IPRED
  IWRES  =  IRES/W
  ENDIF

$THETA  (0,0.0118) ; KL
$THETA  (0,0.00282) ; KD SKIT
$THETA  (0,0.0217) ; LAM
$THETA  (0,0.125) ; RES
$THETA  (0,0.00503) ; DRUG
$THETA  (0,0.0371) ; KD VEGFR3
$OMEGA  0.29  ;          1
$OMEGA  5.91  ;          2
$OMEGA  0  FIX  ;          3
$OMEGA  1.42  ;          4
$OMEGA  1  FIX  ;          5
$SIGMA  1  FIX
$ESTIMATION PRINT=1 MAXEVAL=9999 METHOD=1 INTER POSTHOC MSFO=MSF7471
$TABLE      ID TIME IPRED IBASE IWRES IRES AUC LAM KL KDS AA1 AA2 AA3
            TUM ETA1 ETA2 NOPRINT ONEHEADER FILE=sdtab7471

NM-TRAN MESSAGES
 WARNINGS AND ERRORS (IF ANY) FOR PROBLEM    1
 (WARNING  2) NM-TRAN INFERS THAT THE DATA ARE POPULATION.
 (WARNING  3) THERE MAY BE AN ERROR IN THE ABBREVIATED CODE. THE FOLLOWING
 ONE OR MORE RANDOM VARIABLES ARE DEFINED WITH "IF" STATEMENTS THAT DO NOT
 PROVIDE DEFINITIONS FOR BOTH THE "THEN" AND "ELSE" CASES. IF ALL
 CONDITIONS FAIL, THE VALUES OF THESE VARIABLES WILL BE ZERO.
   IPRED W IRES IWRES Y
 (WARNING  113) VERBATIM CODE CONTAINS "COMMON". IF THIS IS NOT A
 USER-DEFINED COMMON, IT SHOULD BE REPLACED BY THE APPROPRIATE MODULE.
 (DATA WARNING  5) RECORD         1, DATA ITEM  5, CONTENTS: 67
 THE DV DATA ITEM IS POSITIVE, BUT THE MDV DATA ITEM IS 1
 (DATA WARNING  5) RECORD       403, DATA ITEM  5, CONTENTS: 111
 THE DV DATA ITEM IS POSITIVE, BUT THE MDV DATA ITEM IS 1
 * THE MAXIMUM NUMBER OF WARNINGS OF ONE OR MORE TYPES WAS REACHED.
 IT IS POSSIBLE THAT SOME WARNING MESSAGES WERE SUPPRESSED.
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
1NONLINEAR MIXED EFFECTS MODEL PROGRAM (NONMEM) VERSION 7.2.0
 ORIGINALLY DEVELOPED BY STUART BEAL, LEWIS SHEINER, AND ALISON BOECKMANN
 CURRENT DEVELOPERS ARE ROBERT BAUER, ICON DEVELOPMENT SOLUTIONS,
 AND ALISON BOECKMANN. IMPLEMENTATION, EFFICIENCY, AND STANDARDIZATION
 PERFORMED BY NOUS INFOSYSTEMS.
 PROBLEM NO.:         1
 Tumor model sKIT,VEGFR3
 TOT. NO. OF OBS RECS:      973
 TOT. NO. OF INDIVIDUALS:    303
 GENERAL NONLINEAR KINETICS MODEL (ADVAN6)
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 #TBLN:      1
 #METH: First Order Conditional Estimation with Interaction
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
 #TERM:
0MINIMIZATION SUCCESSFUL
 HOWEVER, PROBLEMS OCCURRED WITH THE MINIMIZATION.
 REGARD THE RESULTS OF THE ESTIMATION STEP CAREFULLY, AND ACCEPT THEM ONLY
 AFTER CHECKING THAT THE COVARIANCE STEP PRODUCES REASONABLE OUTPUT.
 NO. OF FUNCTION EVALUATIONS USED:      194
 NO. OF SIG. DIGITS IN FINAL EST.:  4.0

 ETABAR IS THE ARITHMETIC MEAN OF THE ETA-ESTIMATES,
 AND THE P-VALUE IS GIVEN FOR THE NULL HYPOTHESIS THAT THE TRUE MEAN IS 0.

 ETABAR:         9.4719E-02  7.7571E-02  0.0000E+00  1.7413E-01  5.9033E-02
 SE:             1.7694E-02  3.1779E-02  0.0000E+00  3.6987E-02  4.2254E-02

 P VAL.:         8.6624E-08  1.4648E-02  1.0000E+00  2.5052E-06  1.6239E-01

 ETAshrink(%):   4.4355E+01  7.7832E+01  1.0000E+02  4.7404E+01  2.8416E+01
 EPSshrink(%):   1.8675E+01

 #TERE:
 Elapsed estimation time in seconds:  1432.73

 ********************               FIRST ORDER CONDITIONAL ESTIMATION WITH INTERACTION              ********************
 #OBJT:**************                       MINIMUM VALUE OF OBJECTIVE FUNCTION                      ********************
 #OBJV:********************************************     7641.071       **************************************************

 ********************               FIRST ORDER CONDITIONAL ESTIMATION WITH INTERACTION              ********************
 ********************                             FINAL PARAMETER ESTIMATE                           ********************

 THETA - VECTOR OF FIXED EFFECTS PARAMETERS   *********
         TH 1      TH 2      TH 3      TH 4      TH 5      TH 6
         1.18E-02  2.82E-03  2.17E-02  1.25E-01  5.03E-03  3.71E-02

 OMEGA - COV MATRIX FOR RANDOM EFFECTS - ETAS  ********
            ETA1      ETA2      ETA3      ETA4      ETA5
 ETA1
+        2.90E-01
 ETA2
+        0.00E+00  5.90E+00
 ETA3
+        0.00E+00  0.00E+00  0.00E+00
 ETA4
+        0.00E+00  0.00E+00  0.00E+00  1.42E+00
 ETA5
+        0.00E+00  0.00E+00  0.00E+00  0.00E+00  1.00E+00

 SIGMA - COV MATRIX FOR RANDOM EFFECTS - EPSILONS  ****
            EPS1
 EPS1
+        1.00E+00

 OMEGA - CORR MATRIX FOR RANDOM EFFECTS - ETAS  *******
            ETA1      ETA2      ETA3      ETA4      ETA5
 ETA1
+        5.39E-01
 ETA2
+        0.00E+00  2.43E+00
 ETA3
+        0.00E+00  0.00E+00  0.00E+00
 ETA4
+        0.00E+00  0.00E+00  0.00E+00  1.19E+00
 ETA5
+        0.00E+00  0.00E+00  0.00E+00  0.00E+00  1.00E+00

 SIGMA - CORR MATRIX FOR RANDOM EFFECTS - EPSILONS  ***
            EPS1
 EPS1
+        1.00E+00
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