Fri Sep 23 10:31:44 CEST 2016
$PROBLEM    Logit model with KPD approach EMAX model covariate CRCL
$INPUT      C ID WEEK=TIME MDV EVID GHFS=DV AMT ADDL II AGE SEX WT HT
            SERUM SERCORR WTCOR SEXCOEFF BSA CLCR
$DATA      xxx.csv IGNORE=C
$SUBROUTINE ADVAN1 TRANS1
$PK
TCLCR=THETA(12)
TVK=THETA(1)

K=TVK*EXP(ETA(1))

IF (TIME.EQ.0) BCLCR=CLCR
IIV=ETA(2)+(BCLCR-75.5)*TCLCR

B00=THETA(2)
B10=THETA(3)
B20=THETA(4)
EMAX0=THETA(5)
ED50=THETA(6)

B01=THETA(7)
B11=THETA(8)
B21=THETA(9)

EMAX1=THETA(10)
EMAX2=THETA(11)

IF (TIME.EQ.0) SWM1=0

$ERROR
CALLFL=0
IPRED=F
EMAX=EMAX0
IF(SWM1.EQ.1) EMAX=EMAX1
IF(SWM1.EQ.2) EMAX=EMAX2
EFF=EMAX*(F*K)/((F*K)+(ED50))
A0=0
A1=0
SPREC=SWM1
IF (SWM1.EQ.0) THEN
        A0=B00
        A1=A0+B01
ENDIF
IF (SWM1.EQ.1) THEN
        A0=B10
        A1=A0+B11
ENDIF
IF (SWM1.EQ.2) THEN
        A0=B20
        A1=A0+B21
ENDIF
A0=A0-EFF+IIV
A1=A1-EFF+IIV

SWM1=GHFS

PC0=EXP(A0)/(1+EXP(A0))
PC1=EXP(A1)/(1+EXP(A1))
PC2=1

P0=PC0
P1=PC1-PC0
P2=PC2-PC1

Y=-1
   IF (DV.LT.0.5)  Y=P0
   IF (DV.GE.0.5.AND.DV.LT.1.5)  Y=P1
   IF (DV.GE.1.5.AND.DV.LT.2.5)  Y=P2

$THETA  0.102 FIX ; 1 TVK
 4.14 FIX ; 2 B00
 0.855 FIX ; 3 B10
 1.47 FIX ; 4 B20
 3.17 FIX ; 5 EMAX0
 12900 FIX ; 6 ED50
 0.626 FIX ; 7* B01
 7.24 FIX ; 8* B11
 0.330 FIX ; 9 B21
 6.65 FIX ; 10 EMAX1
 8.92 FIX ; 11 EMAX2
 0.00650 FIX ; 12 TCLCR
$OMEGA  BLOCK(2) FIX
 0.802
 0.735 1.5
$ESTIMATION METHOD=1 MAXEVALS=0 PRINT=5 LIKE LAPLACE SIGDIGITS=3 SLOW
            NOABORT
$TABLE      ID TIME AMT MDV SPREC IPRED K TVK TCLCR P0 P1 P2 A0 A1 PC0
            PC1 PC2 ETA1 ETA2 EMAX ED50 EFF ONEHEADER NOPRINT
            FILE=xxx.tab
$COVARIANCE SLOW UNCONDITIONAL MATRIX=S

NM-TRAN MESSAGES
 WARNINGS AND ERRORS (IF ANY) FOR PROBLEM    1
 (WARNING  2) NM-TRAN INFERS THAT THE DATA ARE POPULATION.

1NONLINEAR MIXED EFFECTS MODEL PROGRAM (NONMEM) VERSION 7.3.0
 ORIGINALLY DEVELOPED BY STUART BEAL, LEWIS SHEINER, AND ALISON BOECKMANN
 CURRENT DEVELOPERS ARE ROBERT BAUER, ICON DEVELOPMENT SOLUTIONS,
 AND ALISON BOECKMANN. IMPLEMENTATION, EFFICIENCY, AND STANDARDIZATION
 PERFORMED BY NOUS INFOSYSTEMS.
 PROBLEM NO.:         1
 Logit model with KPD approach EMAX model covariate CRCL
 TOT. NO. OF OBS RECS:    18445
 TOT. NO. OF INDIVIDUALS:    595
 ONE COMPARTMENT MODEL (ADVAN1)
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 #TBLN:      1
 #METH: Laplacian Conditional Estimation (Evaluation)
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 Elapsed covariance time in seconds:     0.00

 ********************                  LAPLACIAN CONDITIONAL ESTIMATION (EVALUATION)                 ********************
 #OBJT:**************                       MINIMUM VALUE OF OBJECTIVE FUNCTION                      ********************
 #OBJV:********************************************    11151.253       **************************************************

 ********************                  LAPLACIAN CONDITIONAL ESTIMATION (EVALUATION)                 ********************
 ********************                             FINAL PARAMETER ESTIMATE                           ********************

 THETA - VECTOR OF FIXED EFFECTS PARAMETERS   *********
         TH 1      TH 2      TH 3      TH 4      TH 5      TH 6      TH 7      TH 8      TH 9      TH10      TH11      TH12
         1.02E-01  4.14E+00  8.55E-01  1.47E+00  3.17E+00  1.29E+04  6.26E-01  7.24E+00  3.30E-01  6.65E+00  8.92E+00  6.50E-03

 OMEGA - COV MATRIX FOR RANDOM EFFECTS - ETAS  ********
            ETA1      ETA2
 ETA1
+        8.02E-01
 ETA2
+        7.35E-01  1.50E+00

 OMEGA - CORR MATRIX FOR RANDOM EFFECTS - ETAS  *******
            ETA1      ETA2
 ETA1
+        8.96E-01
 ETA2
+        6.70E-01  1.22E+00

 ********************                  LAPLACIAN CONDITIONAL ESTIMATION (EVALUATION)                 ********************
 ********************                            STANDARD ERROR OF ESTIMATE                          ********************

 THETA - VECTOR OF FIXED EFFECTS PARAMETERS   *********
         TH 1      TH 2      TH 3      TH 4      TH 5      TH 6      TH 7      TH 8      TH 9      TH10      TH11      TH12
        ......... ......... ......... ......... ......... ......... ......... ......... ......... ......... ......... .........

 OMEGA - COV MATRIX FOR RANDOM EFFECTS - ETAS  ********
            ETA1      ETA2
 ETA1
+       .........
 ETA2
+       ......... .........

 OMEGA - CORR MATRIX FOR RANDOM EFFECTS - ETAS  *******
            ETA1      ETA2
 ETA1
+       .........
 ETA2
+       ......... .........

 ********************                  LAPLACIAN CONDITIONAL ESTIMATION (EVALUATION)                 ********************
 ********************                          COVARIANCE MATRIX OF ESTIMATE                         ********************

            TH 1      TH 2      TH 3      TH 4      TH 5      TH 6      TH 7      TH 8      TH 9      TH10      TH11      TH12
             OM11      OM12      OM22
 TH 1
+       .........
 TH 2
+       ......... .........
 TH 3
+       ......... ......... .........
 TH 4
+       ......... ......... ......... .........
 TH 5
+       ......... ......... ......... ......... .........
 TH 6
+       ......... ......... ......... ......... ......... .........
 TH 7
+       ......... ......... ......... ......... ......... ......... .........
 TH 8
+       ......... ......... ......... ......... ......... ......... ......... .........
 TH 9
+       ......... ......... ......... ......... ......... ......... ......... ......... .........
 TH10
+       ......... ......... ......... ......... ......... ......... ......... ......... ......... .........
 TH11
+       ......... ......... ......... ......... ......... ......... ......... ......... ......... ......... .........
 TH12
+       ......... ......... ......... ......... ......... ......... ......... ......... ......... ......... ......... .........
 OM11
+       ......... ......... ......... ......... ......... ......... ......... ......... ......... ......... ......... .........
         .........
 OM12
+       ......... ......... ......... ......... ......... ......... ......... ......... ......... ......... ......... .........
         ......... .........
 OM22
+       ......... ......... ......... ......... ......... ......... ......... ......... ......... ......... ......... .........
         ......... ......... .........

 ********************                  LAPLACIAN CONDITIONAL ESTIMATION (EVALUATION)                 ********************
 ********************                          CORRELATION MATRIX OF ESTIMATE                        ********************

            TH 1      TH 2      TH 3      TH 4      TH 5      TH 6      TH 7      TH 8      TH 9      TH10      TH11      TH12
             OM11      OM12      OM22
 TH 1
+       .........
 TH 2
+       ......... .........
 TH 3
+       ......... ......... .........
 TH 4
+       ......... ......... ......... .........
 TH 5
+       ......... ......... ......... ......... .........
 TH 6
+       ......... ......... ......... ......... ......... .........
 TH 7
+       ......... ......... ......... ......... ......... ......... .........
 TH 8
+       ......... ......... ......... ......... ......... ......... ......... .........
 TH 9
+       ......... ......... ......... ......... ......... ......... ......... ......... .........
 TH10
+       ......... ......... ......... ......... ......... ......... ......... ......... ......... .........
 TH11
+       ......... ......... ......... ......... ......... ......... ......... ......... ......... ......... .........
 TH12
+       ......... ......... ......... ......... ......... ......... ......... ......... ......... ......... ......... .........
 OM11
+       ......... ......... ......... ......... ......... ......... ......... ......... ......... ......... ......... .........
         .........
 OM12
+       ......... ......... ......... ......... ......... ......... ......... ......... ......... ......... ......... .........
         ......... .........
 OM22
+       ......... ......... ......... ......... ......... ......... ......... ......... ......... ......... ......... .........
         ......... ......... .........
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 #CPUT: Total CPU Time in Seconds,        3.008
