Fri Sep 23 09:54:11 CEST 2016
$PROBLEM    Logit model with KPD approach EMAX model covariate CRCL
$INPUT      C ID WEEK=TIME MDV EVID GHFS=DV AMT ADDL II AGE SEX WT HT
            SERUM SERCORR WTCOR SEXCOEFF BSA CLCR
$DATA      Simulated_GHFS_HFSmodel.csv IGNORE=C
$SUBROUTINE ADVAN1 TRANS1
$PK
TCLCR=THETA(12)
TVK=THETA(1)

K=TVK*EXP(ETA(1))

IF (TIME.EQ.0) BCLCR=CLCR
IIV=ETA(2)+(BCLCR-75.5)*TCLCR

B00=THETA(2)
B10=THETA(3)
B20=THETA(4)
EMAX0=THETA(5)
ED50=THETA(6)

B01=THETA(7)
B11=THETA(8)
B21=THETA(9)

EMAX1=THETA(10)
EMAX2=THETA(11)

IF (TIME.EQ.0) SWM1=0

$ERROR
CALLFL=0

IPRED=F
EMAX=EMAX0
IF(SWM1.EQ.1) EMAX=EMAX1
IF(SWM1.EQ.2) EMAX=EMAX2
EFF=EMAX*(F*K)/((F*K)+(ED50))
A0=0
A1=0
SPREC=SWM1
IF (SWM1.EQ.0) THEN
        A0=B00
        A1=A0+B01
ENDIF
IF (SWM1.EQ.1) THEN
        A0=B10
        A1=A0+B11
ENDIF
IF (SWM1.EQ.2) THEN
        A0=B20
        A1=A0+B21
ENDIF
A0=A0-EFF+IIV
A1=A1-EFF+IIV

SWM1=GHFS

PC0=EXP(A0)/(1+EXP(A0))
PC1=EXP(A1)/(1+EXP(A1))
PC2=1

P0=PC0
P1=PC1-PC0
P2=PC2-PC1

Y=-1
   IF (DV.LT.0.5)  Y=P0
   IF (DV.GE.0.5.AND.DV.LT.1.5)  Y=P1
   IF (DV.GE.1.5.AND.DV.LT.2.5)  Y=P2

$THETA  (0,0.159) ; 1 TVK
 4.62 ; 2 B00
 0.683 ; 3 B10
 1.99 ; 4 B20
 3.8 ; 5 EMAX0
 (0,13000) ; 6 ED50
 (0,0.602) ; 7* B01
 (0,5.24) ; 8* B11
 (0,0.322) ; 9 B21
 (0,6.3) ; 10 EMAX1
 (0,9.9) ; 11 EMAX2
 (0,0.00552) ; 12 TCLCR
$OMEGA  BLOCK(2)
 0.468
 0.402 0.8
$ESTIMATION METHOD=1 MAXEVALS=9999 PRINT=5 LIKE LAPLACE SIGDIGITS=1
            SLOW NOABORT
$TABLE      ID TIME AMT MDV SPREC IPRED K TVK TCLCR P0 P1 P2 A0 A1 PC0
            PC1 PC2 ETA1 ETA2 EMAX ED50 EFF ONEHEADER NOPRINT
            FILE=ddmore.tab
$COVARIANCE SLOW UNCONDITIONAL MATRIX=S

NM-TRAN MESSAGES
 WARNINGS AND ERRORS (IF ANY) FOR PROBLEM    1
 (WARNING  2) NM-TRAN INFERS THAT THE DATA ARE POPULATION.

1NONLINEAR MIXED EFFECTS MODEL PROGRAM (NONMEM) VERSION 7.3.0
 ORIGINALLY DEVELOPED BY STUART BEAL, LEWIS SHEINER, AND ALISON BOECKMANN
 CURRENT DEVELOPERS ARE ROBERT BAUER, ICON DEVELOPMENT SOLUTIONS,
 AND ALISON BOECKMANN. IMPLEMENTATION, EFFICIENCY, AND STANDARDIZATION
 PERFORMED BY NOUS INFOSYSTEMS.
 PROBLEM NO.:         1
 Logit model with KPD approach EMAX model covariate CRCL
 TOT. NO. OF OBS RECS:    18445
 TOT. NO. OF INDIVIDUALS:    595
 ONE COMPARTMENT MODEL (ADVAN1)
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 #TBLN:      1
 #METH: Laplacian Conditional Estimation
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
 #TERM:
0MINIMIZATION SUCCESSFUL
 HOWEVER, PROBLEMS OCCURRED WITH THE MINIMIZATION.
 REGARD THE RESULTS OF THE ESTIMATION STEP CAREFULLY, AND ACCEPT THEM ONLY
 AFTER CHECKING THAT THE COVARIANCE STEP PRODUCES REASONABLE OUTPUT.
 NO. OF FUNCTION EVALUATIONS USED:      441
 NO. OF SIG. DIGITS IN FINAL EST.:  1.5

 ETABAR IS THE ARITHMETIC MEAN OF THE ETA-ESTIMATES,
 AND THE P-VALUE IS GIVEN FOR THE NULL HYPOTHESIS THAT THE TRUE MEAN IS 0.

 ETABAR:         6.9295E-02  7.5210E-02
 SE:             1.4229E-02  3.5733E-02
 N:                     595         595

 P VAL.:         1.1176E-06  3.5313E-02

 ETAshrink(%):   5.8687E+01  2.8868E+01
 EBVshrink(%):   1.0000E+02  3.2606E+01
 EPSshrink(%):   1.0000E+02

 #TERE:
 Elapsed estimation time in seconds:   184.32
 Elapsed covariance time in seconds:    13.31

 ********************                         LAPLACIAN CONDITIONAL ESTIMATION                       ********************
 #OBJT:**************                       MINIMUM VALUE OF OBJECTIVE FUNCTION                      ********************
 #OBJV:********************************************    11089.443       **************************************************

 ********************                         LAPLACIAN CONDITIONAL ESTIMATION                       ********************
 ********************                             FINAL PARAMETER ESTIMATE                           ********************

 THETA - VECTOR OF FIXED EFFECTS PARAMETERS   *********
         TH 1      TH 2      TH 3      TH 4      TH 5      TH 6      TH 7      TH 8      TH 9      TH10      TH11      TH12
         7.01E-02  4.29E+00  4.05E-01  1.82E+00  3.65E+00  1.13E+04  6.16E-01  7.47E+00  3.62E-01  6.23E+00  9.08E+00  2.98E-03

 OMEGA - COV MATRIX FOR RANDOM EFFECTS - ETAS  ********
            ETA1      ETA2
 ETA1
+        7.07E-01
 ETA2
+        5.98E-01  1.50E+00

 OMEGA - CORR MATRIX FOR RANDOM EFFECTS - ETAS  *******
            ETA1      ETA2
 ETA1
+        8.41E-01
 ETA2
+        5.80E-01  1.23E+00

 ********************                         LAPLACIAN CONDITIONAL ESTIMATION                       ********************
 ********************                            STANDARD ERROR OF ESTIMATE                          ********************

 THETA - VECTOR OF FIXED EFFECTS PARAMETERS   *********
         TH 1      TH 2      TH 3      TH 4      TH 5      TH 6      TH 7      TH 8      TH 9      TH10      TH11      TH12
         7.62E-03  2.04E-01  4.79E-01  3.22E-01  3.59E-01  1.13E+03  3.32E-02  1.59E-01  3.62E-02  9.08E-01  3.59E-01  1.15E-03

 OMEGA - COV MATRIX FOR RANDOM EFFECTS - ETAS  ********
            ETA1      ETA2
 ETA1
+        7.19E-02
 ETA2
+        1.35E-01  2.17E-01

 OMEGA - CORR MATRIX FOR RANDOM EFFECTS - ETAS  *******
            ETA1      ETA2
 ETA1
+        4.27E-02
 ETA2
+        8.82E-02  8.83E-02

 ********************                         LAPLACIAN CONDITIONAL ESTIMATION                       ********************
 ********************                          COVARIANCE MATRIX OF ESTIMATE                         ********************

            TH 1      TH 2      TH 3      TH 4      TH 5      TH 6      TH 7      TH 8      TH 9      TH10      TH11      TH12
             OM11      OM12      OM22
 TH 1
+        5.80E-05
 TH 2
+        5.23E-04  4.17E-02
 TH 3
+        8.14E-04  1.24E-02  2.30E-01
 TH 4
+        9.36E-04  3.29E-02  5.29E-02  1.04E-01
 TH 5
+        5.89E-05  5.95E-02 -1.15E-02  7.30E-03  1.29E-01
 TH 6
+       -6.44E-01 -8.52E+01 -1.47E+02 -2.91E+02  1.97E+01  1.28E+06
 TH 7
+       -1.57E-05  8.83E-04  1.97E-03  2.81E-03 -9.78E-04 -1.82E+01  1.10E-03
 TH 8
+        1.27E-05  2.96E-03  1.16E-02  6.03E-03  3.62E-03 -1.60E+01  2.58E-04  2.53E-02
 TH 9
+       -2.87E-05 -1.04E-03  1.76E-04 -2.46E-03 -4.27E-04  9.01E+00  1.08E-04 -2.53E-04  1.31E-03
 TH10
+        2.65E-04 -1.39E-02  3.94E-01  1.98E-03 -2.06E-02  7.04E+01 -1.50E-03  3.08E-02  3.45E-03  8.24E-01
 TH11
+        5.53E-04  1.53E-02  3.16E-02  7.80E-02  8.13E-03 -1.16E+02 -1.15E-03  2.36E-03  1.81E-03  1.89E-02  1.29E-01
 TH12
+       -2.95E-07  1.48E-05  6.33E-05  1.51E-04 -3.20E-05 -6.11E-01 -9.66E-06  1.14E-05 -4.41E-07  5.75E-07  1.55E-04  1.32E-06
 OM11
+       -1.96E-04 -4.03E-03 -4.35E-03 -1.25E-02 -1.18E-03  2.67E+01 -1.60E-04 -6.28E-04  2.42E-04  3.47E-03 -1.18E-02 -1.31E-05
          5.16E-03
 OM12
+        9.19E-05  4.98E-03  9.06E-03 -9.33E-05  6.40E-03  2.52E-01  2.61E-04 -1.01E-03  2.69E-04  1.41E-02 -1.41E-03 -3.19E-05
          5.18E-03  1.83E-02
 OM22
+        1.70E-04  1.77E-02  2.64E-02  1.82E-02  2.34E-02 -4.69E+01  1.21E-03  2.95E-03  1.32E-04  2.91E-02  1.04E-02 -1.88E-05
          3.56E-03  2.27E-02  4.69E-02

 ********************                         LAPLACIAN CONDITIONAL ESTIMATION                       ********************
 ********************                          CORRELATION MATRIX OF ESTIMATE                        ********************

            TH 1      TH 2      TH 3      TH 4      TH 5      TH 6      TH 7      TH 8      TH 9      TH10      TH11      TH12
             OM11      OM12      OM22
 TH 1
+        7.62E-03
 TH 2
+        3.36E-01  2.04E-01
 TH 3
+        2.23E-01  1.27E-01  4.79E-01
 TH 4
+        3.81E-01  5.00E-01  3.42E-01  3.22E-01
 TH 5
+        2.15E-02  8.13E-01 -6.71E-02  6.32E-02  3.59E-01
 TH 6
+       -7.47E-02 -3.69E-01 -2.70E-01 -7.97E-01  4.86E-02  1.13E+03
 TH 7
+       -6.20E-02  1.30E-01  1.24E-01  2.63E-01 -8.22E-02 -4.83E-01  3.32E-02
 TH 8
+        1.04E-02  9.10E-02  1.52E-01  1.18E-01  6.34E-02 -8.87E-02  4.89E-02  1.59E-01
 TH 9
+       -1.04E-01 -1.41E-01  1.02E-02 -2.11E-01 -3.28E-02  2.20E-01  9.01E-02 -4.39E-02  3.62E-02
 TH10
+        3.83E-02 -7.51E-02  9.05E-01  6.77E-03 -6.32E-02  6.85E-02 -4.99E-02  2.13E-01  1.05E-01  9.08E-01
 TH11
+        2.02E-01  2.09E-01  1.84E-01  6.76E-01  6.32E-02 -2.85E-01 -9.65E-02  4.14E-02  1.39E-01  5.80E-02  3.59E-01
 TH12
+       -3.38E-02  6.32E-02  1.15E-01  4.08E-01 -7.78E-02 -4.71E-01 -2.54E-01  6.27E-02 -1.06E-02  5.52E-04  3.76E-01  1.15E-03
 OM11
+       -3.57E-01 -2.75E-01 -1.26E-01 -5.40E-01 -4.58E-02  3.28E-01 -6.72E-02 -5.49E-02  9.31E-02  5.31E-02 -4.58E-01 -1.59E-01
          7.19E-02
 OM12
+        8.92E-02  1.80E-01  1.40E-01 -2.14E-03  1.32E-01  1.65E-03  5.82E-02 -4.69E-02  5.48E-02  1.15E-01 -2.90E-02 -2.05E-01
          5.33E-01  1.35E-01
 OM22
+        1.03E-01  4.00E-01  2.54E-01  2.61E-01  3.01E-01 -1.91E-01  1.69E-01  8.57E-02  1.68E-02  1.48E-01  1.34E-01 -7.55E-02
          2.29E-01  7.74E-01  2.17E-01
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 #CPUT: Total CPU Time in Seconds,      199.276
