Tue Sep 29 06:01:37 EDT 2015
$SIZES      LIM6=2000
$PROBLEM    NoLog ADD ERR
$INPUT      CCOM ID TIME GROUP BASE DV LOGDV BQL DOSECB=DROP
            DOSEG=DROP CB G CEVID=DROP CMDV=DROP CCMT=DROP NWLSALL
            TNWLS TCUTOFF=DROP FLG ;1 drug,2 SLD,3 dropout from SLD,4 new lesion
            CYCLE CMT EVID CPD=DROP
$DATA       JHQJ_LLOQ5_drop_newles_old.csv IGNORE=C IGNORE(FLG.GT.2)
$SUBROUTINE ADVAN6 TOL=3
;Tumour
$MODEL      COMP=(TUMOUR,DEFOBS)
$PK
KG = THETA(1)*EXP(ETA(1))
KD0	= THETA(2)*EXP(ETA(2))
KD1 = THETA(3)*EXP(ETA(2))
IBASE = THETA(4)*EXP(ETA(3))
FADD = THETA(5)

; ==== SLD baseline ====
A_0(1) = IBASE*1000

IF(NEWIND.NE.2) OCB=CB
IF(NEWIND.NE.2) OG=G
E0 = OCB ;ng/dL*day/n days in cycle
E1 = OG ;mol/10^6 cells*day/n days in cycle ;sum Parent and active metabolite
OCB=CB
OG=G

$DES
DADT(1) = KG/1000 * A(1) - (KD0/1000 * E0 + KD1/100 * E1) * A(1)

$ERROR
LLOQ = 5 ;5 mm is LLOQ
IPRED = A(1)

DEL = 0.001
W = FADD
DUM = (LLOQ-IPRED)/W
DUM2 = PHI(DUM)

IF(BQL.EQ.1) THEN
	F_FLAG = 1
	Y = DUM2
ENDIF
IF(BQL.EQ.0) THEN
	F_FLAG = 0
	Y = IPRED+ERR(1)*W
ENDIF

IRES = IPRED-DV
IWRES = IRES/W

;Parameters
$THETA  (0,0.309678337449515) ; KG [1/day]
 (0,0.0298223872147048) ; KD0 [1/day/AUC0]
 (0,0.010438436222387) ; KD1 [1/day/AUC1]
 (0,0.0676679434349179) ; IBASE [m]
 (0,21.519455032029) ; FADD
$OMEGA  0.0836985514547568  ;         KG
 0.100813387874112  ;         KD
 0.0964694381178833  ;      IBASE
;Error
$SIGMA  1  FIX  ; placeholder
$ESTIMATION MAXEVAL=9000 PRINT=10 METH=1 LAPLACIAN INTER NUMERICAL
            SLOW NOABORT
$COVARIANCE SLOW
$TABLE      ID TIME DV IPRED PRED IRES IWRES W CWRES EVID GROUP E0 E1
            BQL CB G FILE=sdtab1 NOPRINT ONEHEADER
$TABLE      ID ETA1 ETA2 ETA3 KG KD0 KD1 BASE IBASE FILE=patab1_p
            NOPRINT FIRSTONLY ONEHEADER

NM-TRAN MESSAGES
 WARNINGS AND ERRORS (IF ANY) FOR PROBLEM    1
 (WARNING  2) NM-TRAN INFERS THAT THE DATA ARE POPULATION.
 (WARNING  3) THERE MAY BE AN ERROR IN THE ABBREVIATED CODE. THE FOLLOWING
 ONE OR MORE RANDOM VARIABLES ARE DEFINED WITH "IF" STATEMENTS THAT DO NOT
 PROVIDE DEFINITIONS FOR BOTH THE "THEN" AND "ELSE" CASES. IF ALL
 CONDITIONS FAIL, THE VALUES OF THESE VARIABLES WILL BE ZERO.
   Y

1NONLINEAR MIXED EFFECTS MODEL PROGRAM (NONMEM) VERSION 7.3.0
 ORIGINALLY DEVELOPED BY STUART BEAL, LEWIS SHEINER, AND ALISON BOECKMANN
 CURRENT DEVELOPERS ARE ROBERT BAUER, ICON DEVELOPMENT SOLUTIONS,
 AND ALISON BOECKMANN. IMPLEMENTATION, EFFICIENCY, AND STANDARDIZATION
 PERFORMED BY NOUS INFOSYSTEMS.
 PROBLEM NO.:         1
 NoLog ADD ERR
 TOT. NO. OF OBS RECS:     1358
 TOT. NO. OF INDIVIDUALS:    336
 GENERAL NONLINEAR KINETICS MODEL (ADVAN6)
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 #TBLN:      1
 #METH: Laplacian Conditional Estimation with Interaction
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
 #TERM:
0MINIMIZATION SUCCESSFUL
 HOWEVER, PROBLEMS OCCURRED WITH THE MINIMIZATION.
 REGARD THE RESULTS OF THE ESTIMATION STEP CAREFULLY, AND ACCEPT THEM ONLY
 AFTER CHECKING THAT THE COVARIANCE STEP PRODUCES REASONABLE OUTPUT.
 NO. OF FUNCTION EVALUATIONS USED:      300
 NO. OF SIG. DIGITS IN FINAL EST.:  3.5

 ETABAR IS THE ARITHMETIC MEAN OF THE ETA-ESTIMATES,
 AND THE P-VALUE IS GIVEN FOR THE NULL HYPOTHESIS THAT THE TRUE MEAN IS 0.

 ETABAR:         1.9164E-01  1.1957E-01  6.7243E-02
 SE:             3.1862E-02  4.0896E-02  3.4294E-02
 N:                     336         336         336

 P VAL.:         1.8103E-09  3.4596E-03  4.9904E-02

 ETAshrink(%):   5.5339E+01  2.8238E+01  1.2260E+01
 EBVshrink(%):   1.0000E+02  2.8585E+01  6.5398E+00
 EPSshrink(%):   2.9979E+01


 #TERE:
 Elapsed estimation time in seconds:    66.23
 Elapsed covariance time in seconds:    32.67

 ********************                LAPLACIAN CONDITIONAL ESTIMATION WITH INTERACTION               ********************
 #OBJT:**************                       MINIMUM VALUE OF OBJECTIVE FUNCTION                      ********************
 #OBJV:********************************************     9716.243       **************************************************

 ********************                LAPLACIAN CONDITIONAL ESTIMATION WITH INTERACTION               ********************
 ********************                             FINAL PARAMETER ESTIMATE                           ********************

 THETA - VECTOR OF FIXED EFFECTS PARAMETERS   *********
         TH 1      TH 2      TH 3      TH 4      TH 5
         6.11E-01  4.97E-02  1.64E-02  7.13E-02  1.84E+01

 OMEGA - COV MATRIX FOR RANDOM EFFECTS - ETAS  ********
            ETA1      ETA2      ETA3
 ETA1
+        1.72E+00
 ETA2
+        0.00E+00  1.09E+00
 ETA3
+        0.00E+00  0.00E+00  5.15E-01

 SIGMA - COV MATRIX FOR RANDOM EFFECTS - EPSILONS  ****
            EPS1
 EPS1
+        1.00E+00

 OMEGA - CORR MATRIX FOR RANDOM EFFECTS - ETAS  *******
            ETA1      ETA2      ETA3
 ETA1
+        1.31E+00
 ETA2
+        0.00E+00  1.05E+00
 ETA3
+        0.00E+00  0.00E+00  7.18E-01

 SIGMA - CORR MATRIX FOR RANDOM EFFECTS - EPSILONS  ***
            EPS1
 EPS1
+        1.00E+00

 ********************                LAPLACIAN CONDITIONAL ESTIMATION WITH INTERACTION               ********************
 ********************                            STANDARD ERROR OF ESTIMATE                          ********************

 THETA - VECTOR OF FIXED EFFECTS PARAMETERS   *********
         TH 1      TH 2      TH 3      TH 4      TH 5
         2.69E-05  9.32E-06  4.57E-06  9.26E-06  3.17E-04

 OMEGA - COV MATRIX FOR RANDOM EFFECTS - ETAS  ********
            ETA1      ETA2      ETA3
 ETA1
+        4.80E-04
 ETA2
+       .........  3.03E-04
 ETA3
+       ......... .........  2.14E-04

 SIGMA - COV MATRIX FOR RANDOM EFFECTS - EPSILONS  ****
            EPS1
 EPS1
+       .........

 OMEGA - CORR MATRIX FOR RANDOM EFFECTS - ETAS  *******
            ETA1      ETA2      ETA3
 ETA1
+        1.83E-04
 ETA2
+       .........  1.45E-04
 ETA3
+       ......... .........  1.49E-04

 SIGMA - CORR MATRIX FOR RANDOM EFFECTS - EPSILONS  ***
            EPS1
 EPS1
+       .........

 ********************                LAPLACIAN CONDITIONAL ESTIMATION WITH INTERACTION               ********************
 ********************                          COVARIANCE MATRIX OF ESTIMATE                         ********************

            TH 1      TH 2      TH 3      TH 4      TH 5      OM11      OM12      OM13      OM22      OM23      OM33      SG11
 TH 1
+        7.22E-10
 TH 2
+        2.45E-10  8.68E-11
 TH 3
+        1.20E-10  4.25E-11  2.09E-11
 TH 4
+       -2.43E-10 -8.62E-11 -4.23E-11  8.57E-11
 TH 5
+       -8.33E-09 -2.94E-09 -1.44E-09  2.93E-09  1.00E-07
 OM11
+        1.22E-08  4.26E-09  2.08E-09 -4.22E-09 -1.44E-07  2.30E-07
 OM12
+       ......... ......... ......... ......... ......... ......... .........
 OM13
+       ......... ......... ......... ......... ......... ......... ......... .........
 OM22
+       -7.21E-09 -2.70E-09 -1.33E-09  2.69E-09  9.16E-08 -1.34E-07 ......... .........  9.18E-08
 OM23
+       ......... ......... ......... ......... ......... ......... ......... ......... ......... .........
 OM33
+       -5.58E-09 -1.98E-09 -9.71E-10  1.97E-09  6.70E-08 -9.68E-08 ......... .........  6.18E-08 .........  4.59E-08
 SG11
+       ......... ......... ......... ......... ......... ......... ......... ......... ......... ......... ......... .........

 ********************                LAPLACIAN CONDITIONAL ESTIMATION WITH INTERACTION               ********************
 ********************                          CORRELATION MATRIX OF ESTIMATE                        ********************

            TH 1      TH 2      TH 3      TH 4      TH 5      OM11      OM12      OM13      OM22      OM23      OM33      SG11
 TH 1
+        2.69E-05
 TH 2
+        9.79E-01  9.32E-06
 TH 3
+        9.78E-01  9.99E-01  4.57E-06
 TH 4
+       -9.78E-01 -9.99E-01 -1.00E+00  9.26E-06
 TH 5
+       -9.78E-01 -9.97E-01 -9.98E-01  9.98E-01  3.17E-04
 OM11
+        9.43E-01  9.52E-01  9.50E-01 -9.50E-01 -9.48E-01  4.80E-04
 OM12
+       ......... ......... ......... ......... ......... ......... .........
 OM13
+       ......... ......... ......... ......... ......... ......... ......... .........
 OM22
+       -8.85E-01 -9.55E-01 -9.59E-01  9.59E-01  9.54E-01 -9.25E-01 ......... .........  3.03E-04
 OM23
+       ......... ......... ......... ......... ......... ......... ......... ......... ......... .........
 OM33
+       -9.69E-01 -9.89E-01 -9.92E-01  9.93E-01  9.88E-01 -9.41E-01 ......... .........  9.52E-01 .........  2.14E-04
 SG11
+       ......... ......... ......... ......... ......... ......... ......... ......... ......... ......... ......... .........
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 #CPUT: Total CPU Time in Seconds,       99.550
