Wed Dec 16 11:07:34 EST 2015
; Claret-like model for describing CTS. No resistance to drug treatment. Independent additive effect of the two drugs. M3 method for BLQ. Additive error
$SIZES      LIM6=2000
$PROBLEM    Model for SLD(t)
$INPUT      CCOM ID TIME ;in day
            DV ;SLD in mm
            BQL ;the LLOQ is 5 mm
            CB ;exposure to carboplatin (per-cycle average AUC)
            G ;exposure to gemcitabine (per-cycle average AUC)
            EVID FLG ;FLG=2 for SLD data,FLG=1 for exposure-related entries
            CMT ;CMT=1 for SLD data
$DATA       Simulated_SLD.csv IGNORE=C
$SUBROUTINE ADVAN6 TOL=3
;Tumour
$MODEL      COMP=(TUMOUR,DEFOBS)
$PK
KG = THETA(1)*EXP(ETA(1)) ;tumour growth rate constant (1/day)
KD0	= THETA(2)*EXP(ETA(2)) ;carboplatin related death rate constant (1/day/AUC0)
KD1 = THETA(3)*EXP(ETA(2)) ;gemcitabine related death rate constant (1/day/AUC1)
IBASE = THETA(4)*EXP(ETA(3)) ;baseline SLD (m)
FADD = THETA(5) ;SD of additive error (mm)

; ==== SLD baseline ====
A_0(1) = IBASE*1000

; Backward interpolation of exposure-related data
IF(NEWIND.NE.2) OCB=CB
IF(NEWIND.NE.2) OG=G
E0 = OCB
E1 = OG
OCB=CB
OG=G

$DES
; Model for dSLD(t)
DADT(1) = KG/1000 * A(1) - (KD0/1000 * E0 + KD1/100 * E1) * A(1)

$ERROR
LLOQ = 5 ;5 mm is LLOQ
IPRED = A(1)

W = FADD ;SD of additive unexpained variability

; Probability of SLD<LLOQ
DUM = (LLOQ-IPRED)/W
DUM2 = PHI(DUM)

IF(BQL.EQ.1) THEN
	F_FLAG = 1
	Y = DUM2
ENDIF
IF(BQL.EQ.0) THEN
	F_FLAG = 0
	Y = IPRED+ERR(1)*W
ENDIF

IRES = IPRED-DV
IWRES = IRES/W

;Parameters
$THETA  (0,0.3) ; KG [1/day]
 (0,0.03) ; KD0 [1/day/AUC0]
 (0,0.01) ; KD1 [1/day/AUC1]
 (0,0.065) ; IBASE [m]
 (0,20) ; FADD
$OMEGA  0.08  ;         KG
 0.1  ;         KD
 0.1  ;      IBASE
;Error
$SIGMA  1  FIX  ; placeholder
$ESTIMATION MAXEVAL=9000 PRINT=10 METH=1 LAPLACIAN INTER NUMERICAL
            SLOW NOABORT
$COVARIANCE SLOW
$TABLE      ID TIME DV IPRED PRED IRES IWRES W CWRES EVID ETA1 ETA2
            ETA3 KG KD0 KD1 IBASE FILE=sdtab_SLD NOPRINT ONEHEADER

NM-TRAN MESSAGES
 WARNINGS AND ERRORS (IF ANY) FOR PROBLEM    1
 (WARNING  2) NM-TRAN INFERS THAT THE DATA ARE POPULATION.
 (WARNING  3) THERE MAY BE AN ERROR IN THE ABBREVIATED CODE. THE FOLLOWING
 ONE OR MORE RANDOM VARIABLES ARE DEFINED WITH "IF" STATEMENTS THAT DO NOT
 PROVIDE DEFINITIONS FOR BOTH THE "THEN" AND "ELSE" CASES. IF ALL
 CONDITIONS FAIL, THE VALUES OF THESE VARIABLES WILL BE ZERO.
   Y

1NONLINEAR MIXED EFFECTS MODEL PROGRAM (NONMEM) VERSION 7.3.0
 ORIGINALLY DEVELOPED BY STUART BEAL, LEWIS SHEINER, AND ALISON BOECKMANN
 CURRENT DEVELOPERS ARE ROBERT BAUER, ICON DEVELOPMENT SOLUTIONS,
 AND ALISON BOECKMANN. IMPLEMENTATION, EFFICIENCY, AND STANDARDIZATION
 PERFORMED BY NOUS INFOSYSTEMS.
 PROBLEM NO.:         1
 Model for SLD(t)
 TOT. NO. OF OBS RECS:     1358
 TOT. NO. OF INDIVIDUALS:    336
 GENERAL NONLINEAR KINETICS MODEL (ADVAN6)
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 #TBLN:      1
 #METH: Laplacian Conditional Estimation with Interaction
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
 #TERM:
0MINIMIZATION SUCCESSFUL
 HOWEVER, PROBLEMS OCCURRED WITH THE MINIMIZATION.
 REGARD THE RESULTS OF THE ESTIMATION STEP CAREFULLY, AND ACCEPT THEM ONLY
 AFTER CHECKING THAT THE COVARIANCE STEP PRODUCES REASONABLE OUTPUT.
 NO. OF FUNCTION EVALUATIONS USED:      424
 NO. OF SIG. DIGITS IN FINAL EST.:  3.7

 ETABAR IS THE ARITHMETIC MEAN OF THE ETA-ESTIMATES,
 AND THE P-VALUE IS GIVEN FOR THE NULL HYPOTHESIS THAT THE TRUE MEAN IS 0.

 ETABAR:         3.4642E-01  1.2269E-01  8.2517E-02
 SE:             4.3652E-02  3.5906E-02  3.2145E-02
 N:                     336         336         336

 P VAL.:         2.1128E-15  6.3368E-04  1.0258E-02

 ETAshrink(%):   5.4526E+01  3.1404E+01  1.2100E+01
 EBVshrink(%):   1.0000E+02  3.9147E+01  7.5295E+00
 EPSshrink(%):   2.2906E+01


 #TERE:
 Elapsed estimation time in seconds:   137.55
0R MATRIX ALGORITHMICALLY NON-POSITIVE-SEMIDEFINITE
 BUT NONSINGULAR
0R MATRIX IS OUTPUT
0COVARIANCE STEP ABORTED
 Elapsed covariance time in seconds:    48.91

 ********************                LAPLACIAN CONDITIONAL ESTIMATION WITH INTERACTION               ********************
 #OBJT:**************                       MINIMUM VALUE OF OBJECTIVE FUNCTION                      ********************
 #OBJV:********************************************    10345.910       **************************************************

 ********************                LAPLACIAN CONDITIONAL ESTIMATION WITH INTERACTION               ********************
 ********************                             FINAL PARAMETER ESTIMATE                           ********************

 THETA - VECTOR OF FIXED EFFECTS PARAMETERS   *********
         TH 1      TH 2      TH 3      TH 4      TH 5
         4.46E-01  4.24E-02  2.18E-02  7.44E-02  1.85E+01

 OMEGA - COV MATRIX FOR RANDOM EFFECTS - ETAS  ********
            ETA1      ETA2      ETA3
 ETA1
+        3.11E+00
 ETA2
+        0.00E+00  9.23E-01
 ETA3
+        0.00E+00  0.00E+00  4.51E-01

 SIGMA - COV MATRIX FOR RANDOM EFFECTS - EPSILONS  ****
            EPS1
 EPS1
+        1.00E+00

 OMEGA - CORR MATRIX FOR RANDOM EFFECTS - ETAS  *******
            ETA1      ETA2      ETA3
 ETA1
+        1.76E+00
 ETA2
+        0.00E+00  9.61E-01
 ETA3
+        0.00E+00  0.00E+00  6.71E-01

 SIGMA - CORR MATRIX FOR RANDOM EFFECTS - EPSILONS  ***
            EPS1
 EPS1
+        1.00E+00
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 #CPUT: Total CPU Time in Seconds,      187.691
