Thu Oct 22 09:02:47 EDT 2015
;; 1. Based on: run7
;; 2. Description: OS-IPP. Real BASE
;; x1. Author: user
$SIZES      LIM6=2000
$PROBLEM    OS-IPP
$INPUT      CCOM ID TIME TMONTH GROUP BASE DV LOGDV BQL CB G NWLS
            TNWLS OSCENS TCUTOFF FLG ;1 drug,2 SLD,3 dropout from SLD,4 new lesion
            CYCLE CMT EVID ECOG KG KD0 KD1 IBASE CW12
$DATA       JHQJ_TTE_param1.csv IGNORE=C IGNORE(FLG.EQ.2)
            IGNORE(FLG.EQ.3) IGNORE(FLG.EQ.4)
$SUBROUTINE ADVAN6 TOL=3
;Tumour
$MODEL      COMP=(TUMOUR) COMP=(DHZ) COMP=(HZLES) COMP=(HDEATH)
$PK
FADD = 18.4
TVBASE = 70
DBASE = BASE
; --- New Lesions ---
LAM = 0.0049 ;LAM
SHP = 2.67 ;SHP
; --- Dropout ---
DLAM = 0.0049 ;DLAM
DSHP = 2.95 ;DSHP
GPD = 1.16 ;GPD
BCTS = 1.22 ;BCTS

; --- OS param ---
OLAM = THETA(1)*EXP(ETA(1))
OSHP = THETA(2)
GBAS = THETA(3)
GCTS = THETA(4)
GNWLS = THETA(5)
GECOG = THETA(6)

IF(NEWIND.NE.2) PD=0
MMBAS=IBASE*1000 ;basline TS in [mm]
; ==== SLD baseline ====
A_0(1) = IBASE*1000

IF(NEWIND.NE.2) OCB=CB
IF(NEWIND.NE.2) OG=G
E0 = OCB ;ng/dL*day/n days in cycle
E1 = OG ;mol/10^6 cells*day/n days in cycle ;sum Parent and active metabolite
OCB=CB
OG=G

MINDIF = 5 ;[mm] min increase in SLD for PD

IECOG=0
IF(ECOG.GT.0) IECOG=1

$DES
DADT(1) = KG/1000 * A(1) - (KD0/1000 * E0 + KD1/100 * E1) * A(1)
DEL = 1E-6
; --- Dropout ---
DADT(2) = DLAM*DSHP*(DLAM*(T+DEL))**(DSHP-1)*EXP(GPD*PD)
; --- New Lesions ---
TUM = A(1)
RCTS = (TUM-MMBAS)/MMBAS
DADT(3) = LAM*SHP*(LAM*(T+DEL))**(SHP-1)*EXP(BCTS*RCTS)

; --- OS ----
IF(T.EQ.0) THEN
	WTS=0
	TM12=0
ENDIF
IF(T.LE.84) THEN
WTS = RCTS
TM12 = WTS
ELSE
WTS=WTS
ENDIF

INWLS = 0
IF (NWLS.EQ.1.AND.T.GE.TNWLS) INWLS = 1

DADT(4) = OLAM*OSHP*(OLAM*(T+DEL))**(OSHP-1) *EXP(GBAS*DBASE/TVBASE+GCTS*WTS+GNWLS*INWLS+GECOG*IECOG)

$ERROR
DELX = 1E-6
XTUM=A(1)
XRCTS = (XTUM-MMBAS)/MMBAS
IF(NEWIND.NE.2) XWTS=0
IF(NEWIND.NE.2) XTM12 = XWTS
IF(TIME.EQ.0) THEN
	XWTS=0
	XTM12=0
ENDIF
IF(TIME.LE.84) THEN
	XWTS = XRCTS
	XTM12=XWTS
ELSE
	XWTS=XWTS
ENDIF

;--- Death hazard ---
OCHZ = A(4)
OSUR=EXP(-OCHZ)
; New Lesion covariate
XNWLS = 0
IF (NWLS.EQ.1.AND.TIME.GE.TNWLS) XNWLS = 1

OHAZN = OLAM*OSHP*(OLAM*(TIME+DELX))**(OSHP-1)*EXP(GBAS*DBASE/TVBASE+GCTS*XWTS+GNWLS*XNWLS+GECOG*IECOG) ;base for dropout

IF (FLG.EQ.9.AND.EVID.EQ.0.AND.OSCENS.EQ.1) THEN
IPRED=OSUR ;probability of survival (censored event)
Y = IPRED  ; Y is probability for TTE data
ENDIF
IF (FLG.EQ.9.AND.EVID.EQ.0.AND.OSCENS.EQ.0) THEN
IPRED=OSUR*OHAZN ;probability of event (death) at time=TIME
Y = IPRED  ; Y is probability for TTE data
ENDIF

; --- PD computation ---
TUMN=A(1)
; --- Observed TS ---
IF(NEWIND.NE.2) PDV=0
IF(NEWIND.NE.2) PDV=BASE
IF(FLG.EQ.2) PDV=TUMN
; --- PD according to RECIST ---
IF(NEWIND.NE.2) LOWTM=0
IF(NEWIND.NE.2) AA2=BASE
IF(PDV.GT.0) AA2=PDV
; --- Define the nadir ---
IF(TIME.EQ.0) LOWTM = BASE
IF(LOWTM.GT.PDV) LOWTM=PDV

ADIF = TUMN-LOWTM
THPD = LOWTM*1.2

IF(AA2.GE.THPD.AND.ADIF.GE.MINDIF) PD=1
IF(XNWLS.EQ.1) PD=1 ;appearance of new lesion
; --- End PD computation - Ready for next time entry ----

;Parameters
$THETA  (0,0.001) ; 1 OLAM
 (0,0.001) ; 2 OSHP
 (0,0.001) ; 3 GBAS
 (0,0.001) ; 4 GCTS
 (0,0.001) ; 5 GNWLS
 (0,0.001) ; 6 GECOG
; --- 0S ---
$OMEGA  0  FIX  ;         KG  ; placeholder
$ESTIMATION MAXEVAL=9000 PRINT=10 METH=COND LAPLACE LIKE NOABORT
            NSIG=3 SIGL=9
$COVARIANCE SLOW
$TABLE      ID TIME DV IPRED EVID FLG GROUP E0 E1 XRCTS XTUM XWTS
            XNWLS FILE=sdtab29 NOPRINT ONEHEADER

NM-TRAN MESSAGES
 WARNINGS AND ERRORS (IF ANY) FOR PROBLEM    1
 (WARNING  2) NM-TRAN INFERS THAT THE DATA ARE POPULATION.
 (WARNING  3) THERE MAY BE AN ERROR IN THE ABBREVIATED CODE. THE FOLLOWING
 ONE OR MORE RANDOM VARIABLES ARE DEFINED WITH "IF" STATEMENTS THAT DO NOT
 PROVIDE DEFINITIONS FOR BOTH THE "THEN" AND "ELSE" CASES. IF ALL
 CONDITIONS FAIL, THE VALUES OF THESE VARIABLES WILL BE ZERO.
   IPRED Y
 (WARNING  97) A RANDOM QUANTITY IS RAISED TO A POWER. IF THE RESULT AFFECTS
 THE VALUE OF THE OBJECTIVE FUNCTION, THE USER SHOULD ENSURE THAT THE
 RANDOM QUANTITY IS NEVER 0 WHEN THE POWER IS < 1.

1NONLINEAR MIXED EFFECTS MODEL PROGRAM (NONMEM) VERSION 7.3.0
 ORIGINALLY DEVELOPED BY STUART BEAL, LEWIS SHEINER, AND ALISON BOECKMANN
 CURRENT DEVELOPERS ARE ROBERT BAUER, ICON DEVELOPMENT SOLUTIONS,
 AND ALISON BOECKMANN. IMPLEMENTATION, EFFICIENCY, AND STANDARDIZATION
 PERFORMED BY NOUS INFOSYSTEMS.
 PROBLEM NO.:         1
 OS-IPP
 TOT. NO. OF OBS RECS:      336
 TOT. NO. OF INDIVIDUALS:    336
 GENERAL NONLINEAR KINETICS MODEL (ADVAN6)
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 #TBLN:      1
 #METH: Laplacian Conditional Estimation
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
 #TERM:
0MINIMIZATION SUCCESSFUL
 NO. OF FUNCTION EVALUATIONS USED:      338
 NO. OF SIG. DIGITS IN FINAL EST.:  3.9

 ETABAR IS THE ARITHMETIC MEAN OF THE ETA-ESTIMATES,
 AND THE P-VALUE IS GIVEN FOR THE NULL HYPOTHESIS THAT THE TRUE MEAN IS 0.

 ETABAR:         0.0000E+00
 SE:             0.0000E+00
 N:                     336

 P VAL.:         1.0000E+00

 ETAshrink(%):   1.0000E+02
 EBVshrink(%):   0.0000E+00
 EPSshrink(%):   1.0000E+02


 #TERE:
 Elapsed estimation time in seconds:    15.10
 Elapsed covariance time in seconds:     3.38

 ********************                         LAPLACIAN CONDITIONAL ESTIMATION                       ********************
 #OBJT:**************                       MINIMUM VALUE OF OBJECTIVE FUNCTION                      ********************
 #OBJV:********************************************     2517.690       **************************************************

 ********************                         LAPLACIAN CONDITIONAL ESTIMATION                       ********************
 ********************                             FINAL PARAMETER ESTIMATE                           ********************

 THETA - VECTOR OF FIXED EFFECTS PARAMETERS   *********
         TH 1      TH 2      TH 3      TH 4      TH 5      TH 6
         1.18E-03  2.00E+00  2.08E-01  9.04E-01  1.23E+00  5.16E-01

 OMEGA - COV MATRIX FOR RANDOM EFFECTS - ETAS  ********
            ETA1
 ETA1
+        0.00E+00

 OMEGA - CORR MATRIX FOR RANDOM EFFECTS - ETAS  *******
            ETA1
 ETA1
+        0.00E+00

 ********************                         LAPLACIAN CONDITIONAL ESTIMATION                       ********************
 ********************                            STANDARD ERROR OF ESTIMATE                          ********************

 THETA - VECTOR OF FIXED EFFECTS PARAMETERS   *********
         TH 1      TH 2      TH 3      TH 4      TH 5      TH 6
         1.02E-04  1.62E-01  6.48E-02  1.45E-01  1.58E-01  1.52E-01

 OMEGA - COV MATRIX FOR RANDOM EFFECTS - ETAS  ********
            ETA1
 ETA1
+       .........

 OMEGA - CORR MATRIX FOR RANDOM EFFECTS - ETAS  *******
            ETA1
 ETA1
+       .........

 ********************                         LAPLACIAN CONDITIONAL ESTIMATION                       ********************
 ********************                          COVARIANCE MATRIX OF ESTIMATE                         ********************

            TH 1      TH 2      TH 3      TH 4      TH 5      TH 6      OM11
 TH 1
+        1.04E-08
 TH 2
+        8.48E-06  2.63E-02
 TH 3
+       -2.97E-06 -1.36E-04  4.20E-03
 TH 4
+        5.02E-06  5.76E-03  1.11E-03  2.10E-02
 TH 5
+       -4.20E-06  9.68E-04 -1.01E-03 -5.04E-03  2.48E-02
 TH 6
+       -5.36E-06  5.27E-04  4.89E-04  4.30E-03 -4.96E-03  2.30E-02
 OM11
+       ......... ......... ......... ......... ......... ......... .........

 ********************                         LAPLACIAN CONDITIONAL ESTIMATION                       ********************
 ********************                          CORRELATION MATRIX OF ESTIMATE                        ********************

            TH 1      TH 2      TH 3      TH 4      TH 5      TH 6      OM11
 TH 1
+        1.02E-04
 TH 2
+        5.11E-01  1.62E-01
 TH 3
+       -4.49E-01 -1.29E-02  6.48E-02
 TH 4
+        3.39E-01  2.45E-01  1.18E-01  1.45E-01
 TH 5
+       -2.61E-01  3.78E-02 -9.92E-02 -2.21E-01  1.58E-01
 TH 6
+       -3.45E-01  2.14E-02  4.97E-02  1.95E-01 -2.08E-01  1.52E-01
 OM11
+       ......... ......... ......... ......... ......... ......... .........
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 #CPUT: Total CPU Time in Seconds,       18.922
