Wed Dec 16 11:09:36 EST 2015
; TTE model for OS. Weibull baseline hazard. Covariates are SLD at baseline, TSR(t) for t<= week 12 and TSR(week12) for t> week 12, appearance of new lesion (dichotomous time-varying covariate) and ECOG status at enrolment
; Parameter of the SLD(t) model were estimated previously (IPP approach)
$SIZES      LIM6=2000
$PROBLEM    OS-IPP
$INPUT      CCOM ID TIME ;day
            DV ;0 if censored,1 if death
            CB ;exposure to carboplatin (per-cycle average AUC)
            G ;exposure to gemcitabine (per-cycle average AUC)
            EVID FLG ;FLG=9 for OS data,FLG=1 for covariates-related entries
            CMT ;CMT=1 for SLD,CMT=2 for hazard of death
            NWLS ;dichotomous time-varying covariate indicating the presence of new lesions with respect to enrolment
            KG ;subjec specific tumour growth rate constant (estimated previously)
            KD0 ;subjec specific carboplatin related tumour death rate constant (estimated previously)
            KD1 ;subjec specific gemcitabine-related tumour death rate constant (estimated previously)
            IBASE ;subjec specific SLD at baseline (estimated previously)
            SLD0 ;measured SLD at enrolment
            ECOG ;measured ECOG status at enrolment
            OSCENS ;OSCENS=0 if patient died,OSCENS=1 if censoring occured
$DATA       Simulated_OS.csv IGNORE=C
$SUBROUTINE ADVAN6 TOL=3
$MODEL      COMP=(TUMOUR) COMP=(HDEATH)
$PK
; --- OS param ---
LAM = THETA(1)*EXP(ETA(1)) ;scale parameter
SHP = THETA(2) ;shape parameter
BSLD0 = THETA(3) ;parameter for SLD at enrolment
BTSR = THETA(4) ;parameter for TSR(t) (tumour size ratio)
BNWLS = THETA(5) ;parameter for NewLesion(t)
BECOG = THETA(6) ;parameter for ECOG at enrolment

; ==== SLD baseline ====
A_0(1) = IBASE*1000
MMBAS = IBASE*1000

; --- Bacward interpolation of covariates
; exposure to drug
IF(NEWIND.NE.2) OCB=CB
IF(NEWIND.NE.2) OG=G
E0 = OCB ;ng/dL*day/n days in cycle
E1 = OG ;mol/10^6 cells*day/n days in cycle ;sum Parent and active metabolite
OCB=CB
OG=G
; Appearance of new lesion
IF(NEWIND.NE.2) ONWLS=NWLS
INWLS=ONWLS
ONWLS=NWLS

; --- Time constant covariates
; Normalised SLD at enrolment
TVSLD0 = 70 ;average SLD at enrolment
NSLD0 = SLD0/TVSLD0 ;normalised SLD at enrolment
; ECOG at enrolment
IECOG=ECOG

$DES
DADT(1) = KG/1000 * A(1) - (KD0/1000 * E0 + KD1/100 * E1) * A(1)
TUM = A(1)
TSR = (TUM-MMBAS)/MMBAS
; --- OS ----
IF(T.EQ.0) THEN
	WTS=0
	TM12=0
ENDIF
IF(T.LE.84) THEN
WTS = TSR
TM12 = WTS
ELSE
WTS=WTS
ENDIF

DEL = 1E-6
DADT(2) = LAM*SHP*(LAM*(T+DEL))**(SHP-1) *EXP(BSLD0*NSLD0+BTSR*WTS+BNWLS*INWLS+BECOG*IECOG)

$ERROR
DELX = 1E-6
XTUM=A(1)
XTSR = (XTUM-MMBAS)/MMBAS
IF(TIME.EQ.0) THEN
	XWTS=0
	XTM12=0
ENDIF
IF(TIME.LE.84) THEN
	XWTS = XTSR
	XTM12=XWTS
ELSE
	XWTS=XWTS
ENDIF

;--- Death hazard ---
CHZ = A(2)
SUR=EXP(-CHZ)

HAZN = LAM*SHP*(LAM*(TIME+DELX))**(SHP-1)*EXP(BSLD0*NSLD0+BTSR*XWTS+BNWLS*INWLS+BECOG*IECOG)

IF (FLG.EQ.9.AND.EVID.EQ.0.AND.OSCENS.EQ.1) THEN
IPRED=SUR ;probability of survival (censored event)
Y = IPRED  ; Y is probability for TTE data
ENDIF
IF (FLG.EQ.9.AND.EVID.EQ.0.AND.OSCENS.EQ.0) THEN
IPRED=SUR*HAZN ;probability of event (death) at time=TIME
Y = IPRED  ; Y is probability for TTE data
ENDIF

;Parameters
$THETA  (0,0.001) ; 1 LAM
 (0,2) ; 2 SHP
 (0,0.1) ; 3 BSLD0
 (0,0.1) ; 4 BTSR
 (0,0.1) ; 5 BNWLS
 (0,0.1) ; 6 BECOG
; --- 0S ---
$OMEGA  0  FIX  ;         KG  ; placeholder
$ESTIMATION MAXEVAL=9000 PRINT=10 METH=COND LAPLACE LIKE NOABORT
            NSIG=3 SIGL=9
$COVARIANCE SLOW
$TABLE      ID TIME DV IPRED EVID FLG XWTS FILE=sdtab_OS NOPRINT
            ONEHEADER

NM-TRAN MESSAGES
 WARNINGS AND ERRORS (IF ANY) FOR PROBLEM    1
 (WARNING  2) NM-TRAN INFERS THAT THE DATA ARE POPULATION.
 (WARNING  3) THERE MAY BE AN ERROR IN THE ABBREVIATED CODE. THE FOLLOWING
 ONE OR MORE RANDOM VARIABLES ARE DEFINED WITH "IF" STATEMENTS THAT DO NOT
 PROVIDE DEFINITIONS FOR BOTH THE "THEN" AND "ELSE" CASES. IF ALL
 CONDITIONS FAIL, THE VALUES OF THESE VARIABLES WILL BE ZERO.
   IPRED Y
 (WARNING  97) A RANDOM QUANTITY IS RAISED TO A POWER. IF THE RESULT AFFECTS
 THE VALUE OF THE OBJECTIVE FUNCTION, THE USER SHOULD ENSURE THAT THE
 RANDOM QUANTITY IS NEVER 0 WHEN THE POWER IS < 1.

1NONLINEAR MIXED EFFECTS MODEL PROGRAM (NONMEM) VERSION 7.3.0
 ORIGINALLY DEVELOPED BY STUART BEAL, LEWIS SHEINER, AND ALISON BOECKMANN
 CURRENT DEVELOPERS ARE ROBERT BAUER, ICON DEVELOPMENT SOLUTIONS,
 AND ALISON BOECKMANN. IMPLEMENTATION, EFFICIENCY, AND STANDARDIZATION
 PERFORMED BY NOUS INFOSYSTEMS.
 PROBLEM NO.:         1
 OS-IPP
 TOT. NO. OF OBS RECS:      336
 TOT. NO. OF INDIVIDUALS:    336
 GENERAL NONLINEAR KINETICS MODEL (ADVAN6)
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 #TBLN:      1
 #METH: Laplacian Conditional Estimation
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
 #TERM:
0MINIMIZATION SUCCESSFUL
 NO. OF FUNCTION EVALUATIONS USED:      203
 NO. OF SIG. DIGITS IN FINAL EST.:  3.9

 ETABAR IS THE ARITHMETIC MEAN OF THE ETA-ESTIMATES,
 AND THE P-VALUE IS GIVEN FOR THE NULL HYPOTHESIS THAT THE TRUE MEAN IS 0.

 ETABAR:         0.0000E+00
 SE:             0.0000E+00
 N:                     336

 P VAL.:         1.0000E+00

 ETAshrink(%):   1.0000E+02
 EBVshrink(%):   0.0000E+00
 EPSshrink(%):   1.0000E+02


 #TERE:
 Elapsed estimation time in seconds:     5.14
 Elapsed covariance time in seconds:     2.14

 ********************                         LAPLACIAN CONDITIONAL ESTIMATION                       ********************
 #OBJT:**************                       MINIMUM VALUE OF OBJECTIVE FUNCTION                      ********************
 #OBJV:********************************************     2608.873       **************************************************

 ********************                         LAPLACIAN CONDITIONAL ESTIMATION                       ********************
 ********************                             FINAL PARAMETER ESTIMATE                           ********************

 THETA - VECTOR OF FIXED EFFECTS PARAMETERS   *********
         TH 1      TH 2      TH 3      TH 4      TH 5      TH 6
         1.29E-03  2.67E+00  1.82E-01  1.07E+00  3.59E-01  6.97E-01

 OMEGA - COV MATRIX FOR RANDOM EFFECTS - ETAS  ********
            ETA1
 ETA1
+        0.00E+00

 OMEGA - CORR MATRIX FOR RANDOM EFFECTS - ETAS  *******
            ETA1
 ETA1
+        0.00E+00

 ********************                         LAPLACIAN CONDITIONAL ESTIMATION                       ********************
 ********************                            STANDARD ERROR OF ESTIMATE                          ********************

 THETA - VECTOR OF FIXED EFFECTS PARAMETERS   *********
         TH 1      TH 2      TH 3      TH 4      TH 5      TH 6
         7.77E-05  1.26E-01  7.79E-02  1.90E-01  1.85E-01  1.58E-01

 OMEGA - COV MATRIX FOR RANDOM EFFECTS - ETAS  ********
            ETA1
 ETA1
+       .........

 OMEGA - CORR MATRIX FOR RANDOM EFFECTS - ETAS  *******
            ETA1
 ETA1
+       .........

 ********************                         LAPLACIAN CONDITIONAL ESTIMATION                       ********************
 ********************                          COVARIANCE MATRIX OF ESTIMATE                         ********************

            TH 1      TH 2      TH 3      TH 4      TH 5      TH 6      OM11
 TH 1
+        6.04E-09
 TH 2
+        4.41E-07  1.60E-02
 TH 3
+       -3.83E-06  9.20E-04  6.07E-03
 TH 4
+        4.82E-06  3.38E-03 -4.28E-04  3.61E-02
 TH 5
+       -4.87E-06  2.75E-03  1.28E-03  1.67E-03  3.41E-02
 TH 6
+       -4.85E-06  4.61E-03 -5.20E-04  7.98E-04  3.36E-03  2.50E-02
 OM11
+       ......... ......... ......... ......... ......... ......... .........

 ********************                         LAPLACIAN CONDITIONAL ESTIMATION                       ********************
 ********************                          CORRELATION MATRIX OF ESTIMATE                        ********************

            TH 1      TH 2      TH 3      TH 4      TH 5      TH 6      OM11
 TH 1
+        7.77E-05
 TH 2
+        4.49E-02  1.26E-01
 TH 3
+       -6.32E-01  9.35E-02  7.79E-02
 TH 4
+        3.26E-01  1.41E-01 -2.90E-02  1.90E-01
 TH 5
+       -3.39E-01  1.18E-01  8.90E-02  4.77E-02  1.85E-01
 TH 6
+       -3.95E-01  2.31E-01 -4.22E-02  2.66E-02  1.15E-01  1.58E-01
 OM11
+       ......... ......... ......... ......... ......... ......... .........
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 #CPUT: Total CPU Time in Seconds,        7.635
