Tue Oct 11 16:21:04 CEST 2016
;Rerun with NM 7.3
;Jönsson S, Davidse A, Wilkins J, Van der Walt JS, Simonsson US, Karlsson MO, Smith P, McIlleron H.
;Population pharmacokinetics of ethambutol in South African tuberculosis patients.
;Antimicrob Agents Chemother. 2011 Sep;55(9):4230-7. doi: 10.1128/AAC.00274-11.
$PROBLEM    EMB (log) - two compartments,IIV lag time and V3
$INPUT      ID STID=DROP DAY=DROP RATE=DROP OT1=DROP OT2=DROP TIME ODV
            DV MDV AMT ADDL II EVID AGE SEX=DROP WT HT=DROP BMI=DROP
            RACE SMOK=DROP ALC=DROP DPKG=DROP HIV HB=DROP HCT=DROP
            RBC=DROP MCV=DROP WBC=DROP AP=DROP LNAP ALT=DROP AST=DROP
            CRT=DROP TBIL=DROP UREA=DROP FDC LOC CLCR BSA=DROP
            INHP=DROP PZAP=DROP CLC2=DROP OCC DOS=DROP NDOS=DROP
            DTIM=DROP TAD=DROP TAD2
$DATA      emb10dosforscmtadMinusLOQ.csv IGNORE=@
$SUBROUTINE ADVAN5 TRANS1
$MODEL      NCOMP=4 COMP=(TRANSIT) COMP=(ABS) COMP=(CENTRAL)
            COMP=(PERIPH)
$PK
    OC1   = 0
    OC2   = 0
    OC3   = 0
    OC4   = 0

    IF(OCC.EQ.1) OC1 = 1
    IF(OCC.EQ.2) OC2 = 1
    IF(OCC.EQ.3) OC3 = 1
    IF(OCC.EQ.4) OC4 = 1

    TVCL  = THETA(1)*(WT/50)**0.75
    TVV2  = THETA(2)*(WT/50)**1
    TVKA  = THETA(3)
    TVV3  = THETA(6)*(WT/50)**1
    TVQ   = THETA(7)*(WT/50)**0.75
    TVMTT = THETA(8)

    FCOV = 1
    IF(HIV.EQ.1) FCOV = 1 + THETA(9)

    CL    = TVCL*EXP(ETA(1)+OC1*ETA(7)+OC2*ETA(8)+OC3*ETA(9)+OC4*ETA(10))
    V2    = TVV2*EXP(ETA(2))
    KA    = TVKA*EXP(ETA(3))
    V3    = TVV3*EXP(ETA(4))
    Q     = TVQ*EXP(ETA(5))
    F1    = 1*FCOV
    MTT = TVMTT * EXP(ETA(6))
    KTR = 1/MTT

  K12 = KTR
  K23 = KA
  K34 = Q/V2
  K43 = Q/V3
  K30 = CL/V2
  S3 = V2

$ERROR  (ONLY OBSERVATIONS)
    IF (F.EQ.0) THEN
      IPRED = 0
    ELSE
      IPRED = LOG(F)
    ENDIF
    IRES = DV - IPRED
    W = SQRT(THETA(4)**2 + (THETA(5)/(F+.0001))**2)
    IF (W.EQ.0) W = 1
    IWRES = IRES / W
    Y = IPRED + W * EPS(1)

$THETA  (0,40.90000) ; 1CL
 (0,139.0000) ; 2V
 (0,0.505000) ; 3KA
 (0,0.314000) ; 4Prop error
 (0,0.120000) ; 5Add error
 (0,1110.000) ; 6V3
 (0,28.50000) ; 7Q
 (0,0.359000) ; 8MTT
 (-1,-0.15500) ; 9FCOV
$OMEGA  0.040800  ;       1CL_
 0  FIX  ;        2V2
 0.366000  ;       3KA_
 0  FIX  ;        4V3
 0  FIX  ;         5Q
 0.702000  ;       6MTT
$OMEGA  BLOCK(1)
 0.203000  ;    7IOV-CL
$OMEGA  BLOCK(1) SAME
$OMEGA  BLOCK(1) SAME
$OMEGA  BLOCK(1) SAME
$SIGMA  1  FIX
$ESTIMATION METHOD=1 INTER NOABORT PRINT=2 MAXEVAL=9999 MSFO=msfb32150
$COVARIANCE

NM-TRAN MESSAGES
 WARNINGS AND ERRORS (IF ANY) FOR PROBLEM    1
 (WARNING  2) NM-TRAN INFERS THAT THE DATA ARE POPULATION.

1NONLINEAR MIXED EFFECTS MODEL PROGRAM (NONMEM) VERSION 7.3.0
 ORIGINALLY DEVELOPED BY STUART BEAL, LEWIS SHEINER, AND ALISON BOECKMANN
 CURRENT DEVELOPERS ARE ROBERT BAUER, ICON DEVELOPMENT SOLUTIONS,
 AND ALISON BOECKMANN. IMPLEMENTATION, EFFICIENCY, AND STANDARDIZATION
 PERFORMED BY NOUS INFOSYSTEMS.
 PROBLEM NO.:         1
 EMB (log) - two compartments,IIV lag time and V3
 TOT. NO. OF OBS RECS:     1869
 TOT. NO. OF INDIVIDUALS:    189
 GENERAL LINEAR KINETICS MODEL (ADVAN5)
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 #TBLN:      1
 #METH: First Order Conditional Estimation with Interaction
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
 #TERM:
0MINIMIZATION SUCCESSFUL
 NO. OF FUNCTION EVALUATIONS USED:      442
 NO. OF SIG. DIGITS IN FINAL EST.:  3.5

 ETABAR IS THE ARITHMETIC MEAN OF THE ETA-ESTIMATES,
 AND THE P-VALUE IS GIVEN FOR THE NULL HYPOTHESIS THAT THE TRUE MEAN IS 0.

 ETABAR:         2.9177E-03  0.0000E+00  2.5465E-02  0.0000E+00  0.0000E+00  4.5077E-02  7.3909E-03  6.4136E-03 -7.9956E-03  3.9691E-03
 SE:             7.2413E-03  0.0000E+00  1.6933E-02  0.0000E+00  0.0000E+00  5.2520E-02  1.8477E-02  1.4005E-02  9.7574E-03  5.6104E-03
 N:                     189         189         189         189         189         189         189         189         189         189

 P VAL.:         6.8701E-01  1.0000E+00  1.3261E-01  1.0000E+00  1.0000E+00  3.9073E-01  6.8915E-01  6.4700E-01  4.1253E-01  4.7928E-01

 ETAshrink(%):   4.8836E+01  1.0000E+02  4.0225E+01  1.0000E+02  1.0000E+02  2.2005E+01  2.8686E+01  4.5945E+01  6.2340E+01  7.8346E+01
 EBVshrink(%):   4.8831E+01  0.0000E+00  3.8887E+01  0.0000E+00  0.0000E+00  1.9640E+01  1.9653E+01  6.6721E+01  6.3971E+01  6.8486E+01
 EPSshrink(%):   1.1836E+01

 #TERE:
 Elapsed estimation time in seconds:  1524.56
 Elapsed covariance time in seconds:  2078.35

 ********************               FIRST ORDER CONDITIONAL ESTIMATION WITH INTERACTION              ********************
 #OBJT:**************                       MINIMUM VALUE OF OBJECTIVE FUNCTION                      ********************
 #OBJV:********************************************    -1255.220       **************************************************

 ********************               FIRST ORDER CONDITIONAL ESTIMATION WITH INTERACTION              ********************
 ********************                             FINAL PARAMETER ESTIMATE                           ********************

 THETA - VECTOR OF FIXED EFFECTS PARAMETERS   *********
         TH 1      TH 2      TH 3      TH 4      TH 5      TH 6      TH 7      TH 8      TH 9
         3.99E+01  8.23E+01  4.74E-01  3.18E-01  1.07E-01  6.24E+02  3.43E+01  7.90E-01 -1.54E-01

 OMEGA - COV MATRIX FOR RANDOM EFFECTS - ETAS  ********
            ETA1      ETA2      ETA3      ETA4      ETA5      ETA6      ETA7      ETA8      ETA9      ET10
 ETA1
+        3.81E-02
 ETA2
+        0.00E+00  0.00E+00
 ETA3
+        0.00E+00  0.00E+00  1.52E-01
 ETA4
+        0.00E+00  0.00E+00  0.00E+00  0.00E+00
 ETA5
+        0.00E+00  0.00E+00  0.00E+00  0.00E+00  0.00E+00
 ETA6
+        0.00E+00  0.00E+00  0.00E+00  0.00E+00  0.00E+00  8.62E-01
 ETA7
+        0.00E+00  0.00E+00  0.00E+00  0.00E+00  0.00E+00  0.00E+00  1.28E-01
 ETA8
+        0.00E+00  0.00E+00  0.00E+00  0.00E+00  0.00E+00  0.00E+00  0.00E+00  1.28E-01
 ETA9
+        0.00E+00  0.00E+00  0.00E+00  0.00E+00  0.00E+00  0.00E+00  0.00E+00  0.00E+00  1.28E-01
 ET10
+        0.00E+00  0.00E+00  0.00E+00  0.00E+00  0.00E+00  0.00E+00  0.00E+00  0.00E+00  0.00E+00  1.28E-01

 SIGMA - COV MATRIX FOR RANDOM EFFECTS - EPSILONS  ****
            EPS1
 EPS1
+        1.00E+00

 OMEGA - CORR MATRIX FOR RANDOM EFFECTS - ETAS  *******
            ETA1      ETA2      ETA3      ETA4      ETA5      ETA6      ETA7      ETA8      ETA9      ET10
 ETA1
+        1.95E-01
 ETA2
+        0.00E+00  0.00E+00
 ETA3
+        0.00E+00  0.00E+00  3.90E-01
 ETA4
+        0.00E+00  0.00E+00  0.00E+00  0.00E+00
 ETA5
+        0.00E+00  0.00E+00  0.00E+00  0.00E+00  0.00E+00
 ETA6
+        0.00E+00  0.00E+00  0.00E+00  0.00E+00  0.00E+00  9.28E-01
 ETA7
+        0.00E+00  0.00E+00  0.00E+00  0.00E+00  0.00E+00  0.00E+00  3.57E-01
 ETA8
+        0.00E+00  0.00E+00  0.00E+00  0.00E+00  0.00E+00  0.00E+00  0.00E+00  3.57E-01
 ETA9
+        0.00E+00  0.00E+00  0.00E+00  0.00E+00  0.00E+00  0.00E+00  0.00E+00  0.00E+00  3.57E-01
 ET10
+        0.00E+00  0.00E+00  0.00E+00  0.00E+00  0.00E+00  0.00E+00  0.00E+00  0.00E+00  0.00E+00  3.57E-01

 SIGMA - CORR MATRIX FOR RANDOM EFFECTS - EPSILONS  ***
            EPS1
 EPS1
+        1.00E+00

 ********************               FIRST ORDER CONDITIONAL ESTIMATION WITH INTERACTION              ********************
 ********************                            STANDARD ERROR OF ESTIMATE                          ********************

 THETA - VECTOR OF FIXED EFFECTS PARAMETERS   *********
         TH 1      TH 2      TH 3      TH 4      TH 5      TH 6      TH 7      TH 8      TH 9
         1.23E+00  3.47E+01  1.12E-01  1.39E-02  1.99E-02  1.39E+02  3.63E+00  1.40E-01  6.22E-02

 OMEGA - COV MATRIX FOR RANDOM EFFECTS - ETAS  ********
            ETA1      ETA2      ETA3      ETA4      ETA5      ETA6      ETA7      ETA8      ETA9      ET10
 ETA1
+        2.18E-02
 ETA2
+       ......... .........
 ETA3
+       ......... .........  1.23E-01
 ETA4
+       ......... ......... ......... .........
 ETA5
+       ......... ......... ......... ......... .........
 ETA6
+       ......... ......... ......... ......... .........  1.69E-01
 ETA7
+       ......... ......... ......... ......... ......... .........  5.72E-02
 ETA8
+       ......... ......... ......... ......... ......... ......... ......... .........
 ETA9
+       ......... ......... ......... ......... ......... ......... ......... ......... .........
 ET10
+       ......... ......... ......... ......... ......... ......... ......... ......... ......... .........

 SIGMA - COV MATRIX FOR RANDOM EFFECTS - EPSILONS  ****
            EPS1
 EPS1
+       .........

 OMEGA - CORR MATRIX FOR RANDOM EFFECTS - ETAS  *******
            ETA1      ETA2      ETA3      ETA4      ETA5      ETA6      ETA7      ETA8      ETA9      ET10
 ETA1
+        5.57E-02
 ETA2
+       ......... .........
 ETA3
+       ......... .........  1.58E-01
 ETA4
+       ......... ......... ......... .........
 ETA5
+       ......... ......... ......... ......... .........
 ETA6
+       ......... ......... ......... ......... .........  9.13E-02
 ETA7
+       ......... ......... ......... ......... ......... .........  8.01E-02
 ETA8
+       ......... ......... ......... ......... ......... ......... ......... .........
 ETA9
+       ......... ......... ......... ......... ......... ......... ......... ......... .........
 ET10
+       ......... ......... ......... ......... ......... ......... ......... ......... ......... .........

 SIGMA - CORR MATRIX FOR RANDOM EFFECTS - EPSILONS  ***
            EPS1
 EPS1
+       .........
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 #CPUT: Total CPU Time in Seconds,     3603.057
