03/05/2017
15:02
$SIZES LIM4=20000 LIM15=20000
$PROB  LEV Adult Pediatrics Daily and Average Counts Model; runP241

;Negative binomial with Markovian aspects using PDV
;Ahn-type dependency on previous seizures
;Emax CE
;Eta on Emax
;WITH Eta on OVDP for children
;Box-Cox on baseline rates
;mixture on drug effect
;change to pediatric subjects:
; baseline seizure frequency
;without subjects with baseline seizures below 2/4weeks

$DATA  PDLEV0258_150325.csv IGNORE=@
$INPUT
 STD ID VISIT DAYS DV NDAYS DOSE RND Q2 PDV1 PDV AGE WT HT SEX
 PED BASE LBAS CL CAV FLGDV7 FLGDV8 FLGDV9 FLGDV10
$DATA IGNORE=(FLGDV7.NE.0)
$DATA IGNORE=(FLGDV8.NE.0)
$DATA IGNORE=(FLGDV9.NE.0)
$DATA IGNORE=(FLGDV10.NE.0)

$CONTR DATA=(LBAS,PED)

$PRED
   TVLS00  = THETA(1)
   TVES50  = THETA(2)
   TVLSMAX = THETA(3)
   TVLPLAC = THETA(4)
   TVLEMAX = THETA(5)
   TVLEC50 = THETA(6)
   TVOVDP  = THETA(7)
   SHP1    = THETA(8)
   LS00P   = THETA(11)
   LPLACP  = THETA(12)
   LEMAXP  = THETA(13)
   LEC50P  = THETA(14)

;Box-Cox baseline eta
   TETA1   = (EXP(ETA(1))**SHP1-1)/SHP1
   LS00    = TVLS00+TETA1+PED*LS00P

   ES50    = TVES50
   LSMAX   = TVLSMAX+ETA(2)
   LS0     = LS00+PED*LSMAX*PDV/(ES50+PDV)
   LPLAC   = TVLPLAC+ETA(3)+PED*LPLACP
   LEMAX   = TVLEMAX*EXP(ETA(4))+PED*LEMAXP
   LEC50   = TVLEC50+PED*LEC50P
   LEFF    = LEMAX*CAV/(EXP(LEC50)+CAV)

   IF (MIXNUM.EQ.2) THEN
     LTRTE = LPLAC
   ELSE
     LTRTE = LPLAC+LEFF
   ENDIF

   EST     = MIXEST

   LE      = LS0+Q2*LTRTE
   LAMB    = EXP(LE)*NDAYS
   OVDP    = EXP(TVOVDP+PED*ETA(5))
   IF (OVDP.LT.0.0001) OVDP=0.0001
   AGM1    = (OVDP+1)/OVDP
   AGM2    =  DV+1+(1/OVDP)
   PREC1   = (1+(1/(12*AGM1)))
   PREC2   = (1+(1/(12*AGM2)))
   LFAC1   = (AGM1+0.5)*LOG(AGM1)-AGM1+0.5*LOG(6.283185)+PREC1
   LFAC2   = (AGM2+0.5)*LOG(AGM2)-AGM2+0.5*LOG(6.283185)+PREC2
   LGAM1   =  LOG(OVDP)+LOG(OVDP/(1+OVDP))+LFAC1
   LGAM2   = -LOG(DV+(1/OVDP))-LOG(DV+1+(1/OVDP))+LFAC2
   TRM1    = (1/OVDP)*LOG(1+(OVDP*LAMB))
   TRM2    =  DV*LOG(LAMB/(LAMB+(1/OVDP)))

; MODIFIED STIRLING'S APPROXIMATION
 IF (DV.GT.0) THEN
     LDVFAC=(DV+0.5)*LOG(DV)-DV+0.5*LOG(6.283185)+LOG(1+(1/(12*DV)))
 ELSE
     LDVFAC=0
 ENDIF

;Negative binomial:
   Y = -2*(LGAM2-LGAM1-LDVFAC-TRM1+TRM2)

$MIX
   NSPOP=2
   P1PHI=LOG(THETA(9)/(1-THETA(9)))

   COV1=PED*THETA(10)
   P1=EXP(P1PHI+COV1)/(1+EXP(P1PHI+COV1))

   P(1) = P1

P(2) = 1-P1

$THETA -1.1             ;log E0
$THETA (0,2.8)          ;ES50
$THETA (0.1,1.3)        ;logP Smax
$THETA -0.16            ;logP Placebo effect
$THETA -3.1             ;logP Emax
$THETA  3.5             ;log EC50 (mg/L)
$THETA -2.2             ;log Overdispersion Alpha
$THETA  0.44            ;Box-Cox on baseline seizure rate
$THETA (0.01,0.35,0.99) ;mixture fraction
$THETA 0 FIXED          ;Peds on P1
$THETA 0.4              ;logP Peds on E0
$THETA 0 FIXED          ;logP Peds on Placebo effect
$THETA 0 FIXED          ;logP Peds on Emax
$THETA 0 FIXED          ;logP Peds on EC50

$OMEGA 0.8 1.5 0.2 0.7 10

$EST PRINT=10 MAXEVALS=9999 METHOD=COND NOABORT LAPLACE -2LL
$COV PRINT=E UNCONDITIONAL
$TABLE STD ID VISIT DAYS DV NDAYS DOSE RND Q2 PDV1 PDV AGE WT HT SEX
       PED BASE LBAS CL CAV
       OVDP LS00 ES50 LSMAX LPLAC LEMAX LAMB
       ETA1 ETA2 ETA3 ETA4 ETA5 EST
       ONEHEADER NOPRINT NOAPPEND FILE=runP241.csv

NM-TRAN MESSAGES
 WARNINGS AND ERRORS (IF ANY) FOR PROBLEM    1
 (WARNING  2) NM-TRAN INFERS THAT THE DATA ARE POPULATION.
 (WARNING  97) A RANDOM QUANTITY IS RAISED TO A POWER. IF THE RESULT AFFECTS
 THE VALUE OF THE OBJECTIVE FUNCTION, THE USER SHOULD ENSURE THAT THE
 RANDOM QUANTITY IS NEVER 0 WHEN THE POWER IS < 1.
 (WARNING  13) WITH USER-WRITTEN PRED OR $PRED, NM-TRAN CANNOT APPEND THE
 MDV DATA ITEM.

1NONLINEAR MIXED EFFECTS MODEL PROGRAM (NONMEM) VERSION 7.3.0
 ORIGINALLY DEVELOPED BY STUART BEAL, LEWIS SHEINER, AND ALISON BOECKMANN
 CURRENT DEVELOPERS ARE ROBERT BAUER, ICON DEVELOPMENT SOLUTIONS,
 AND ALISON BOECKMANN. IMPLEMENTATION, EFFICIENCY, AND STANDARDIZATION
 PERFORMED BY NOUS INFOSYSTEMS.
 PROBLEM NO.:         1
 LEV Adult Pediatrics Daily and Average Counts Model; runP241
 TOT. NO. OF OBS RECS:    39065
 TOT. NO. OF INDIVIDUALS:   1094
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 #TBLN:      1
 #METH: Laplacian Conditional Estimation
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
 #TERM:
0MINIMIZATION SUCCESSFUL
 NO. OF FUNCTION EVALUATIONS USED:      474
 NO. OF SIG. DIGITS IN FINAL EST.:  3.6

 ETABAR IS THE ARITHMETIC MEAN OF THE ETA-ESTIMATES,
 AND SE IS THE ASSOCIATED STANDARD ERROR.

 SUBMODEL    1

 ETABAR:        -1.2382E-01  1.7504E-02 -3.3087E-02  3.4291E-01  1.3097E-01
 SE:             5.0886E-02  2.7873E-02  1.5916E-02  3.7206E-02  7.2645E-02
 N:                     210         210         210         210         210

 ETAshrink(%):   1.4952E+01  6.6201E+01  4.3233E+01  3.2462E+01  6.3735E+01
 EBVshrink(%):   6.6366E+00  7.0842E+01  5.3448E+01  1.4562E+01  6.5194E+01
 EPSshrink(%):   1.0000E+02


 SUBMODEL    2

 ETABAR:         8.1673E-02 -1.0983E-02 -5.1995E-03  0.0000E+00  7.9697E-02
 SE:             2.7044E-02  1.4419E-02  9.6277E-03  0.0000E+00  3.5286E-02
 N:                     884         884         884           0         884

 ETAshrink(%):   7.4305E+00  6.4193E+01  2.9677E+01  1.0000E+02  6.3924E+01
 EBVshrink(%):   4.5401E+00  6.2993E+01  2.3641E+01  1.0000E+02  6.0008E+01
 EPSshrink(%):   1.0000E+02


 #TERE:
 Elapsed estimation time in seconds:   589.07
 Elapsed covariance time in seconds:  1018.30

 ********************                         LAPLACIAN CONDITIONAL ESTIMATION                       ********************
 #OBJT:**************                       MINIMUM VALUE OF OBJECTIVE FUNCTION                      ********************
 #OBJV:********************************************   117344.619       **************************************************

 ********************                         LAPLACIAN CONDITIONAL ESTIMATION                       ********************
 ********************                             FINAL PARAMETER ESTIMATE                           ********************

 THETA - VECTOR OF FIXED EFFECTS PARAMETERS   *********
         TH 1      TH 2      TH 3      TH 4      TH 5      TH 6      TH 7      TH 8      TH 9      TH10      TH11      TH12
          TH13      TH14
        -1.09E+00  2.75E+00  1.28E+00 -1.60E-01 -3.13E+00  3.45E+00 -2.24E+00  4.42E-01  3.35E-01  0.00E+00  4.20E-01  0.00E+00
          0.00E+00  0.00E+00

 OMEGA - COV MATRIX FOR RANDOM EFFECTS - ETAS  ********
            ETA1      ETA2      ETA3      ETA4      ETA5
 ETA1
+        7.55E-01
 ETA2
+        0.00E+00  1.44E+00
 ETA3
+        0.00E+00  0.00E+00  1.66E-01
 ETA4
+        0.00E+00  0.00E+00  0.00E+00  6.40E-01
 ETA5
+        0.00E+00  0.00E+00  0.00E+00  0.00E+00  8.47E+00

 OMEGA - CORR MATRIX FOR RANDOM EFFECTS - ETAS  *******
            ETA1      ETA2      ETA3      ETA4      ETA5
 ETA1
+        8.69E-01
 ETA2
+        0.00E+00  1.20E+00
 ETA3
+        0.00E+00  0.00E+00  4.07E-01
 ETA4
+        0.00E+00  0.00E+00  0.00E+00  8.00E-01
 ETA5
+        0.00E+00  0.00E+00  0.00E+00  0.00E+00  2.91E+00

 ********************                         LAPLACIAN CONDITIONAL ESTIMATION                       ********************
 ********************                            STANDARD ERROR OF ESTIMATE                          ********************

 THETA - VECTOR OF FIXED EFFECTS PARAMETERS   *********
         TH 1      TH 2      TH 3      TH 4      TH 5      TH 6      TH 7      TH 8      TH 9      TH10      TH11      TH12
          TH13      TH14
         2.88E-02  3.71E-02  8.98E-03  1.76E-02  1.04E+00  6.42E-01  8.03E-02  3.13E-02  4.07E-02 .........  5.32E-02 .........
         ......... .........

 OMEGA - COV MATRIX FOR RANDOM EFFECTS - ETAS  ********
            ETA1      ETA2      ETA3      ETA4      ETA5
 ETA1
+        4.14E-02
 ETA2
+       .........  3.06E-01
 ETA3
+       ......... .........  2.54E-02
 ETA4
+       ......... ......... .........  1.21E-01
 ETA5
+       ......... ......... ......... .........  9.23E-01

 OMEGA - CORR MATRIX FOR RANDOM EFFECTS - ETAS  *******
            ETA1      ETA2      ETA3      ETA4      ETA5
 ETA1
+        2.38E-02
 ETA2
+       .........  1.28E-01
 ETA3
+       ......... .........  3.12E-02
 ETA4
+       ......... ......... .........  7.56E-02
 ETA5
+       ......... ......... ......... .........  1.59E-01
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
 ********************                         LAPLACIAN CONDITIONAL ESTIMATION                       ********************
 ********************                      EIGENVALUES OF COR MATRIX OF ESTIMATE                     ********************

             1         2         3         4         5         6         7         8         9        10        11        12
             13        14        15
         2.77E-02  1.25E-01  3.02E-01  3.61E-01  4.46E-01  5.31E-01  6.35E-01  7.01E-01  7.52E-01  1.02E+00  1.18E+00  1.62E+00
          1.79E+00  2.42E+00  3.09E+00
 #CPUT: Total CPU Time in Seconds,     1620.312
