20/06/2017
15:01

$PROBLEM Log_normal model. runCOMPEV1_101.

$INPUT ID AGE NEUT PRE_TRE MAX_LEG AUC CMAX DBLOCK TIME DV DVID EVID
AGE_CAT NEUT_CAT PRE_TR_C MAX_CAT AUC_CAT CMAX_CAT

$DATA Simulated_event_data.csv
ACCEPT=(DVID.EQ.3,DVID.EQ.0)                                                        ; Select which DVID to accept

$SUBROUTINE ADVAN13 TRANS1 TOL=9

$MODEL NCOMPARTMENTS=1
       COMP=(CPT1)      	; TTE model

$PK

CENSORING = 2

IF (NEWIND.LE.1) SURVZ  = 1   		                ; Survival(0)=1 [we use this variable for storing survival function at start of observation interval for interval censored data]

;;;;;;;;;;;;;;;;;;;;; Start of TTE model ;;;;;;;;;;;;;;;;;;;;;;;;;;;;;;;;;;;;;;;;;;;;;;;;;;;;;;;;;;;;;;;

lambda      = THETA(1)*exp(ETA(1))
alpha	    = THETA(2)

pi  = 3.1415927
fac = (2*pi)**0.5

DEL = 1E-8

VAL          = EXP((THETA(3)/1000)*(AGE-55))

$DES

num = log((T+DEL)/alpha)

pdf = (1.0/(fac*lambda*(T+DEL)))*exp(-(num**2)/(2*lambda*lambda))
DADT(1)  = VAL*pdf/(1-phi(num/lambda))

$ERROR

CHAZ = A(1)				; cumulative hazard
SURV = EXP(-CHAZ)  			; probability of surviving to or beyond current time

num1 = log((TIME+DEL)/alpha)

pdf1 = (1.0/(fac*lambda*(TIME+DEL)))*exp(-(num1**2)/(2*lambda*lambda))
HAZNOW = VAL*pdf1/(1-phi(num1/lambda))


;;;;;;;;;; Right censoring only ;;;;;;;;;;;;;;;;;

CS=0
IF (CENSORING.EQ.1.AND.DV.EQ.-1.AND.TIME.GT.0) CS=1                                  ; CS=1 for right censored events
IF (CENSORING.EQ.1.AND.TIME.GT.0) Y = (1 - CS)*HAZNOW*SURV + CS*SURV                 ; for right censored events the likelihood of event at this time or greater is the survival function
					                                             ; for non-censored events the likelihood of event at this time is (hazard function)*(survival function)
;;;;;;;;;; End ;;;;;;;;;;;;;;;;;;;;;;;;;;;;;;;;;;;;;

;;;;;;;;;; Right + interval censoring ;;;;;;;;;;;;;;;;;;;;;;

IF (CENSORING.EQ.2.AND.DV.EQ.-1) Y=SURV

IF (CENSORING.EQ.2.AND.DV.EQ.2) SURVZ=SURV

IF (CENSORING.EQ.2.AND.DV.NE.2) SURVZ=SURVZ

IF (CENSORING.EQ.2.AND.DV.EQ.3) Y=SURVZ-SURV

;;;;;;;;;; End ;;;;;;;;;;;;;;;;;;;;;;;;;;;;;;;;;;;;;;;;;;;;;;;


$THETA
(0,1 )
(0,1 )
(-10000,1,10000)

$OMEGA
0 FIX


$EST MAXEVAL=9999 METHOD=COND LAPLACE NUMERICAL LIKE SLOW NOABORT NOTHETABOUNDTEST NSIG=3 SIGL=9 PRINT=5 MSFO=runCOMPEV1_101.txt

$COV PRINT=E

$TABLE ID AGE NEUT PRE_TRE MAX_LEG AUC CMAX DBLOCK TIME DV DVID EVID
AGE_CAT NEUT_CAT PRE_TR_C MAX_CAT AUC_CAT CMAX_CAT
SURV CHAZ HAZNOW FORMAT=s1PE18.9 NOPRINT ONEHEADER FILE=runCOMPEV1_101.tab

NM-TRAN MESSAGES
 WARNINGS AND ERRORS (IF ANY) FOR PROBLEM    1
 (WARNING  2) NM-TRAN INFERS THAT THE DATA ARE POPULATION.
 (WARNING  3) THERE MAY BE AN ERROR IN THE ABBREVIATED CODE. THE FOLLOWING
 ONE OR MORE RANDOM VARIABLES ARE DEFINED WITH "IF" STATEMENTS THAT DO NOT
 PROVIDE DEFINITIONS FOR BOTH THE "THEN" AND "ELSE" CASES. IF ALL
 CONDITIONS FAIL, THE VALUES OF THESE VARIABLES WILL BE ZERO.
   Y

1NONLINEAR MIXED EFFECTS MODEL PROGRAM (NONMEM) VERSION 7.3.0
 ORIGINALLY DEVELOPED BY STUART BEAL, LEWIS SHEINER, AND ALISON BOECKMANN
 CURRENT DEVELOPERS ARE ROBERT BAUER, ICON DEVELOPMENT SOLUTIONS,
 AND ALISON BOECKMANN. IMPLEMENTATION, EFFICIENCY, AND STANDARDIZATION
 PERFORMED BY NOUS INFOSYSTEMS.
 PROBLEM NO.:         1
 Log_normal model. runCOMPEV1_101.
 TOT. NO. OF OBS RECS:      236
 TOT. NO. OF INDIVIDUALS:    200
 GENERAL NONLINEAR KINETICS MODEL USING LSODA (ADVAN13)
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 #TBLN:      1
 #METH: Laplacian Conditional Estimation
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
 #TERM:
0MINIMIZATION SUCCESSFUL
 NO. OF FUNCTION EVALUATIONS USED:      134
 NO. OF SIG. DIGITS IN FINAL EST.:  4.2

 ETABAR IS THE ARITHMETIC MEAN OF THE ETA-ESTIMATES,
 AND THE P-VALUE IS GIVEN FOR THE NULL HYPOTHESIS THAT THE TRUE MEAN IS 0.

 ETABAR:         0.0000E+00
 SE:             0.0000E+00
 N:                     200

 P VAL.:         1.0000E+00

 ETAshrink(%):   1.0000E+02
 EBVshrink(%):   0.0000E+00
 EPSshrink(%):   1.0000E-10

 #TERE:
 Elapsed estimation time in seconds:     4.30
 Elapsed covariance time in seconds:     0.64

 ********************                         LAPLACIAN CONDITIONAL ESTIMATION                       ********************
 #OBJT:**************                       MINIMUM VALUE OF OBJECTIVE FUNCTION                      ********************
 #OBJV:********************************************   360253.678       **************************************************

 ********************                         LAPLACIAN CONDITIONAL ESTIMATION                       ********************
 ********************                             FINAL PARAMETER ESTIMATE                           ********************

 THETA - VECTOR OF FIXED EFFECTS PARAMETERS   *********
         TH 1      TH 2      TH 3
         1.42E+00  9.84E+02  5.09E+01

 OMEGA - COV MATRIX FOR RANDOM EFFECTS - ETAS  ********
            ETA1
 ETA1
+        0.00E+00

 OMEGA - CORR MATRIX FOR RANDOM EFFECTS - ETAS  *******
            ETA1
 ETA1
+        0.00E+00

 ********************                         LAPLACIAN CONDITIONAL ESTIMATION                       ********************
 ********************                            STANDARD ERROR OF ESTIMATE                          ********************

 THETA - VECTOR OF FIXED EFFECTS PARAMETERS   *********
         TH 1      TH 2      TH 3
         1.86E-01  3.10E+02  1.38E+01

 OMEGA - COV MATRIX FOR RANDOM EFFECTS - ETAS  ********
            ETA1
 ETA1
+       .........

 OMEGA - CORR MATRIX FOR RANDOM EFFECTS - ETAS  *******
            ETA1
 ETA1
+       .........

 ********************                         LAPLACIAN CONDITIONAL ESTIMATION                       ********************
 ********************                          COVARIANCE MATRIX OF ESTIMATE                         ********************

            TH 1      TH 2      TH 3      OM11
 TH 1
+        3.46E-02
 TH 2
+        4.70E+01  9.62E+04
 TH 3
+        5.16E-01  2.27E+03  1.91E+02
 OM11
+       ......... ......... ......... .........

 ********************                         LAPLACIAN CONDITIONAL ESTIMATION                       ********************
 ********************                          CORRELATION MATRIX OF ESTIMATE                        ********************

            TH 1      TH 2      TH 3      OM11
 TH 1
+        1.86E-01
 TH 2
+        8.15E-01  3.10E+02
 TH 3
+        2.01E-01  5.30E-01  1.38E+01
 OM11
+       ......... ......... ......... .........
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
 ********************                         LAPLACIAN CONDITIONAL ESTIMATION                       ********************
 ********************                      EIGENVALUES OF COR MATRIX OF ESTIMATE                     ********************

             1         2         3
         1.11E-01  8.18E-01  2.07E+00
 #CPUT: Total CPU Time in Seconds,        4.711
