Mon Sep  5 18:32:55 CEST 2016
$PROBLEM    + COVAR KM-V2
; 1. Based on: run530

; 2. Description:

;    DOSE ON F AS EMAX MODEL

; 3. Label:

;    HIGHRIF1 PK MODEL

; 4. Structural model:

;    1-COMP PK MODEL WITH TRANSIT ABSORPTION MODEL WITH AUTO-INDUCTION AND MICHAELIS-MENTEN CL WITH M3 METHOD LOG-TRANSFORMED DATA

; 5. Covariate model:

;    FFM ON CL AND V2

; 6. Inter-individual variability:

;    KM, V2, MTT, NN, KA, VMAX

; 7. Inter-occasion variability:

;    KM, MTT, BIO, KA.

; 8. Residual variability:

;    ADDITIVE

; 9. Estimation:

;    LAPLACIAN WITH INTERACTION

; Based on final model by Smythe run 106
$ABBREVIATED DERIV2=NOCOMMON
$INPUT      ID TIME TADO DGRP DV BQL AMT EVID OCC PLOT AGE SEX RACE WT
            HT BMI HIV FFM NDV DOSE
; TIME=hours, TADO=time after last dose, DGRP=dose in mg/kg,
; BQL (0=observation is not BLOQ, 1=observation is BLOQ, 2=observation missing, 3=dummy or dosing time point)
; OCC (1=day 7, 2=day 14), PLOT=flag variable for creating VPCs, SEX (1=male, 0=female)
; FFM=fat-free mass in kg, DOSE=dose in mg
$DATA      HR1_PK_v14.csv IGNORE=@
$SUBROUTINE ADVAN13 TRANS1 TOL=10
$MODEL      NCOMP=3 COMP=(DEPOT,DEFDOSE) COMP=(CENTRAL,DEFOBS)
            COMP=(ENZ)
$PK
"FIRST
"  COMMON/PRCOMG/  IDUM1,IDUM2,IMAX,IDUM4,IDUM5
"  INTEGER IDUM1,IDUM2,IMAX,IDUM4,IDUM5
"  IMAX=1000000000

IF(AMT.GT.0)PD     = AMT          ; PD   = oral DOSE
IF(AMT.GT.0)TDOS   = TIME         ; TDOS = time of DOSE
TAD                = TIME - TDOS  ; TAD  = time after DOSE

;;-------------------Fat Free Mass-------------------------------------;;

NFMCL  = FFM
ALLMCL = (NFMCL/70)**0.75

NFMV  = FFM
ALLMV = (NFMV/70)

TVVMAX  = THETA(1)               ; CL
TVKM    = THETA(2)
TVV2    = THETA(3)*ALLMV               ; V2
TVKA    = THETA(4)                     ; KA
TVEMAX  = THETA(5)                     ; EMAX
TVEC50  = THETA(6)                     ; EC50
TVKENZ  = THETA(7)                     ; KENZ
TVMTT   = THETA(8)                     ; MTT
TVNN    = THETA(9)                     ; NN
TVFEMAX = THETA(10)                    ; FEMAX
TVFED50 = THETA(11)                    ; FEC50

IF (OCC.EQ.1) THEN
  IOVBIO = ETA(7)
  ELSE
  IOVBIO = ETA(8)
ENDIF

IF (OCC.EQ.1) THEN
  IOVMTT = ETA(9)
  ELSE
  IOVMTT = ETA(10)
ENDIF

IF (OCC.EQ.1) THEN
  IOVKM = ETA(11)
  ELSE
  IOVKM = ETA(12)
ENDIF

IF (OCC.EQ.1) THEN
  IOVKA = ETA(13)
  ELSE
  IOVKA = ETA(14)
ENDIF

VMAX    = TVVMAX*EXP(ETA(2))
KM      = TVKM*EXP(ETA(1)+IOVKM)
V2      = TVV2*EXP(ETA(3))
KA      = TVKA*EXP(ETA(6)+IOVKA)
EC50    = TVEC50
EMAX    = TVEMAX
KENZ    = TVKENZ
FEMAX   = TVFEMAX
FED50   = TVFED50
TVBIO   = 1*(1+FEMAX*(DOSE-450)/(FED50+(DOSE-450)))
BIO     = TVBIO*EXP(IOVBIO)
K       = CL/V2
MTT     = TVMTT*EXP(ETA(4)+IOVMTT)
NN      = TVNN*EXP(ETA(5))
S2      = V2

F1      = 0 ; Transit absorption compartment
A_0(2)  = 0.0001 ; Central comp
A_0(3)  = 1 ; Induction compartment

KTR     = (NN + 1) / MTT

L       = 0.9189385 + (NN + 0.5)*LOG(NN) - NN + LOG(1 + 1/(12*NN)) ; logarithm of the approximation to the gamma function
LBPD  = LOG(BIO*PD)
LKTR  = LOG(KTR)
CUMUL = LBPD + LKTR - L

$DES
CP      = A(2)/V2

TEMPO   = T - TDOS
  IF(TEMPO.GT.0)THEN
	KTT   = KTR*TEMPO
  DADT(1) = EXP(CUMUL + NN*LOG(KTT) - KTT) - KA*A(1)
  ELSE
        KTT   = 0
  DADT(1) = 0
  ENDIF

DADT(2) = KA*A(1) - (((VMAX/(KM+CP))*ALLMCL)/V2)*A(2)*A(3)
EFF     = (EMAX*(CP)) / (EC50 + CP)
DADT(3) = KENZ*(1 + EFF) - KENZ*A(3)

$ERROR
IPRED   = LOG(A(2)/S2+0.00001)
ADD     = SQRT(SIGMA(1,1))   ; ADD error
SD      = SQRT((ADD)**2)

;Sim_start
LLOQ=LOG(0.13)

DUM=(LLOQ-IPRED)/SD
CUMD=PHI(DUM)

IF(DV.GE.LLOQ) THEN
F_FLAG = 0
IRES   = DV - IPRED
IWRES  = IRES / SD
Y      = IPRED + EPS(1)
ELSE
F_FLAG = 1
IRES   = 0
IWRES  = 0
MDVRES = 1
Y=CUMD
ENDIF

;IRES  = DV - IPRED
;IWRES = IRES / SD
;Y     = IPRED + EPS(1)
;Sim_end

AA1 = A(1)     ; absorption comp
AA2 = A(2)     ; central rif comp
AA3 = A(3)     ; auto-induction comp

IF(AMT.GT.0) THEN
	TDOS = TIME
	PD   = AMT
ENDIF

$THETA  (0,525) ; 1 VMAX
$THETA  (0,35.3) ; 2 KM
$THETA  (0,87.2) ; 3 V2
$THETA  (0,1.77) ; 4 KA
$THETA  (0,1.16,1.25) ; 5 EMAX
$THETA  (0,0.0699) ; 6 EC50
$THETA  (0.005,0.00603) ; 7 KENZ
$THETA  (0,0.513) ; 8 MTT
$THETA  (1,23.8) ; 9 NN
$THETA  (0,0.504) ; 10 FEMAX
$THETA  (0,67) ; 11 FED50
$OMEGA  BLOCK(2)
 0.128  ; 1 IIV in KM
 0.0418 0.0901  ; 2 IIV IN VMAX
$OMEGA  0.00618  ; 3 IIV in V2
$OMEGA  0.146  ; 4 IIV in MTT
$OMEGA  0.607  ; 5 IIV in NN
$OMEGA  0.114  ; 6 IIV in KA
$OMEGA  BLOCK(1)
 0.0248  ; 7 IOV in F
$OMEGA  BLOCK(1) SAME
$OMEGA  BLOCK(1)
 0.318  ; 9 IOV in MTT
$OMEGA  BLOCK(1) SAME
$OMEGA  BLOCK(1)
 0.0355  ; 11 IOV in KM
$OMEGA  BLOCK(1) SAME
$OMEGA  BLOCK(1)
 0.0985  ; 13 IOV in KA
$OMEGA  BLOCK(1) SAME
$SIGMA  0.0555  ;  ADD ERROR
;Sim_start
$ESTIMATION METHOD=1 LAPLACIAN INTER NUMERICAL SLOW MAXEVAL=9999
            NSIG=3 SIGL=9 PRINT=3 MCETA=100
$COVARIANCE PRINT=E MATRIX=S SLOW
;$SIMULATION (1234) ONLYSIM

;Sim_end
$TABLE      ID IPRED IWRES CWRES NPDE DV OCC TIME TADO DGRP PLOT CP
            NOPRINT ONEHEADER FILE=sdtab537
$TABLE      ID NOPRINT ONEHEADER FILE=catab537
$TABLE      ID AGE SEX RACE WT HT BMI HIV FFM NOPRINT ONEHEADER
            FILE=cotab537
$TABLE      ID V2 MTT BIO NN KM KA VMAX ETA1 ETA2 ETA3 ETA4 ETA5 ETA6
            ETA7 ETA8 ETA9 ETA10 ETA11 ETA12 ETA13 NOPRINT ONEHEADER
            FILE=patab537
$TABLE      ID NOPRINT ONEHEADER FILE=mytab537

NM-TRAN MESSAGES
 WARNINGS AND ERRORS (IF ANY) FOR PROBLEM    1
 (WARNING  2) NM-TRAN INFERS THAT THE DATA ARE POPULATION.
 (WARNING  113) VERBATIM CODE CONTAINS "COMMON". IF THIS IS NOT A
 USER-DEFINED COMMON, IT SHOULD BE REPLACED BY THE APPROPRIATE MODULE.
 (WARNING  48) DES-DEFINED ITEMS ARE COMPUTED ONLY WHEN EVENT TIME
 INCREASES. E.G., DISPLAYED VALUES ASSOCIATED WITH THE FIRST EVENT RECORD
 OF AN INDIVIDUAL RECORD ARE COMPUTED WITH (THE LAST ADVANCE TO) AN EVENT
 TIME OF THE PRIOR INDIVIDUAL RECORD.
 (WARNING  79) SIGMA IS USED ON THE RIGHT. WITH A SUBSEQUENT RUN, IF AN
 INITIAL ESTIMATE OF A DIAGONAL BLOCK OF SIGMA IS TO BE COMPUTED BY
 NONMEM, THAT BLOCK WILL BE SET TO AN IDENTITY MATRIX DURING THAT
 COMPUTATION. THIS COULD LEAD TO AN ARITHMETIC EXCEPTION.*
 * THE MAXIMUM NUMBER OF WARNINGS OF ONE OR MORE TYPES WAS REACHED.
 IT IS POSSIBLE THAT SOME WARNING MESSAGES WERE SUPPRESSED.

1NONLINEAR MIXED EFFECTS MODEL PROGRAM (NONMEM) VERSION 7.3.0
 ORIGINALLY DEVELOPED BY STUART BEAL, LEWIS SHEINER, AND ALISON BOECKMANN
 CURRENT DEVELOPERS ARE ROBERT BAUER, ICON DEVELOPMENT SOLUTIONS,
 AND ALISON BOECKMANN. IMPLEMENTATION, EFFICIENCY, AND STANDARDIZATION
 PERFORMED BY NOUS INFOSYSTEMS.
 PROBLEM NO.:         1
 + COVAR KM-V2
 TOT. NO. OF OBS RECS:     1780
 TOT. NO. OF INDIVIDUALS:     83
 GENERAL NONLINEAR KINETICS MODEL USING LSODA (ADVAN13)
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 #TBLN:      1
 #METH: Laplacian Conditional Estimation with Interaction
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
 #TERM:
0MINIMIZATION TERMINATED
 DUE TO ROUNDING ERRORS (ERROR=134)
 NO. OF FUNCTION EVALUATIONS USED:      340
 NO. OF SIG. DIGITS IN FINAL EST.:  2.9
 ADDITIONAL PROBLEMS OCCURRED WITH THE MINIMIZATION.
 REGARD THE RESULTS OF THE ESTIMATION STEP CAREFULLY, AND ACCEPT THEM ONLY
 AFTER CHECKING THAT THE COVARIANCE STEP PRODUCES REASONABLE OUTPUT.

 ETABAR IS THE ARITHMETIC MEAN OF THE ETA-ESTIMATES,
 AND THE P-VALUE IS GIVEN FOR THE NULL HYPOTHESIS THAT THE TRUE MEAN IS 0.

 ETABAR:        -4.4309E-02 -7.0202E-02  3.9526E-03  8.5691E-02 -1.0713E-01 -6.8078E-02  5.3369E-02 -5.1144E-02  8.2915E-02  1.0382E-01
                 5.3173E-02 -5.6996E-02  1.1759E-02 -7.0543E-02
 SE:             3.4472E-02  1.9655E-02  4.4063E-03  2.7209E-02  6.2643E-02  2.4286E-02  1.1270E-02  1.3150E-02  5.1469E-02  4.3850E-02
                 1.3664E-02  1.0596E-02  1.4245E-02  1.7067E-02
 N:                      83          83          83          83          83          83          83          83          83          83
                         83          83          83          83

 P VAL.:         1.9867E-01  3.5485E-04  3.6970E-01  1.6363E-03  8.7240E-02  5.0601E-03  2.1872E-06  1.0061E-04  1.0719E-01  1.7907E-02
                 9.9648E-05  7.5103E-08  4.0908E-01  3.5793E-05

 ETAshrink(%):   1.1823E+01  3.9985E+01  4.8635E+01  3.4729E+01  2.6310E+01  3.4090E+01  3.4384E+01  2.3437E+01  1.6359E+01  2.8741E+01
                 3.3564E+01  4.8479E+01  5.8397E+01  5.0154E+01
 EBVshrink(%):   4.1699E+01  3.5224E+01  5.2999E+01  3.3592E+01  3.8150E+01  3.9141E+01  2.0930E+01  2.3819E+01  1.6678E+01  1.7310E+01
                 3.4080E+01  3.5325E+01  5.0686E+01  5.0834E+01
 EPSshrink(%):   2.9239E+01

 #TERE:
 Elapsed estimation time in seconds: 11478.50

 ********************                LAPLACIAN CONDITIONAL ESTIMATION WITH INTERACTION               ********************
 #OBJT:**************                       MINIMUM VALUE OF OBJECTIVE FUNCTION                      ********************
 #OBJV:********************************************    -1053.189       **************************************************

 ********************                LAPLACIAN CONDITIONAL ESTIMATION WITH INTERACTION               ********************
 ********************                             FINAL PARAMETER ESTIMATE                           ********************

 THETA - VECTOR OF FIXED EFFECTS PARAMETERS   *********
         TH 1      TH 2      TH 3      TH 4      TH 5      TH 6      TH 7      TH 8      TH 9      TH10      TH11
         5.25E+02  3.53E+01  8.72E+01  1.77E+00  1.16E+00  6.99E-02  6.03E-03  5.13E-01  2.38E+01  5.04E-01  6.70E+01

 OMEGA - COV MATRIX FOR RANDOM EFFECTS - ETAS  ********
            ETA1      ETA2      ETA3      ETA4      ETA5      ETA6      ETA7      ETA8      ETA9      ET10      ET11      ET12
             ET13      ET14
 ETA1
+        1.28E-01
 ETA2
+        4.18E-02  9.01E-02
 ETA3
+        0.00E+00  0.00E+00  6.18E-03
 ETA4
+        0.00E+00  0.00E+00  0.00E+00  1.46E-01
 ETA5
+        0.00E+00  0.00E+00  0.00E+00  0.00E+00  6.07E-01
 ETA6
+        0.00E+00  0.00E+00  0.00E+00  0.00E+00  0.00E+00  1.14E-01
 ETA7
+        0.00E+00  0.00E+00  0.00E+00  0.00E+00  0.00E+00  0.00E+00  2.48E-02
 ETA8
+        0.00E+00  0.00E+00  0.00E+00  0.00E+00  0.00E+00  0.00E+00  0.00E+00  2.48E-02
 ETA9
+        0.00E+00  0.00E+00  0.00E+00  0.00E+00  0.00E+00  0.00E+00  0.00E+00  0.00E+00  3.18E-01
 ET10
+        0.00E+00  0.00E+00  0.00E+00  0.00E+00  0.00E+00  0.00E+00  0.00E+00  0.00E+00  0.00E+00  3.18E-01
 ET11
+        0.00E+00  0.00E+00  0.00E+00  0.00E+00  0.00E+00  0.00E+00  0.00E+00  0.00E+00  0.00E+00  0.00E+00  3.55E-02
 ET12
+        0.00E+00  0.00E+00  0.00E+00  0.00E+00  0.00E+00  0.00E+00  0.00E+00  0.00E+00  0.00E+00  0.00E+00  0.00E+00  3.55E-02
 ET13
+        0.00E+00  0.00E+00  0.00E+00  0.00E+00  0.00E+00  0.00E+00  0.00E+00  0.00E+00  0.00E+00  0.00E+00  0.00E+00  0.00E+00
          9.85E-02
 ET14
+        0.00E+00  0.00E+00  0.00E+00  0.00E+00  0.00E+00  0.00E+00  0.00E+00  0.00E+00  0.00E+00  0.00E+00  0.00E+00  0.00E+00
          0.00E+00  9.85E-02

 SIGMA - COV MATRIX FOR RANDOM EFFECTS - EPSILONS  ****
            EPS1
 EPS1
+        5.55E-02

 OMEGA - CORR MATRIX FOR RANDOM EFFECTS - ETAS  *******
            ETA1      ETA2      ETA3      ETA4      ETA5      ETA6      ETA7      ETA8      ETA9      ET10      ET11      ET12
             ET13      ET14
 ETA1
+        3.58E-01
 ETA2
+        3.89E-01  3.00E-01
 ETA3
+        0.00E+00  0.00E+00  7.86E-02
 ETA4
+        0.00E+00  0.00E+00  0.00E+00  3.82E-01
 ETA5
+        0.00E+00  0.00E+00  0.00E+00  0.00E+00  7.79E-01
 ETA6
+        0.00E+00  0.00E+00  0.00E+00  0.00E+00  0.00E+00  3.38E-01
 ETA7
+        0.00E+00  0.00E+00  0.00E+00  0.00E+00  0.00E+00  0.00E+00  1.57E-01
 ETA8
+        0.00E+00  0.00E+00  0.00E+00  0.00E+00  0.00E+00  0.00E+00  0.00E+00  1.57E-01
 ETA9
+        0.00E+00  0.00E+00  0.00E+00  0.00E+00  0.00E+00  0.00E+00  0.00E+00  0.00E+00  5.64E-01
 ET10
+        0.00E+00  0.00E+00  0.00E+00  0.00E+00  0.00E+00  0.00E+00  0.00E+00  0.00E+00  0.00E+00  5.64E-01
 ET11
+        0.00E+00  0.00E+00  0.00E+00  0.00E+00  0.00E+00  0.00E+00  0.00E+00  0.00E+00  0.00E+00  0.00E+00  1.89E-01
 ET12
+        0.00E+00  0.00E+00  0.00E+00  0.00E+00  0.00E+00  0.00E+00  0.00E+00  0.00E+00  0.00E+00  0.00E+00  0.00E+00  1.89E-01
 ET13
+        0.00E+00  0.00E+00  0.00E+00  0.00E+00  0.00E+00  0.00E+00  0.00E+00  0.00E+00  0.00E+00  0.00E+00  0.00E+00  0.00E+00
          3.14E-01
 ET14
+        0.00E+00  0.00E+00  0.00E+00  0.00E+00  0.00E+00  0.00E+00  0.00E+00  0.00E+00  0.00E+00  0.00E+00  0.00E+00  0.00E+00
          0.00E+00  3.14E-01

 SIGMA - CORR MATRIX FOR RANDOM EFFECTS - EPSILONS  ***
            EPS1
 EPS1
+        2.36E-01
 #CPUT: Total CPU Time in Seconds,    98293.622
