Wed Aug 23 07:50:23 CEST 2017
;Rerun to estimate parameters at CLCR 70 and WT 75
;;1. Aim with run
;;   Based on run93
;;   Adding BLOCK(2)
;;2. Based on run31 from NXY-0004
;;3. Structural model
;;   Two-compartment model
;;4. Covariate model
;;   CLCR on CL (nonlinear)
;;   WT on V1
;;5. Interindividual model
;;   Exponential IIV for CL, V1,
;;   and correlation between CL and V1
;;6. Residual variability
;;   Proportional (but add w logtr data)
;;7. Estimation
;;   FOCE
;;8. Other
;;   Simulated_comb2.dta
$PROBLEM    NXY-059 Analysis,SA-NXY-0004 and 0003
$INPUT      ID OID=DROP CENT=DROP PNO=DROP TARG DAT2=DROP TIME AMT
            DUR=DROP RATE ODV DV FU FLAG=DROP SEX AGE WT HT BMI RACE
            SCR CLCR FLA2 STUD
$DATA      Simulated_comb2.dta IGNORE=@
$SUBROUTINE ADVAN3 TRANS4
$PK

 CREA = CLCR
 IF(CLCR.EQ.-99) CREA = 61.48
 IF(CLCR.EQ.-99.AND.ID.EQ.10) CREA = 34.55
 IF(CLCR.EQ.-99.AND.ID.EQ.21) CREA = 124.22
 IF(CREA.LE.40)  CLCLCR = 0
 IF(CREA.GT.40)  CLCLCR = THETA(6)*(CREA-40)

 IF(WT.EQ.-99) THEN
    V1WT = 0
 ELSE
    V1WT = THETA(7)*(WT-76.00)
 ENDIF

CLCOV=1+CLCLCR
V1COV=1+V1WT

TVCL   = THETA(5)*CLCOV
TVV1   = THETA(2)*V1COV
TVQ    = THETA(3)
TVV2   = THETA(4)

CL     = TVCL*EXP(ETA(1))
V1     = TVV1*EXP(ETA(2))
Q      = TVQ
V2     = TVV2

S1     = V1

$ERROR

NPRE   = F+0.000001
IPRED  = LOG(F+0.000001)
IRES   = DV-IPRED
W      = THETA(1)
IWRES  = IRES/W
Y      = IPRED+EPS(1)*W

$THETA  (0,0.1650) ; 1 prop error
$THETA  (0,7.8500) ; 2 V1
$THETA  (0,13.100) ; 3 Q
$THETA  (0,7.2000) ; 4 V2
$THETA  (0,2.8800) ; 5 TVCL
$THETA  (-0.00972,0.0192,0.0505) ; 6 CLCR on CLR
$THETA  (-0.020,0.0184,0.027) ; 7 WT on V1
$OMEGA  BLOCK(2)
 0.0536
 0.02 0.160  ; IIV CL, V1
$SIGMA  1  FIX
$ESTIMATION PRINT=2 METHOD=1 SIG=3 MSFO=msfb111 NOABORT MAX=0
;;COV

;;$TAB ID TIME TARG STUD ODV NPRE IPRED IWRES  ONEHEADER NOPRINT FILE=sdtab111

;;$TAB ID V1 ETA(1) CL ETA(2) TVCL TVV1        ONEHEADER NOPRINT FILE=patab111

;;$TAB ID FU AGE WT HT BMI SCR CLCR            ONEHEADER NOPRINT FILE=cotab111

;;$TAB ID SEX RACE                             ONEHEADER NOPRINT FILE=catab111

NM-TRAN MESSAGES
 WARNINGS AND ERRORS (IF ANY) FOR PROBLEM    1
 (WARNING  2) NM-TRAN INFERS THAT THE DATA ARE POPULATION.
 (DATA WARNING   3) RECORD        51, DATA ITEM   3, CONTENTS: 00/08/21
 THE YEAR IS ASSUMED TO BE 2000 (A LEAP YEAR). IF THIS IS INCORRECT, USE
 $DATA'S LAST20 OPTION TO OVERRIDE THE DEFAULT VALUE OF LAST20 IN NMTRAN'S
 ABLOCK, OR CHANGE THE CURRENT DEFAULT: 50
 (DATA WARNING   3) RECORD        52, DATA ITEM   3, CONTENTS: 00/08/21
 THE YEAR IS ASSUMED TO BE 2000 (A LEAP YEAR). IF THIS IS INCORRECT, USE
 $DATA'S LAST20 OPTION TO OVERRIDE THE DEFAULT VALUE OF LAST20 IN NMTRAN'S
 ABLOCK, OR CHANGE THE CURRENT DEFAULT: 50
 * THE MAXIMUM NUMBER OF WARNINGS OF ONE OR MORE TYPES WAS REACHED.
 IT IS POSSIBLE THAT SOME WARNING MESSAGES WERE SUPPRESSED.
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
1NONLINEAR MIXED EFFECTS MODEL PROGRAM (NONMEM) VERSION 7.3.0
 ORIGINALLY DEVELOPED BY STUART BEAL, LEWIS SHEINER, AND ALISON BOECKMANN
 CURRENT DEVELOPERS ARE ROBERT BAUER, ICON DEVELOPMENT SOLUTIONS,
 AND ALISON BOECKMANN. IMPLEMENTATION, EFFICIENCY, AND STANDARDIZATION
 PERFORMED BY NOUS INFOSYSTEMS.
 PROBLEM NO.:         1
 NXY-059 Analysis,SA-NXY-0004 and 0003
 TOT. NO. OF OBS RECS:     1196
 TOT. NO. OF INDIVIDUALS:    177
 TWO COMPARTMENT MODEL (ADVAN3)
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 #TBLN:      1
 #METH: First Order Conditional Estimation (Evaluation)
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
 ********************                 FIRST ORDER CONDITIONAL ESTIMATION (EVALUATION)                ********************
 #OBJT:**************                       MINIMUM VALUE OF OBJECTIVE FUNCTION                      ********************
 #OBJV:********************************************    72339.047       **************************************************

 ********************                 FIRST ORDER CONDITIONAL ESTIMATION (EVALUATION)                ********************
 ********************                             FINAL PARAMETER ESTIMATE                           ********************

 THETA - VECTOR OF FIXED EFFECTS PARAMETERS   *********
         TH 1      TH 2      TH 3      TH 4      TH 5      TH 6      TH 7
         1.65E-01  7.85E+00  1.31E+01  7.20E+00  2.88E+00  1.92E-02  1.84E-02

 OMEGA - COV MATRIX FOR RANDOM EFFECTS - ETAS  ********
            ETA1      ETA2
 ETA1
+        5.36E-02
 ETA2
+        2.00E-02  1.60E-01

 SIGMA - COV MATRIX FOR RANDOM EFFECTS - EPSILONS  ****
            EPS1
 EPS1
+        1.00E+00

 OMEGA - CORR MATRIX FOR RANDOM EFFECTS - ETAS  *******
            ETA1      ETA2
 ETA1
+        2.32E-01
 ETA2
+        2.16E-01  4.00E-01

 SIGMA - CORR MATRIX FOR RANDOM EFFECTS - EPSILONS  ***
            EPS1
 EPS1
+        1.00E+00
 #CPUT: Total CPU Time in Seconds,        0.073
