18/09/2017
14:25
$PROBLEM    Mida PK in obese adolescents and adults with access weight
;           quantification
$INPUT      ID ;<=30=adults,>30=adolescent
            TIME ;in min
            AMT ;in microgram
            RATE ;in microgram / min
            DV ;in microgram / L
            MDV CMT TBW ;total bodyweight in kg
            WTAL ;weight for age and length in kg
            WTAC ;access weight
$DATA      FinalDatasetMidaObeseAccessWeight.csv IGNORE=@
$SUBROUTINE ADVAN6 TOL=5
$MODEL      COMP=(PODOSE) COMP=(CENTRAL) COMP=(PERIP) COMP=(TRANSIT1)
            COMP=(TRANSIT2) COMP=(TRANSIT3) COMP=(TRANSIT4)
            COMP=(TRANSIT5)
$PK
IF(ID.LE.30) TVCL=THETA(1)
IF(ID.GT.30) TVCL=(THETA(1)*(WTAL/70)**THETA(7))+(THETA(8)*WTAC)
CL=TVCL*EXP(ETA(1))		;clearance L/min
F1=THETA(2)*EXP(ETA(2))		;bioavailability
V2=THETA(3)*EXP(ETA(5))        	;central volume L
Q=THETA(4)*EXP(ETA(3))         	;intercompartmental CL L/min
IF(ID.LE.30) TVV3=THETA(5)*(TBW/141.8)**THETA(9)
IF(ID.GT.30) TVV3=THETA(5)
V3= TVV3*EXP(ETA(6))            ;peripheral volume L
KA= THETA(6)*EXP(ETA(4))	;absoprtion rate min-1
KTR= KA                         ;transit rate min-1

S2=V2
S3=V3

K14=KA
K45=KTR
K56=KTR
K67=KTR
K78=KTR
K82=KTR
K20=CL/V2
K23=Q/V2
K32=Q/V3

$DES
DADT(1)= -K14*A(1)
DADT(2)= KTR*A(8) -K23*A(2) +K32*A(3) -K20*A(2)
DADT(3)= K23*A(2) -K32*A(3)
DADT(4)= K14*A(1) -KTR*A(4)
DADT(5)= KTR*A(4) -KTR*A(5)
DADT(6)= KTR*A(5) -KTR*A(6)
DADT(7)= KTR*A(6) -KTR*A(7)
DADT(8)= KTR*A(7) -KTR*A(8)

$ERROR
IPRED=F
Y=F*(1+ERR(1))     ;proportional error model

IRES=DV-IPRED
DEL=0
IF(IPRED.EQ.0)DEL=1
IWRES=(1-DEL)*IRES/(IPRED+DEL)

$THETA  (0,0.5) ; CL ADULTS (L/min)
 (0,0.5) ; F1
 (0,30) ; V2 (L)
 (0,0.9) ; Q (L/min)
 (0,120) ; V3 (L)
 (0,0.1) ; KA
 0.75 FIX ; POW CL
 (0,0.01) ; overweight
 (0,1) ; TBW POW V3 ADULTS
$OMEGA  0.1  ;         CL
 0.2  ;         F1
 0.1  ;          Q
 0.1  ;         KA
 0.3  ;         V2
 0.4  ;         V3
$SIGMA  0.09  ; porportional
$ESTIMATION SIGDIG=3 MAXEVAL=9999 PRINT=5 NOABORT METHOD=1 INTERACTION
            POSTHOC
$COVARIANCE
$TABLE      ID TIME IPRED IWRES CWRES CMT NOPRINT ONEHEADER NOAPPEND
            FILE=sdtab143

NM-TRAN MESSAGES
 WARNINGS AND ERRORS (IF ANY) FOR PROBLEM    1
 (WARNING  2) NM-TRAN INFERS THAT THE DATA ARE POPULATION.

1NONLINEAR MIXED EFFECTS MODEL PROGRAM (NONMEM) VERSION 7.3.0
 ORIGINALLY DEVELOPED BY STUART BEAL, LEWIS SHEINER, AND ALISON BOECKMANN
 CURRENT DEVELOPERS ARE ROBERT BAUER, ICON DEVELOPMENT SOLUTIONS,
 AND ALISON BOECKMANN. IMPLEMENTATION, EFFICIENCY, AND STANDARDIZATION
 PERFORMED BY NOUS INFOSYSTEMS.
 PROBLEM NO.:         1
 Mida PK in obese adolescents and adults with access weight
 TOT. NO. OF OBS RECS:      530
 TOT. NO. OF INDIVIDUALS:     39
 GENERAL NONLINEAR KINETICS MODEL (ADVAN6)
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 #TBLN:      1
 #METH: First Order Conditional Estimation with Interaction
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
 #TERM:
0MINIMIZATION SUCCESSFUL
 NO. OF FUNCTION EVALUATIONS USED:      433
 NO. OF SIG. DIGITS IN FINAL EST.:  3.0

 ETABAR IS THE ARITHMETIC MEAN OF THE ETA-ESTIMATES,
 AND THE P-VALUE IS GIVEN FOR THE NULL HYPOTHESIS THAT THE TRUE MEAN IS 0.

 ETABAR:        -2.4315E-03 -1.9309E-03 -1.0301E-02 -9.8353E-03 -4.5956E-02  8.5129E-03
 SE:             2.6205E-02  3.7477E-02  5.3515E-02  5.2678E-02  6.5866E-02  4.3433E-02
 N:                      39          39          39          39          39          39

 P VAL.:         9.2607E-01  9.5891E-01  8.4736E-01  8.5189E-01  4.8535E-01  8.4461E-01

 ETAshrink(%):   2.5628E+01  3.7246E+01  1.9161E+01  2.9943E+01  1.8080E+01  2.8119E+01
 EBVshrink(%):   2.6275E+01  3.7580E+01  2.1078E+01  3.0183E+01  1.7701E+01  2.9566E+01
 EPSshrink(%):   1.0443E+01

 #TERE:
 Elapsed estimation time in seconds:   185.63
 Elapsed covariance time in seconds:   321.88

 ********************               FIRST ORDER CONDITIONAL ESTIMATION WITH INTERACTION              ********************
 #OBJT:**************                       MINIMUM VALUE OF OBJECTIVE FUNCTION                      ********************
 #OBJV:********************************************     2487.970       **************************************************

 ********************               FIRST ORDER CONDITIONAL ESTIMATION WITH INTERACTION              ********************
 ********************                             FINAL PARAMETER ESTIMATE                           ********************

 THETA - VECTOR OF FIXED EFFECTS PARAMETERS   *********
         TH 1      TH 2      TH 3      TH 4      TH 5      TH 6      TH 7      TH 8      TH 9
         4.47E-01  5.60E-01  5.37E+01  1.15E+00  1.68E+02  1.14E-01  7.50E-01  6.98E-03  3.22E+00

 OMEGA - COV MATRIX FOR RANDOM EFFECTS - ETAS  ********
            ETA1      ETA2      ETA3      ETA4      ETA5      ETA6
 ETA1
+        4.97E-02
 ETA2
+        0.00E+00  1.43E-01
 ETA3
+        0.00E+00  0.00E+00  1.75E-01
 ETA4
+        0.00E+00  0.00E+00  0.00E+00  2.26E-01
 ETA5
+        0.00E+00  0.00E+00  0.00E+00  0.00E+00  2.59E-01
 ETA6
+        0.00E+00  0.00E+00  0.00E+00  0.00E+00  0.00E+00  1.46E-01

 SIGMA - COV MATRIX FOR RANDOM EFFECTS - EPSILONS  ****
            EPS1
 EPS1
+        8.92E-02

 OMEGA - CORR MATRIX FOR RANDOM EFFECTS - ETAS  *******
            ETA1      ETA2      ETA3      ETA4      ETA5      ETA6
 ETA1
+        2.23E-01
 ETA2
+        0.00E+00  3.78E-01
 ETA3
+        0.00E+00  0.00E+00  4.19E-01
 ETA4
+        0.00E+00  0.00E+00  0.00E+00  4.76E-01
 ETA5
+        0.00E+00  0.00E+00  0.00E+00  0.00E+00  5.09E-01
 ETA6
+        0.00E+00  0.00E+00  0.00E+00  0.00E+00  0.00E+00  3.82E-01

 SIGMA - CORR MATRIX FOR RANDOM EFFECTS - EPSILONS  ***
            EPS1
 EPS1
+        2.99E-01

 ********************               FIRST ORDER CONDITIONAL ESTIMATION WITH INTERACTION              ********************
 ********************                            STANDARD ERROR OF ESTIMATE                          ********************

 THETA - VECTOR OF FIXED EFFECTS PARAMETERS   *********
         TH 1      TH 2      TH 3      TH 4      TH 5      TH 6      TH 7      TH 8      TH 9
         8.48E-02  7.59E-02  6.57E+00  1.29E-01  2.35E+01  2.45E-02 .........  1.69E-03  1.83E+00

 OMEGA - COV MATRIX FOR RANDOM EFFECTS - ETAS  ********
            ETA1      ETA2      ETA3      ETA4      ETA5      ETA6
 ETA1
+        3.45E-02
 ETA2
+       .........  6.43E-02
 ETA3
+       ......... .........  7.42E-02
 ETA4
+       ......... ......... .........  5.51E-02
 ETA5
+       ......... ......... ......... .........  1.15E-01
 ETA6
+       ......... ......... ......... ......... .........  8.40E-02

 SIGMA - COV MATRIX FOR RANDOM EFFECTS - EPSILONS  ****
            EPS1
 EPS1
+        1.66E-02

 OMEGA - CORR MATRIX FOR RANDOM EFFECTS - ETAS  *******
            ETA1      ETA2      ETA3      ETA4      ETA5      ETA6
 ETA1
+        7.75E-02
 ETA2
+       .........  8.51E-02
 ETA3
+       ......... .........  8.86E-02
 ETA4
+       ......... ......... .........  5.79E-02
 ETA5
+       ......... ......... ......... .........  1.13E-01
 ETA6
+       ......... ......... ......... ......... .........  1.10E-01

 SIGMA - CORR MATRIX FOR RANDOM EFFECTS - EPSILONS  ***
            EPS1
 EPS1
+        2.79E-02
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 #CPUT: Total CPU Time in Seconds,      507.315
