18/09/2017
12:32
$PROBLEM    Phenobarbital PK in newborns
$INPUT      ID DOSE=AMT ;in mg
            CONC=DV ;in mg/L
            WEIGHT ;in kg
            CMT ;1 oral depot,2 central
            TIME ;in hours
            RATE ;in mg/h
            BWEIGHT ;birthweight in kg
            AGE ;postnatal age in days
            MDV
$DATA      PhenobarbPK.csv IGNORE=@
$SUBROUTINE ADVAN2 TRANS2
$PK

;;; VWEIGHT-DEFINITION START
VWEIGHT = ( 1 + THETA(6)*(WEIGHT - 2.70))
;;; VWEIGHT-DEFINITION END

;;; V-RELATION START
VCOV=VWEIGHT
;;; V-RELATION END

;;; CLBW-DEFINITION START
CLBW = ( 1 + THETA(5)*(BWEIGHT - 2.59))
;;; CLBW-DEFINITION END

;;; CLAGE-DEFINITION START
CLAGE = ( 1 + THETA(4)*(AGE - 4.50))
;;; CLAGE-DEFINITION END

;;; CL-RELATION START
CLCOV=CLAGE*CLBW
;;; CL-RELATION END

TVCL = THETA(1) * CLCOV
TVV  = THETA(2) * VCOV
CL   = TVCL*EXP(ETA(1))
V    = TVV*EXP(ETA(2))
F1   = THETA(8)
KA   = THETA(7)
S2   = V
K    = CL/V

$ERROR
IPRED = F
W = SQRT(THETA(3) * IPRED**2)
IWRES = (DV-IPRED) / W
Y= IPRED + EPS(1) * W

$THETA  (0,0.02) ; CL
$THETA  (0,2) ; V
$THETA  (0,0.0243487) ; prop error
$THETA  (-0.010,0.05,0.2) ; CLAGE
$THETA  (-0.205,0.03,0.5) ; CLBW
$THETA  (-0.555,0.3,0.444) ; VWEIGHT
$THETA  50 FIX ; KA
$THETA  (0,0.5,1) ; F
$OMEGA  0.0898511
$OMEGA  0.0432159
$SIGMA  1  FIX
$ESTIMATION METHOD=1 INTERACTION MAXEVALS=9990 POSTHOC
$COVARIANCE
$TABLE      ID TIME PRED IPRED RES WRES IWRES CWRES K KA CL V ETA1
            ETA2 ONEHEADER NOPRINT NOAPPEND FILE=sdtab522

NM-TRAN MESSAGES
 WARNINGS AND ERRORS (IF ANY) FOR PROBLEM    1
 (WARNING  2) NM-TRAN INFERS THAT THE DATA ARE POPULATION.

1NONLINEAR MIXED EFFECTS MODEL PROGRAM (NONMEM) VERSION 7.3.0
 ORIGINALLY DEVELOPED BY STUART BEAL, LEWIS SHEINER, AND ALISON BOECKMANN
 CURRENT DEVELOPERS ARE ROBERT BAUER, ICON DEVELOPMENT SOLUTIONS,
 AND ALISON BOECKMANN. IMPLEMENTATION, EFFICIENCY, AND STANDARDIZATION
 PERFORMED BY NOUS INFOSYSTEMS.
 PROBLEM NO.:         1
 Phenobarbital PK in newborns
 TOT. NO. OF OBS RECS:      229
 TOT. NO. OF INDIVIDUALS:     53
 ONE COMPARTMENT MODEL WITH FIRST-ORDER ABSORPTION (ADVAN2)
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 #TBLN:      1
 #METH: First Order Conditional Estimation with Interaction
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
 #TERM:
0MINIMIZATION SUCCESSFUL
 NO. OF FUNCTION EVALUATIONS USED:      259
 NO. OF SIG. DIGITS IN FINAL EST.:  3.8

 ETABAR IS THE ARITHMETIC MEAN OF THE ETA-ESTIMATES,
 AND THE P-VALUE IS GIVEN FOR THE NULL HYPOTHESIS THAT THE TRUE MEAN IS 0.

 ETABAR:         9.9041E-03 -5.6421E-03
 SE:             3.0741E-02  2.5959E-02
 N:                      53          53

 P VAL.:         7.4732E-01  8.2794E-01

 ETAshrink(%):   2.4584E+01  1.4987E+01
 EBVshrink(%):   2.5570E+01  1.5663E+01
 EPSshrink(%):   1.5104E+01

 #TERE:
 Elapsed estimation time in seconds:     5.23
 Elapsed covariance time in seconds:     7.69

 ********************               FIRST ORDER CONDITIONAL ESTIMATION WITH INTERACTION              ********************
 #OBJT:**************                       MINIMUM VALUE OF OBJECTIVE FUNCTION                      ********************
 #OBJV:********************************************     1129.151       **************************************************

 ********************               FIRST ORDER CONDITIONAL ESTIMATION WITH INTERACTION              ********************
 ********************                             FINAL PARAMETER ESTIMATE                           ********************

 THETA - VECTOR OF FIXED EFFECTS PARAMETERS   *********
         TH 1      TH 2      TH 3      TH 4      TH 5      TH 6      TH 7      TH 8
         9.09E-03  2.38E+00  2.58E-02  5.33E-02  3.69E-01  3.09E-01  5.00E+01  5.94E-01

 OMEGA - COV MATRIX FOR RANDOM EFFECTS - ETAS  ********
            ETA1      ETA2
 ETA1
+        8.98E-02
 ETA2
+        0.00E+00  5.04E-02

 SIGMA - COV MATRIX FOR RANDOM EFFECTS - EPSILONS  ****
            EPS1
 EPS1
+        1.00E+00

 OMEGA - CORR MATRIX FOR RANDOM EFFECTS - ETAS  *******
            ETA1      ETA2
 ETA1
+        3.00E-01
 ETA2
+        0.00E+00  2.24E-01

 SIGMA - CORR MATRIX FOR RANDOM EFFECTS - EPSILONS  ***
            EPS1
 EPS1
+        1.00E+00

 ********************               FIRST ORDER CONDITIONAL ESTIMATION WITH INTERACTION              ********************
 ********************                            STANDARD ERROR OF ESTIMATE                          ********************

 THETA - VECTOR OF FIXED EFFECTS PARAMETERS   *********
         TH 1      TH 2      TH 3      TH 4      TH 5      TH 6      TH 7      TH 8
         8.49E-04  1.17E-01  5.80E-03  1.41E-02  1.79E-02  2.36E-02 .........  5.82E-02

 OMEGA - COV MATRIX FOR RANDOM EFFECTS - ETAS  ********
            ETA1      ETA2
 ETA1
+        2.59E-02
 ETA2
+       .........  2.04E-02

 SIGMA - COV MATRIX FOR RANDOM EFFECTS - EPSILONS  ****
            EPS1
 EPS1
+       .........

 OMEGA - CORR MATRIX FOR RANDOM EFFECTS - ETAS  *******
            ETA1      ETA2
 ETA1
+        4.32E-02
 ETA2
+       .........  4.55E-02

 SIGMA - CORR MATRIX FOR RANDOM EFFECTS - EPSILONS  ***
            EPS1
 EPS1
+       .........

 ********************               FIRST ORDER CONDITIONAL ESTIMATION WITH INTERACTION              ********************
 ********************                          COVARIANCE MATRIX OF ESTIMATE                         ********************

            TH 1      TH 2      TH 3      TH 4      TH 5      TH 6      TH 7      TH 8      OM11      OM12      OM22      SG11
 TH 1
+        7.21E-07
 TH 2
+       -5.23E-05  1.38E-02
 TH 3
+       -1.49E-06  3.49E-04  3.36E-05
 TH 4
+       -8.16E-06  6.86E-04  1.18E-05  1.99E-04
 TH 5
+        2.08E-06  8.96E-05 -1.55E-05  7.33E-05  3.20E-04
 TH 6
+       -1.80E-06  1.06E-03  1.52E-05 -6.74E-06  2.01E-04  5.59E-04
 TH 7
+       ......... ......... ......... ......... ......... ......... .........
 TH 8
+       -1.70E-05  1.62E-03  5.59E-06  4.43E-04  3.76E-05  4.39E-05 .........  3.38E-03
 OM11
+       -4.31E-06  2.91E-04 -1.07E-05  1.64E-04  4.60E-05 -1.74E-04 .........  6.14E-04  6.72E-04
 OM12
+       ......... ......... ......... ......... ......... ......... ......... ......... ......... .........
 OM22
+        3.66E-06  1.33E-05  6.67E-06 -3.49E-05 -9.28E-05 -1.98E-04 ......... -1.29E-04 -3.70E-05 .........  4.18E-04
 SG11
+       ......... ......... ......... ......... ......... ......... ......... ......... ......... ......... ......... .........

 ********************               FIRST ORDER CONDITIONAL ESTIMATION WITH INTERACTION              ********************
 ********************                          CORRELATION MATRIX OF ESTIMATE                        ********************

            TH 1      TH 2      TH 3      TH 4      TH 5      TH 6      TH 7      TH 8      OM11      OM12      OM22      SG11
 TH 1
+        8.49E-04
 TH 2
+       -5.24E-01  1.17E-01
 TH 3
+       -3.03E-01  5.12E-01  5.80E-03
 TH 4
+       -6.81E-01  4.13E-01  1.44E-01  1.41E-02
 TH 5
+        1.37E-01  4.26E-02 -1.49E-01  2.90E-01  1.79E-02
 TH 6
+       -8.96E-02  3.81E-01  1.11E-01 -2.02E-02  4.76E-01  2.36E-02
 TH 7
+       ......... ......... ......... ......... ......... ......... .........
 TH 8
+       -3.44E-01  2.37E-01  1.66E-02  5.40E-01  3.62E-02  3.19E-02 .........  5.82E-02
 OM11
+       -1.96E-01  9.57E-02 -7.11E-02  4.47E-01  9.93E-02 -2.84E-01 .........  4.07E-01  2.59E-02
 OM12
+       ......... ......... ......... ......... ......... ......... ......... ......... ......... .........
 OM22
+        2.11E-01  5.54E-03  5.63E-02 -1.21E-01 -2.54E-01 -4.10E-01 ......... -1.09E-01 -6.99E-02 .........  2.04E-02
 SG11
+       ......... ......... ......... ......... ......... ......... ......... ......... ......... ......... ......... .........
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 #CPUT: Total CPU Time in Seconds,       13.260
