18/09/2017
12:47
$PROBLEM    Phenobarbital PK in newborns
$INPUT      ID DOSE=AMT ;in mg
            CONC=DV ;in mg/L
            WEIGHT ;in kg
            CMT ;1 oral depot,2 central
            TIME ;in hours
            RATE ;in mg/h
            BWEIGHT ;birthweight in kg
            AGE ;postnatal age in days
            MDV
$DATA      SimulatedPhenobarbitalNewbornsPK.csv IGNORE=@
$SUBROUTINE ADVAN2 TRANS2
$PK

;;; VWEIGHT-DEFINITION START
VWEIGHT = ( 1 + THETA(6)*(WEIGHT - 2.70))
;;; VWEIGHT-DEFINITION END

;;; V-RELATION START
VCOV=VWEIGHT
;;; V-RELATION END

;;; CLBW-DEFINITION START
CLBW = ( 1 + THETA(5)*(BWEIGHT - 2.59))
;;; CLBW-DEFINITION END

;;; CLAGE-DEFINITION START
CLAGE = ( 1 + THETA(4)*(AGE - 4.50))
;;; CLAGE-DEFINITION END

;;; CL-RELATION START
CLCOV=CLAGE*CLBW
;;; CL-RELATION END

TVCL = THETA(1) * CLCOV
TVV  = THETA(2) * VCOV
CL   = TVCL*EXP(ETA(1))
V    = TVV*EXP(ETA(2))
F1   = THETA(8)
KA   = THETA(7)
S2   = V
K    = CL/V

$ERROR
IPRED = F
W = SQRT(THETA(3) * IPRED**2)
IWRES = (DV-IPRED) / W
Y= IPRED + EPS(1) * W

$THETA  (0,0.00909) ; CL
 (0,2.38) ; V
 (0,0.0258) ; prop error
 (-0.01,0.0533,0.2) ; CLAGE
 (-0.205,0.369,0.5) ; CLBW
 (-0.555,0.309,0.444) ; VWEIGHT
 50 FIX ; KA
 (0,0.594,1) ; F
$OMEGA  0.0898
$OMEGA  0.0504
$SIGMA  1  FIX
$ESTIMATION METHOD=1 INTERACTION MAXEVALS=9990 POSTHOC
$COVARIANCE
$TABLE      ID TIME PRED IPRED RES WRES IWRES CWRES K KA CL V ETA1
            ETA2 ONEHEADER NOPRINT NOAPPEND FILE=sdtab524

NM-TRAN MESSAGES
 WARNINGS AND ERRORS (IF ANY) FOR PROBLEM    1
 (WARNING  2) NM-TRAN INFERS THAT THE DATA ARE POPULATION.

1NONLINEAR MIXED EFFECTS MODEL PROGRAM (NONMEM) VERSION 7.3.0
 ORIGINALLY DEVELOPED BY STUART BEAL, LEWIS SHEINER, AND ALISON BOECKMANN
 CURRENT DEVELOPERS ARE ROBERT BAUER, ICON DEVELOPMENT SOLUTIONS,
 AND ALISON BOECKMANN. IMPLEMENTATION, EFFICIENCY, AND STANDARDIZATION
 PERFORMED BY NOUS INFOSYSTEMS.
 PROBLEM NO.:         1
 Phenobarbital PK in newborns
 TOT. NO. OF OBS RECS:       31
 TOT. NO. OF INDIVIDUALS:      5
 ONE COMPARTMENT MODEL WITH FIRST-ORDER ABSORPTION (ADVAN2)
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 #TBLN:      1
 #METH: First Order Conditional Estimation with Interaction
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
 #TERM:
0MINIMIZATION SUCCESSFUL
 NO. OF FUNCTION EVALUATIONS USED:      289
 NO. OF SIG. DIGITS IN FINAL EST.:  3.5
0PARAMETER ESTIMATE IS NEAR ITS BOUNDARY
 THIS MUST BE ADDRESSED BEFORE THE COVARIANCE STEP CAN BE IMPLEMENTED

 ETABAR IS THE ARITHMETIC MEAN OF THE ETA-ESTIMATES,
 AND THE P-VALUE IS GIVEN FOR THE NULL HYPOTHESIS THAT THE TRUE MEAN IS 0.

 ETABAR:         3.1109E-09 -2.0057E-09
 SE:             2.9517E-05  9.3577E-06
 N:                       5           5

 P VAL.:         9.9992E-01  9.9983E-01

 ETAshrink(%):   9.7538E+01  9.8958E+01
 EBVshrink(%):   9.7017E+01  9.7520E+01
 EPSshrink(%):   1.2881E-02

 #TERE:
 Elapsed estimation time in seconds:     0.59

 ********************               FIRST ORDER CONDITIONAL ESTIMATION WITH INTERACTION              ********************
 #OBJT:**************                       MINIMUM VALUE OF OBJECTIVE FUNCTION                      ********************
 #OBJV:********************************************      114.897       **************************************************

 ********************               FIRST ORDER CONDITIONAL ESTIMATION WITH INTERACTION              ********************
 ********************                             FINAL PARAMETER ESTIMATE                           ********************

 THETA - VECTOR OF FIXED EFFECTS PARAMETERS   *********
         TH 1      TH 2      TH 3      TH 4      TH 5      TH 6      TH 7      TH 8
         1.04E-02  3.30E+00  2.87E-02  6.38E-02  4.47E-01  3.13E-01  5.00E+01  6.47E-01

 OMEGA - COV MATRIX FOR RANDOM EFFECTS - ETAS  ********
            ETA1      ETA2
 ETA1
+        8.98E-06
 ETA2
+        0.00E+00  5.04E-06

 SIGMA - COV MATRIX FOR RANDOM EFFECTS - EPSILONS  ****
            EPS1
 EPS1
+        1.00E+00

 OMEGA - CORR MATRIX FOR RANDOM EFFECTS - ETAS  *******
            ETA1      ETA2
 ETA1
+        3.00E-03
 ETA2
+        0.00E+00  2.24E-03

 SIGMA - CORR MATRIX FOR RANDOM EFFECTS - EPSILONS  ***
            EPS1
 EPS1
+        1.00E+00
 #CPUT: Total CPU Time in Seconds,        0.593
