13/12/2017
13:42
$PROBLEM    Propacetamol (APAP) in young (pregnant) women
$INPUT      ID DROP TIME ; in hours
            MDV RATE ; in mg/h
            DROP AMT ; in mg
            CMT ; see definitions under $MODEL
            DROP EVID DV ; mg/L (plasma) or mg (urine)
            BW ; in kg
            DROP DROP DROP DROP TERM ; term birth yes(1) / no(0)
            OCC ; 1=pregnant,2=2 weeks post delivery,3=1 year post delivery,4=volunteer no BC,5=volunteer on BC
            DROP DROP DROP DROP DROP DROP BC ; on Birth control yes(1) / no(0)
            UF ; urine flow mL/h

; CL and Q = L/h

; V = L

; ka = /h
$DATA      OriginalData.prn
$SUBROUTINE ADVAN6 TOL=5
$MODEL      NCOMPARTMENTS=8 COMP=(CENTRAL,DEFDOSE) ;1 Plasma central APAP
            COMP=(PERIAPAP) ;2 Plasma perpheral APAP 1
            COMP=(PAPAPG) ;3 PLASMA APAP-Glucuronide
            COMP=(PAPAPS) ;4 PLASMA APAP-Sulphate
            COMP=(UAPAPG) ;5 URINE APAP-Glucuronide
            COMP=(UAPAPS) ;6 URINE APAP-Sulphate
            COMP=(UAPAP) ;7 URINE APAP
            COMP=(PERI2) ;8 Plasma perpheral APAP 2
$PK
V2=THETA(5)
V1=THETA(8)*EXP(ETA(1))
IF(OCC.EQ.1) V1=(THETA(1)*THETA(8))*EXP(ETA(1))
Q1=(THETA(6)*((BW/70)**1))
V3=V1*0.18
V4=V3
NEO=0
IF(BC.EQ.1) NEO=1
CLG=THETA(9)*EXP(ETA(2))
IF(OCC.EQ.1) CLG=(THETA(2)*THETA(9))*EXP(ETA(2))
IF(OCC.EQ.2) CLG=THETA(11)*THETA(9)*EXP(ETA(2))
ICLG=CLG
IF(BC.EQ.1) CLG=THETA(12)*ICLG
CLS=(TERM*THETA(3)+(1-TERM)*THETA(10))*EXP(ETA(3))
RCUF=(THETA(16)*(UF-100))
IF(UF.EQ.0) RCUF=0
CLA=(THETA(4)+RCUF)*EXP(ETA(4))
V8=THETA(13)
Q2=THETA(14)
IF(OCC.EQ.2) Q2=(THETA(15)*THETA(14))
CLT=CLS+CLG+CLA

K12=Q1/V1
K21=Q1/V2
K18=Q2/V1
K81=Q2/V8
K13=CLG/V1
K14=CLS/V1
K17=CLA/V1
K35=THETA(7)*K17
K46=K35
CLG2=K35*V3
CLS2=K46*V4

S1=V1
S3=V3
S4=V4
S5=1
S6=1
S7=1

$DES
DADT(1)=-K12*A(1)+K21*A(2)-K13*A(1)-K14*A(1)-K17*A(1)-K18*A(1)+K81*A(8)
DADT(2)=K12*A(1)-K21*A(2)
DADT(3)=K13*A(1)-K35*A(3)
DADT(4)=K14*A(1)-K46*A(4)
DADT(5)=K35*A(3)
DADT(6)=K46*A(4)
DADT(7)=K17*A(1)
DADT(8)=K18*A(1)-K81*A(8)

$ERROR
COM1=0
IF(CMT.EQ.1) COM1=1
COM5=0
IF(CMT.EQ.5) COM5=1
COM6=0
IF(CMT.EQ.6) COM6=1
COM7=0
IF(CMT.EQ.7) COM7=1
GREG=0
IF(OCC.EQ.5) GREG=1
IPRE=F

Y1=F*(1+ERR(1))
Y2=F*(1+ERR(5))+ERR(6)
Y5=F*(1+ERR(2))
Y6=F*(1+ERR(3))
Y7=F*(1+ERR(4))
Y=(1-GREG)*(COM1*Y1+COM5*Y5+COM6*Y6+COM7*Y7)+ GREG*Y2

$THETA  (0,1.9) ; fractional V1 difference OCC=1 TH1
 (0,2) ; fractional CL formation APAP-G for OCC=1 TH2
 (0,5.6) ; CL formation APAP-S for TERM=0 TH3
 (0,0.92) ; CL of unchanged APAP TH4
 (0,20) ; V2 TH5
 (0,1.3) ; Q1 TH6
 (0,4.6) ; k35 as fraction of k17 TH7
 (0,18) ; V1 for OCC > 1TH8
 (0,7.3) ; CL formation APAP-G TH9
 (0,3.9) ; CL formation APAP-S for TERM=1 TH10
 (0,0.55) ; fractional CL formation APAP-G for OCC=2 TH11
 (0,1.5) ; fractional CL formation APAP-G for BC=1 TH12
 (0,24) ; V8 TH13
 (0,61) ; Q2 if OCC!=2 TH14
 (0,0.13) ; fractional Q2 for OCC=2 TH15
 (0,0.0054) ; slope impact UF TH16
$OMEGA  0.1  ;    V1 ETA1
 0.1  ; CL fomation APAP-G ETA2
 0  FIX  ; CL fomation APAP-S ETA3
 0.1  ; CL unchanged APAP ETA4
$SIGMA  0.1  ; APAP plasma PROP EPS1
 0.1  ; APAP-G URINE PROP EPS2
 0.1  ; APAP-S URINE PROP EPS3
 0.1  ; APAP URINE PROP EPS4
 0.01  ; PROP error in OCC=5 EPS5
 0.001  ; ADD error in OCC=5 EPS6
$ESTIMATION NOABORT SIGDIG=3 PRINT=5 MAXEVAL=9999 METHOD=1 INTERACTION
            POSTHOC
$COVARIANCE COMP
$TABLE      ID TIME MDV RATE AMT CMT EVID DV BW TERM OCC BC UF V1 V2
            V8 Q1 Q2 CLG CLS CLA CLT IPRE PRED FILE=OriginalOutput.csv
            NOPRINT NOAPPEND

NM-TRAN MESSAGES
 WARNINGS AND ERRORS (IF ANY) FOR PROBLEM    1
 (WARNING  2) NM-TRAN INFERS THAT THE DATA ARE POPULATION.

1NONLINEAR MIXED EFFECTS MODEL PROGRAM (NONMEM) VERSION 7.3.0
 ORIGINALLY DEVELOPED BY STUART BEAL, LEWIS SHEINER, AND ALISON BOECKMANN
 CURRENT DEVELOPERS ARE ROBERT BAUER, ICON DEVELOPMENT SOLUTIONS,
 AND ALISON BOECKMANN. IMPLEMENTATION, EFFICIENCY, AND STANDARDIZATION
 PERFORMED BY NOUS INFOSYSTEMS.
 PROBLEM NO.:         1
 Propacetamol (APAP) in young (pregnant) women
 TOT. NO. OF OBS RECS:     1118
 TOT. NO. OF INDIVIDUALS:     69
 GENERAL NONLINEAR KINETICS MODEL (ADVAN6)
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 #TBLN:      1
 #METH: First Order Conditional Estimation with Interaction
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
 #TERM:
0MINIMIZATION SUCCESSFUL
 NO. OF FUNCTION EVALUATIONS USED:     1024
 NO. OF SIG. DIGITS IN FINAL EST.:  3.9

 ETABAR IS THE ARITHMETIC MEAN OF THE ETA-ESTIMATES,
 AND THE P-VALUE IS GIVEN FOR THE NULL HYPOTHESIS THAT THE TRUE MEAN IS 0.

 ETABAR:         5.2586E-03  6.0166E-03  0.0000E+00 -4.9350E-03
 SE:             2.7752E-02  3.9481E-02  0.0000E+00  2.9373E-02
 N:                      69          69          69          69

 P VAL.:         8.4971E-01  8.7888E-01  1.0000E+00  8.6657E-01

 ETAshrink(%):   2.1137E+01  4.9008E+00  1.0000E+02  2.9586E+01
 EBVshrink(%):   2.1531E+01  5.5870E+00  0.0000E+00  3.0251E+01
 EPSshrink(%):   6.1024E+00  3.2188E+00  7.4604E+00  1.0085E+01  2.8517E+00  2.8517E+00

 #TERE:
 Elapsed estimation time in seconds:   471.07
 Elapsed covariance time in seconds:  2385.75

 ********************               FIRST ORDER CONDITIONAL ESTIMATION WITH INTERACTION              ********************
 #OBJT:**************                       MINIMUM VALUE OF OBJECTIVE FUNCTION                      ********************
 #OBJV:********************************************     5286.743       **************************************************

 ********************               FIRST ORDER CONDITIONAL ESTIMATION WITH INTERACTION              ********************
 ********************                             FINAL PARAMETER ESTIMATE                           ********************

 THETA - VECTOR OF FIXED EFFECTS PARAMETERS   *********
         TH 1      TH 2      TH 3      TH 4      TH 5      TH 6      TH 7      TH 8      TH 9      TH10      TH11      TH12
          TH13      TH14      TH15      TH16
         1.86E+00  2.03E+00  5.61E+00  9.25E-01  1.97E+01  1.29E+00  4.62E+00  1.85E+01  7.33E+00  3.86E+00  5.47E-01  1.46E+00
          2.39E+01  6.11E+01  1.28E-01  5.35E-03

 OMEGA - COV MATRIX FOR RANDOM EFFECTS - ETAS  ********
            ETA1      ETA2      ETA3      ETA4
 ETA1
+        8.67E-02
 ETA2
+        0.00E+00  1.21E-01
 ETA3
+        0.00E+00  0.00E+00  0.00E+00
 ETA4
+        0.00E+00  0.00E+00  0.00E+00  1.22E-01

 SIGMA - COV MATRIX FOR RANDOM EFFECTS - EPSILONS  ****
            EPS1      EPS2      EPS3      EPS4      EPS5      EPS6
 EPS1
+        6.95E-02
 EPS2
+        0.00E+00  2.92E-01
 EPS3
+        0.00E+00  0.00E+00  1.47E-01
 EPS4
+        0.00E+00  0.00E+00  0.00E+00  1.52E-01
 EPS5
+        0.00E+00  0.00E+00  0.00E+00  0.00E+00  1.69E-02
 EPS6
+        0.00E+00  0.00E+00  0.00E+00  0.00E+00  0.00E+00  1.60E-02

 OMEGA - CORR MATRIX FOR RANDOM EFFECTS - ETAS  *******
            ETA1      ETA2      ETA3      ETA4
 ETA1
+        2.94E-01
 ETA2
+        0.00E+00  3.47E-01
 ETA3
+        0.00E+00  0.00E+00  0.00E+00
 ETA4
+        0.00E+00  0.00E+00  0.00E+00  3.49E-01

 SIGMA - CORR MATRIX FOR RANDOM EFFECTS - EPSILONS  ***
            EPS1      EPS2      EPS3      EPS4      EPS5      EPS6
 EPS1
+        2.64E-01
 EPS2
+        0.00E+00  5.41E-01
 EPS3
+        0.00E+00  0.00E+00  3.84E-01
 EPS4
+        0.00E+00  0.00E+00  0.00E+00  3.90E-01
 EPS5
+        0.00E+00  0.00E+00  0.00E+00  0.00E+00  1.30E-01
 EPS6
+        0.00E+00  0.00E+00  0.00E+00  0.00E+00  0.00E+00  1.26E-01

 ********************               FIRST ORDER CONDITIONAL ESTIMATION WITH INTERACTION              ********************
 ********************                            STANDARD ERROR OF ESTIMATE                          ********************

 THETA - VECTOR OF FIXED EFFECTS PARAMETERS   *********
         TH 1      TH 2      TH 3      TH 4      TH 5      TH 6      TH 7      TH 8      TH 9      TH10      TH11      TH12
          TH13      TH14      TH15      TH16
         1.18E-01  2.02E-01  4.36E-01  5.90E-02  6.54E+00  1.96E-01  5.30E-01  1.35E+00  6.95E-01  2.06E-01  9.71E-02  2.11E-01
          1.31E+00  5.37E+00  3.08E-02  1.44E-03

 OMEGA - COV MATRIX FOR RANDOM EFFECTS - ETAS  ********
            ETA1      ETA2      ETA3      ETA4
 ETA1
+        2.07E-02
 ETA2
+       .........  2.88E-02
 ETA3
+       ......... ......... .........
 ETA4
+       ......... ......... .........  7.49E-02

 SIGMA - COV MATRIX FOR RANDOM EFFECTS - EPSILONS  ****
            EPS1      EPS2      EPS3      EPS4      EPS5      EPS6
 EPS1
+        9.10E-03
 EPS2
+       .........  1.42E-01
 EPS3
+       ......... .........  3.79E-02
 EPS4
+       ......... ......... .........  3.18E-02
 EPS5
+       ......... ......... ......... .........  3.65E-03
 EPS6
+       ......... ......... ......... ......... .........  1.01E-02

 OMEGA - CORR MATRIX FOR RANDOM EFFECTS - ETAS  *******
            ETA1      ETA2      ETA3      ETA4
 ETA1
+        3.52E-02
 ETA2
+       .........  4.15E-02
 ETA3
+       ......... ......... .........
 ETA4
+       ......... ......... .........  1.07E-01

 SIGMA - CORR MATRIX FOR RANDOM EFFECTS - EPSILONS  ***
            EPS1      EPS2      EPS3      EPS4      EPS5      EPS6
 EPS1
+        1.73E-02
 EPS2
+       .........  1.31E-01
 EPS3
+       ......... .........  4.94E-02
 EPS4
+       ......... ......... .........  4.07E-02
 EPS5
+       ......... ......... ......... .........  1.40E-02
 EPS6
+       ......... ......... ......... ......... .........  4.00E-02
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 #CPUT: Total CPU Time in Seconds,     2848.453
