13/12/2017
16:50
$PROBLEM    Morphine PK across paediatric age-range
$INPUT      ID TIME ;in min
            AMT ;in microgram (ug)
            RATE ;in ug/min
            DV ;natural logarithm of concentration
            MDV CONC ;ug/L
            CMT ;1=morphine central plasma
            BW ;bodyweight in kg
            POP ;value=2 --> young children - adolscents,value !=2 --> newborns and young children and adults (see publication)
            FLAG ;flag for additional error in concentration measurements after infusion stop in one of the studies (see publication)
$DATA      OriginalDataModel1.csv IGNORE=I
$SUBROUTINE ADVAN5
;-------------------------------------------------------------------------------
$MODEL      NCOMPARTMENTS=2 COMP (CENTRAL,DEFDOSE) ;MORPHINE CENTRAL
            COMP=(2) ;PERPHERAL COM OF MORHINE

;-------------------------------------------------------------------------------
$PK
KDEC    = THETA(1)                      ; DECREASE OF EXPONENT FOR CLM1
KMAX    = THETA(2)+KDEC                 ; MAXIMUM EXPONENT OF CLM1
KHAL    = THETA(3)                      ; K50 OF CLM1
GAMMA   = THETA(4)                      ; GAMMA OF CLM1
KBDE    = KMAX-KDEC*(BW**GAMMA)/(KHAL**GAMMA+BW**GAMMA)

;-------------------------------------------------------------------------------
TVCL    = THETA(5)*(BW/70)**KBDE        ; POPULATION CLEARANCE OF MORPHINE
CL      = TVCL*EXP(ETA(1))              ; INDIVIDUAL ...
TVQ2    = THETA(6)*(BW/70)              ; POPULATION INTERCOMPARTMENTAL CLEARANCE OF MORHPINE
IF (POP.EQ.2) TVQ2= THETA(10)
Q2      = TVQ2*EXP(ETA(2))              ; INDIVIDUAL ...

;-------------------------------------------------------------------------------
TVV1    = THETA(7)*(BW/70)              ; POPULATION VOLUME OF MORPHINE CENTRAL COMPARTMENT
IF (POP.EQ.2) TVV1=THETA(11)*(BW/70);
V1      = TVV1 * EXP(ETA(3))            ; INDIVIDUAL ...

TVV2    = THETA(8)*(BW/70)              ; POPULATION VOLUME OF MORPHINE PEREPHERAL COMPARTMENT
V2      = TVV2*EXP(ETA(4))              ; INDIVIDUAL ...

;--------------------------------------------------------------------------------------------
ET1  = ETA(1)
ET2  = ETA(2)
ET3  = ETA(3)
ET4  = ETA(4)

;-------------------------------------------------------------------------------
S1=V1
;-------------------------------------------------------------------------------
K10  = CL/V1
K12  = Q2/V1
K21  = Q2/V2

F1      = 1
IF (POP.EQ.3)  F1 = 0.88

;-------------------------------------------------------------------------------
$ERROR
IPRED=LOG(0.000001)
IF (F.GT.0) IPRED = LOG(F)
W   =  THETA(9)
IRES  = IPRED-DV
IWRES = IRES/W
TEH=0
IF (TIME.GT.1900.AND.FLAG.EQ.1) TEH = 1
IF (TIME.GT.1900.AND.FLAG.EQ.2) TEH = 1
Y = IPRED + ERR(1)*W + TEH*ERR(2)

;-------------------------------------------------------------------------------
$THETA  (0.1,0.5) ; KDEC (TH1)
 (0.2,0.9) ; KMAX-KDEC OR MINMUM EXP (TH2)
 (0.05,4,20) ; KHAL (TH3)
 (1,5) ; GAMMA (TH4)
 (0.001,1.5) ; CL (TH5)
 (0.01,1.7) ; Q2 (TH6)
 (0.1,70) ; V1 (TH7)
 (0.1,100) ; V2 (TH8)
 (0,0.33) ; ERR1 (TH9)
 (0.1,1.1) ; Q2 ADO (TH10)
 (0.1,50) ; V1 ADO (TH11)
;-------------------------------------------------------------------------------
$OMEGA  0.15  ;         CL
 0  FIX  ;         Q2
 0.1  ;         V1
 0  FIX  ;         V2
;-------------------------------------------------------------------------------
$SIGMA  1  FIX  ;       ERR1
 2  ; ERR2 for FLAG
;-------------------------------------------------------------------------------
$ESTIMATION NOABORT SIGDIG=3 PRINT=15 MAXEVAL=9999 METHOD=1
            INTERACTION POSTHOC
$COVARIANCE COMP PRINT=E
$TABLE      ID TIME AMT RATE DV PRED IWRES CWRES IPRED MDV CONC CMT BW
            POP FLAG KBDE TVCL CL Q2 TVV1 V1 V2 ET1 ET2 ET3 ET4
            NOPRINT ONEHEADER NOAPPEND FILE=sdtabOriginalModel1

NM-TRAN MESSAGES
 WARNINGS AND ERRORS (IF ANY) FOR PROBLEM    1
 (WARNING  2) NM-TRAN INFERS THAT THE DATA ARE POPULATION.

1NONLINEAR MIXED EFFECTS MODEL PROGRAM (NONMEM) VERSION 7.3.0
 ORIGINALLY DEVELOPED BY STUART BEAL, LEWIS SHEINER, AND ALISON BOECKMANN
 CURRENT DEVELOPERS ARE ROBERT BAUER, ICON DEVELOPMENT SOLUTIONS,
 AND ALISON BOECKMANN. IMPLEMENTATION, EFFICIENCY, AND STANDARDIZATION
 PERFORMED BY NOUS INFOSYSTEMS.
 PROBLEM NO.:         1
 Morphine PK across paediatric age-range
 TOT. NO. OF OBS RECS:     1529
 TOT. NO. OF INDIVIDUALS:    472
 GENERAL LINEAR KINETICS MODEL (ADVAN5)
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 #TBLN:      1
 #METH: First Order Conditional Estimation with Interaction
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
 #TERM:
0MINIMIZATION SUCCESSFUL
 NO. OF FUNCTION EVALUATIONS USED:      454
 NO. OF SIG. DIGITS IN FINAL EST.:  3.2

 ETABAR IS THE ARITHMETIC MEAN OF THE ETA-ESTIMATES,
 AND THE P-VALUE IS GIVEN FOR THE NULL HYPOTHESIS THAT THE TRUE MEAN IS 0.

 ETABAR:         7.5611E-03  0.0000E+00 -6.5090E-04  0.0000E+00
 SE:             1.4015E-02  0.0000E+00  1.1859E-02  0.0000E+00
 N:                     456         456         456         456

 P VAL.:         5.8955E-01  1.0000E+00  9.5623E-01  1.0000E+00

 ETAshrink(%):   2.4897E+01  1.0000E+02  4.9602E+01  1.0000E+02
 EBVshrink(%):   2.4401E+01  0.0000E+00  4.9387E+01  0.0000E+00
 EPSshrink(%):   1.3026E+01  2.5703E+01

 #TERE:
 Elapsed estimation time in seconds:   276.30
 Elapsed covariance time in seconds:   706.06

 ********************               FIRST ORDER CONDITIONAL ESTIMATION WITH INTERACTION              ********************
 #OBJT:**************                       MINIMUM VALUE OF OBJECTIVE FUNCTION                      ********************
 #OBJV:********************************************     -370.263       **************************************************

 ********************               FIRST ORDER CONDITIONAL ESTIMATION WITH INTERACTION              ********************
 ********************                             FINAL PARAMETER ESTIMATE                           ********************

 THETA - VECTOR OF FIXED EFFECTS PARAMETERS   *********
         TH 1      TH 2      TH 3      TH 4      TH 5      TH 6      TH 7      TH 8      TH 9      TH10      TH11
         5.94E-01  8.72E-01  4.01E+00  4.62E+00  1.62E+00  1.90E+00  8.12E+01  1.28E+02  4.32E-01  5.00E-01  4.60E+01

 OMEGA - COV MATRIX FOR RANDOM EFFECTS - ETAS  ********
            ETA1      ETA2      ETA3      ETA4
 ETA1
+        1.59E-01
 ETA2
+        0.00E+00  0.00E+00
 ETA3
+        0.00E+00  0.00E+00  2.53E-01
 ETA4
+        0.00E+00  0.00E+00  0.00E+00  0.00E+00

 SIGMA - COV MATRIX FOR RANDOM EFFECTS - EPSILONS  ****
            EPS1      EPS2
 EPS1
+        1.00E+00
 EPS2
+        0.00E+00  4.55E-01

 OMEGA - CORR MATRIX FOR RANDOM EFFECTS - ETAS  *******
            ETA1      ETA2      ETA3      ETA4
 ETA1
+        3.99E-01
 ETA2
+        0.00E+00  0.00E+00
 ETA3
+        0.00E+00  0.00E+00  5.03E-01
 ETA4
+        0.00E+00  0.00E+00  0.00E+00  0.00E+00

 SIGMA - CORR MATRIX FOR RANDOM EFFECTS - EPSILONS  ***
            EPS1      EPS2
 EPS1
+        1.00E+00
 EPS2
+        0.00E+00  6.74E-01

 ********************               FIRST ORDER CONDITIONAL ESTIMATION WITH INTERACTION              ********************
 ********************                            STANDARD ERROR OF ESTIMATE                          ********************

 THETA - VECTOR OF FIXED EFFECTS PARAMETERS   *********
         TH 1      TH 2      TH 3      TH 4      TH 5      TH 6      TH 7      TH 8      TH 9      TH10      TH11
         3.87E-02  4.27E-02  1.95E-01  1.14E+00  1.16E-01  1.94E-01  6.44E+00  1.05E+01  3.76E-02  1.16E-01  2.76E+00

 OMEGA - COV MATRIX FOR RANDOM EFFECTS - ETAS  ********
            ETA1      ETA2      ETA3      ETA4
 ETA1
+        2.18E-02
 ETA2
+       ......... .........
 ETA3
+       ......... .........  1.40E-01
 ETA4
+       ......... ......... ......... .........

 SIGMA - COV MATRIX FOR RANDOM EFFECTS - EPSILONS  ****
            EPS1      EPS2
 EPS1
+       .........
 EPS2
+       .........  5.11E-01

 OMEGA - CORR MATRIX FOR RANDOM EFFECTS - ETAS  *******
            ETA1      ETA2      ETA3      ETA4
 ETA1
+        2.74E-02
 ETA2
+       ......... .........
 ETA3
+       ......... .........  1.39E-01
 ETA4
+       ......... ......... ......... .........

 SIGMA - CORR MATRIX FOR RANDOM EFFECTS - EPSILONS  ***
            EPS1      EPS2
 EPS1
+       .........
 EPS2
+       .........  3.79E-01
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
 ********************               FIRST ORDER CONDITIONAL ESTIMATION WITH INTERACTION              ********************
 ********************                      EIGENVALUES OF COR MATRIX OF ESTIMATE                     ********************

             1         2         3         4         5         6         7         8         9        10        11        12
             13        14
         2.21E-02  1.08E-01  1.83E-01  2.55E-01  4.38E-01  4.57E-01  4.98E-01  6.95E-01  8.58E-01  9.11E-01  1.08E+00  1.78E+00
          2.73E+00  3.99E+00
 #CPUT: Total CPU Time in Seconds,      983.415
