Fri 12/08/2017
06:47 AM
$SIZES LIM6=1000
$PROBLEM ATOPIC DERMATITIS

$INPUT ID TIME CMT CP=DV  STU STUD MDV EVID NOM_DAY DOSE=AMT DTYP DVVSE PCMT DP DPKG DCH DBY TYPE WT LWT H HM HML

$DATA ..\SIMULATED_DUPULIMAB.CSV IGNORE=S
$SUBROUTINES  ADVAN13 TOL=9
$MODEL COMP=(INJ)
       COMP=(BLD)
       COMP=(AUC)
       COMP=(PER)

$PK
  MU_1=THETA(1)
  MU_2=THETA(2)
  MU_3=THETA(3)
  MU_4=THETA(4)
  MU_5=THETA(5)
  MU_6=THETA(6)
  MU_7=THETA(7)
  MU_8=THETA(8)

  C1=DEXP((LWT-4.317488)*0.75)
  V2=DEXP((MU_1+ETA(1))*C1)
  KE=DEXP(MU_2+ETA(2))
  VM=DEXP(MU_3+ETA(3))
  KA=DEXP(MU_4+ETA(4))
  BIO=MU_5+ETA(5)

  K23=MU_6+ETA(6)
  K32=MU_7+ETA(7)
  KM=MU_8+ETA(8)

  F1=BIO
  S2=V2
  Q=K23*V2
  V3=Q/K32

$ERROR
  CALLFL=0
  IRE=66666
  SIG=66666
  IPRE=F
  SD1=THETA(9)
  SD2=0.03
  SIG=SQRT(F*F*SD1**2 + SD2**2)
  LOQ=0.078

  DUM=(LOQ-IPRE)/SIG
  CUMD=PHI(DUM)

  IF (TYPE.EQ.2) THEN
    F_FLAG=1
    Y=CUMD
  ELSE
    F_FLAG=0
    Y=IPRE*DEXP(ERR(1)*SD1) + ERR(2)*SD2
  ENDIF

  IRE=DV-IPRE
  IF (SIG.LE.0.00001) THEN
    IWRE=66666
  ELSE
    IWRE=IRE/SIG
  ENDIF

$DES
  DADT(1)=-KA*A(1)*DTYP
  DADT(2)=-A(2)*KE-K23*A(2)+K32*A(4)+KA*A(1)*DTYP-A(2)*VM/(KM+A(2)/V2)
  DADT(3)=A(2)/V2
  DADT(4)=K23*A(2)-K32*A(4)

  A1=A(1)
  A2=A(2)/V2
  A3=A(3)
  A4=A(4)

$THETA (-7 1.09 4)          ; POPV2
$THETA (-6 -2.99 1)         ; POPKE
$THETA (-5 0.112 5)         ; POPVM
$THETA (-6 -1.30 6)         ; POPKA
$THETA (0.01,0.638,100)     ; POPBIO

$THETA (0.01,0.154,10)      ; POPK23
$THETA (0.01,0.250,10)      ; POPK32
$THETA (0.01 FIXED)         ; POPKM
$THETA (0.01,0.17,10)       ; POPSD1


$OMEGA DIAGONAL(1) 2.73E-02                           ;ETAV2
$OMEGA BLOCK(2)    2.13E-02                           ;ETAKE
                  -9.25E-03                           ;ETACORR
                   1.23E-02                           ;ETAVM
$OMEGA DIAGONAL(1) 1E-02                              ;ETAKA
$OMEGA DIAGONAL(4) 0 FIX                              ;ETABIO
                   0 FIX                              ;ETAK23
                   0 FIX                              ;ETAK32
                   0 FIX                              ;ETAKM

$SIGMA 1 FIX ; ERRSD1
$SIGMA 1 FIX ; ERRSD2

;1111111111111111111111111111111111111111111111111111111111111111111111111111111
$EST NOABORT PRINT=1 NSIG=3 SIGL=9 NBURN=3000 NITER=1500
  CONSTRAIN=5 CINTERVAL=10 CTYPE=3 NOABORT
  METHOD=SAEM  POSTHOC INTERACTION
  LAPLACIAN DERCONT=1 GRD=TG(1-8):TS(9)
 MSFO=TEST42.MSF
$EST NSIG=3 SIGL=9 NOABORT PRINT=1
  METHOD=IMP EONLY=1 NITER=20 ISAMPLE=20000 MAPITER=0 POSTHOC INTERACTION
  NOABORT LAPLACIAN

$COV PRINT=R UNCONDITIONAL TOL=10 SIGL=10 SIGLO=10

$TABLE ID STU STUD TIME NOM_DAY DTYP DOSE CP IPRE IWRE MDV EVID CMT PCMT DP DPKG DCH DBY
  A1 A2 A3 A4 TYPE WT
  NOHEADER APPEND NOPRINT FORMAT=S1PE17.9E2 FILE=test42.fit

$TABLE  ID STU STUD  DTYP BIO V2 KE KA VM KM V3 Q K23 K32
  FIRSTONLY NOAPPEND NOHEADER NOPRINT FORMAT=S1PE17.9E2
  FILE=DUPILUMAB.PAR

$TABLE  ID STU AMT DTYP ETA1 ETA2 ETA3 ETA4
  FIRSTONLY NOAPPEND NOHEADER NOPRINT FORMAT=S1PE17.9E2
  FILE=DUPILUMAB.ETA

;222222222222222222222222222222222222222222222222222222222222222222222222222222
$PROBLEM OUTPUT FOR PLOTS

$INPUT ID STU STUD TIME NOM_DAY DOSE=AMT DTYP RATE CP=DV DVVSE MDV EVID CMT PCMT
       DP DPKG DCH DBY TYPE WT LWT H HM HML

$DATA ..\DMORETEST2.CSV WIDE REWIND IGNORE S
$MSFI DMORE.MSF

$EST NSIG=3 SIGL=9 NOABORT PRINT=1 CONSTRAIN=5
  METHOD=SAEM NBURN=0 NITER=0 POSTHOC INTERACTION
  LAPLACIAN DERCONT=1 GRD=TG(1-8):TS(9) CTYPE=3 CINTERVAL=10

$TABLE ID STU STUD TIME NOM_DAY DTYP DOSE CP IPRE IWRE MDV EVID CMT PCMT DP DPKG DCH DBY
  A1 A2 A3 A4 DP DPKG TYPE WT
  NOHEADER APPEND NOPRINT FORMAT=S1PE17.9E2 FILE=DUPILUMAB.fi

NM-TRAN MESSAGES
 WARNINGS AND ERRORS (IF ANY) FOR PROBLEM    1
 (WARNING  2) NM-TRAN INFERS THAT THE DATA ARE POPULATION.
 (WARNING  87) WITH "LAPLACIAN" AND "INTERACTION", "NUMERICAL" AND "SLOW"
 ARE ALSO REQUIRED ON $ESTIM RECORD, AND "SLOW" IS REQUIRED ON $COV
 RECORD. NM-TRAN HAS SUPPLIED THESE OPTIONS.
 (WARNING  48) DES-DEFINED ITEMS ARE COMPUTED ONLY WHEN EVENT TIME
 INCREASES. E.G., DISPLAYED VALUES ASSOCIATED WITH THE FIRST EVENT RECORD
 OF AN INDIVIDUAL RECORD ARE COMPUTED WITH (THE LAST ADVANCE TO) AN EVENT
 TIME OF THE PRIOR INDIVIDUAL RECORD.
 (WARNING  87) WITH "LAPLACIAN" AND "INTERACTION", "NUMERICAL" AND "SLOW"
 ARE ALSO REQUIRED ON $ESTIM RECORD, AND "SLOW" IS REQUIRED ON $COV
 RECORD. NM-TRAN HAS SUPPLIED THESE OPTIONS.
 WARNINGS AND ERRORS (IF ANY) FOR PROBLEM    2
 (WARNING  2) NM-TRAN INFERS THAT THE DATA ARE POPULATION.
 (WARNING  66) WITH "LAPLACIAN" AND "INTERACTION", "NUMERICAL" AND "SLOW"
 ARE ALSO REQUIRED ON $ESTIM RECORD. NM-TRAN HAS SUPPLIED THESE OPTIONS.
 (DATA WARNING   2) RECORD         1, DATA ITEM  24, CONTENTS:
 THE NUMBER OF DATA ITEMS SPECIFIED IN $INPUT EXCEEDS THE NUMBER OF VALUES
 IN A RECORD OF THE NM-TRAN DATA FILE. NULLS WERE SUPPLIED FOR MISSING
 VALUES, STARTING WITH THE ABOVE NUMBERED DATA ITEM.
 (DATA WARNING   2) RECORD         2, DATA ITEM  24, CONTENTS:
 THE NUMBER OF DATA ITEMS SPECIFIED IN $INPUT EXCEEDS THE NUMBER OF VALUES
 IN A RECORD OF THE NM-TRAN DATA FILE. NULLS WERE SUPPLIED FOR MISSING
 VALUES, STARTING WITH THE ABOVE NUMBERED DATA ITEM.
 (WARNING  48) DES-DEFINED ITEMS ARE COMPUTED ONLY WHEN EVENT TIME
 INCREASES. E.G., DISPLAYED VALUES ASSOCIATED WITH THE FIRST EVENT RECORD
 OF AN INDIVIDUAL RECORD ARE COMPUTED WITH (THE LAST ADVANCE TO) AN EVENT
 TIME OF THE PRIOR INDIVIDUAL RECORD.
 * THE MAXIMUM NUMBER OF WARNINGS OF ONE OR MORE TYPES WAS REACHED.
 IT IS POSSIBLE THAT SOME WARNING MESSAGES WERE SUPPRESSED.
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
1NONLINEAR MIXED EFFECTS MODEL PROGRAM (NONMEM) VERSION 7.3.0
 ORIGINALLY DEVELOPED BY STUART BEAL, LEWIS SHEINER, AND ALISON BOECKMANN
 CURRENT DEVELOPERS ARE ROBERT BAUER, ICON DEVELOPMENT SOLUTIONS,
 AND ALISON BOECKMANN. IMPLEMENTATION, EFFICIENCY, AND STANDARDIZATION
 PERFORMED BY NOUS INFOSYSTEMS.
 PROBLEM NO.:         1
 ATOPIC DERMATITIS
 TOT. NO. OF OBS RECS:      181
 TOT. NO. OF INDIVIDUALS:     10
 GENERAL NONLINEAR KINETICS MODEL USING LSODA (ADVAN13)
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 #TBLN:      1
 #METH: Stochastic Approximation Expectation-Maximization
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
 #TERM:
 STOCHASTIC PORTION WAS COMPLETED
 REDUCED STOCHASTIC PORTION WAS COMPLETED

 ETABAR IS THE ARITHMETIC MEAN OF THE ETA-ESTIMATES,
 AND THE P-VALUE IS GIVEN FOR THE NULL HYPOTHESIS THAT THE TRUE MEAN IS 0.

 ETABAR:        -1.2651E-07 -6.3599E-08  4.9952E-08  1.8262E-08  0.0000E+00  0.0000E+00  0.0000E+00  0.0000E+00
 SE:             8.9926E-06  2.3699E-06  1.8631E-06  2.3505E-06  0.0000E+00  0.0000E+00  0.0000E+00  0.0000E+00
 N:                      10          10          10          10           0           0           0           0

 P VAL.:         9.8878E-01  9.7859E-01  9.7861E-01  9.9380E-01  1.0000E+00  1.0000E+00  1.0000E+00  1.0000E+00

 ETAshrink(%):   9.8244E+01  9.8339E+01  9.8318E+01  9.7103E+01  0.0000E+00  0.0000E+00  0.0000E+00  0.0000E+00
 EBVshrink(%):   9.8303E+01  9.7957E+01  9.7871E+01  9.7401E+01  0.0000E+00  0.0000E+00  0.0000E+00  0.0000E+00
 EPSshrink(%):   1.0000E-10  1.0000E-10

 #TERE:
 Elapsed estimation time in seconds:  1706.76

 Number of Negative Eigenvalues in Matrix=           1
 Most negative value=  -2097.7156717645689
 Most positive value=   226877467759226.03
 Forcing positive definiteness
 Root mean square deviation of matrix from original=   1.70627158563788609E-011

 Elapsed covariance time in seconds:     0.13

 ********************                STOCHASTIC APPROXIMATION EXPECTATION-MAXIMIZATION               ********************
 #OBJT:**************                        FINAL VALUE OF LIKELIHOOD FUNCTION                      ********************
 #OBJV:********************************************     -271.200       **************************************************

 ********************                STOCHASTIC APPROXIMATION EXPECTATION-MAXIMIZATION               ********************
 ********************                             FINAL PARAMETER ESTIMATE                           ********************

 THETA - VECTOR OF FIXED EFFECTS PARAMETERS   *********
         TH 1      TH 2      TH 3      TH 4      TH 5      TH 6      TH 7      TH 8      TH 9
         7.05E-01 -1.40E+00 -1.08E+00 -1.04E+00  6.15E-01  4.75E-02  1.05E-01  1.00E-02  3.77E-02

 OMEGA - COV MATRIX FOR RANDOM EFFECTS - ETAS  ********
            ETA1      ETA2      ETA3      ETA4      ETA5      ETA6      ETA7      ETA8
 ETA1
+        2.92E-06
 ETA2
+        0.00E+00  2.26E-07
 ETA3
+        0.00E+00 -1.72E-07  1.36E-07
 ETA4
+        0.00E+00  0.00E+00  0.00E+00  7.32E-08
 ETA5
+        0.00E+00  0.00E+00  0.00E+00  0.00E+00  0.00E+00
 ETA6
+        0.00E+00  0.00E+00  0.00E+00  0.00E+00  0.00E+00  0.00E+00
 ETA7
+        0.00E+00  0.00E+00  0.00E+00  0.00E+00  0.00E+00  0.00E+00  0.00E+00
 ETA8
+        0.00E+00  0.00E+00  0.00E+00  0.00E+00  0.00E+00  0.00E+00  0.00E+00  0.00E+00

 SIGMA - COV MATRIX FOR RANDOM EFFECTS - EPSILONS  ****
            EPS1      EPS2
 EPS1
+        1.00E+00
 EPS2
+        0.00E+00  1.00E+00

 OMEGA - CORR MATRIX FOR RANDOM EFFECTS - ETAS  *******
            ETA1      ETA2      ETA3      ETA4      ETA5      ETA6      ETA7      ETA8
 ETA1
+        1.71E-03
 ETA2
+        0.00E+00  4.76E-04
 ETA3
+        0.00E+00 -9.82E-01  3.69E-04
 ETA4
+        0.00E+00  0.00E+00  0.00E+00  2.70E-04
 ETA5
+        0.00E+00  0.00E+00  0.00E+00  0.00E+00  0.00E+00
 ETA6
+        0.00E+00  0.00E+00  0.00E+00  0.00E+00  0.00E+00  0.00E+00
 ETA7
+        0.00E+00  0.00E+00  0.00E+00  0.00E+00  0.00E+00  0.00E+00  0.00E+00
 ETA8
+        0.00E+00  0.00E+00  0.00E+00  0.00E+00  0.00E+00  0.00E+00  0.00E+00  0.00E+00

 SIGMA - CORR MATRIX FOR RANDOM EFFECTS - EPSILONS  ***
            EPS1      EPS2
 EPS1
+        1.00E+00
 EPS2
+        0.00E+00  1.00E+00

 ********************                STOCHASTIC APPROXIMATION EXPECTATION-MAXIMIZATION               ********************
 ********************                          STANDARD ERROR OF ESTIMATE (S)                        ********************

 THETA - VECTOR OF FIXED EFFECTS PARAMETERS   *********
         TH 1      TH 2      TH 3      TH 4      TH 5      TH 6      TH 7      TH 8      TH 9
         3.69E-01  4.73E-02  4.09E-02  5.69E-02  8.80E+01  1.21E+02  1.81E+02  0.00E+00  1.48E+02

 OMEGA - COV MATRIX FOR RANDOM EFFECTS - ETAS  ********
            ETA1      ETA2      ETA3      ETA4      ETA5      ETA6      ETA7      ETA8
 ETA1
+        1.04E-04
 ETA2
+        0.00E+00  3.06E-07
 ETA3
+        0.00E+00  1.12E-07  1.60E-07
 ETA4
+        0.00E+00  0.00E+00  0.00E+00  4.31E-06
 ETA5
+        0.00E+00  0.00E+00  0.00E+00  0.00E+00  0.00E+00
 ETA6
+        0.00E+00  0.00E+00  0.00E+00  0.00E+00  0.00E+00  0.00E+00
 ETA7
+        0.00E+00  0.00E+00  0.00E+00  0.00E+00  0.00E+00  0.00E+00  0.00E+00
 ETA8
+        0.00E+00  0.00E+00  0.00E+00  0.00E+00  0.00E+00  0.00E+00  0.00E+00  0.00E+00

 SIGMA - COV MATRIX FOR RANDOM EFFECTS - EPSILONS  ****
            EPS1      EPS2
 EPS1
+        0.00E+00
 EPS2
+        0.00E+00  0.00E+00

 OMEGA - CORR MATRIX FOR RANDOM EFFECTS - ETAS  *******
            ETA1      ETA2      ETA3      ETA4      ETA5      ETA6      ETA7      ETA8
 ETA1
+        3.05E-02
 ETA2
+       .........  3.21E-04
 ETA3
+       .........  1.63E+00  2.17E-04
 ETA4
+       ......... ......... .........  7.97E-03
 ETA5
+       ......... ......... ......... ......... .........
 ETA6
+       ......... ......... ......... ......... ......... .........
 ETA7
+       ......... ......... ......... ......... ......... ......... .........
 ETA8
+       ......... ......... ......... ......... ......... ......... ......... .........

 SIGMA - CORR MATRIX FOR RANDOM EFFECTS - EPSILONS  ***
            EPS1      EPS2
 EPS1
+       .........
 EPS2
+       ......... .........
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 #TBLN:      2
 #METH: Objective Function Evaluation by Importance Sampling
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
 #TERM:
 EXPECTATION ONLY PROCESS COMPLETED

 ETABAR IS THE ARITHMETIC MEAN OF THE ETA-ESTIMATES,
 AND THE P-VALUE IS GIVEN FOR THE NULL HYPOTHESIS THAT THE TRUE MEAN IS 0.

 ETABAR:        -9.0279E-05 -1.3598E-04  1.0316E-04 -1.1813E-05  0.0000E+00  0.0000E+00  0.0000E+00  0.0000E+00
 SE:             2.4430E-06  9.8782E-07  7.2536E-07  8.3155E-07  0.0000E+00  0.0000E+00  0.0000E+00  0.0000E+00
 N:                      10          10          10          10           0           0           0           0

 P VAL.:         7.364E-299  0.0000E+00  0.0000E+00  8.7487E-46  1.0000E+00  1.0000E+00  1.0000E+00  1.0000E+00

 ETAshrink(%):   9.9523E+01  9.9308E+01  9.9345E+01  9.8975E+01  0.0000E+00  0.0000E+00  0.0000E+00  0.0000E+00
 EBVshrink(%):   9.9219E+01  9.1890E+01  9.2855E+01  1.0000E+02  0.0000E+00  0.0000E+00  0.0000E+00  0.0000E+00
 EPSshrink(%):   1.0000E-10  1.0000E-10

 #TERE:
 Elapsed estimation time in seconds:  9043.28

 Number of Negative Eigenvalues in Matrix=           5
 Most negative value=  -1274735338220449.8
 Most positive value=   595923463606.00073
 Forcing positive definiteness
 Root mean square deviation of matrix from original=    1.9999997739836235

 Elapsed covariance time in seconds: 63231.12

 ********************               OBJECTIVE FUNCTION EVALUATION BY IMPORTANCE SAMPLING             ********************
 #OBJT:**************                        FINAL VALUE OF OBJECTIVE FUNCTION                       ********************
 #OBJV:********************************************      485.316       **************************************************

 ********************               OBJECTIVE FUNCTION EVALUATION BY IMPORTANCE SAMPLING             ********************
 ********************                             FINAL PARAMETER ESTIMATE                           ********************

 THETA - VECTOR OF FIXED EFFECTS PARAMETERS   *********
         TH 1      TH 2      TH 3      TH 4      TH 5      TH 6      TH 7      TH 8      TH 9
         7.05E-01 -1.40E+00 -1.08E+00 -1.04E+00  6.15E-01  4.75E-02  1.05E-01  1.00E-02  3.77E-02

 OMEGA - COV MATRIX FOR RANDOM EFFECTS - ETAS  ********
            ETA1      ETA2      ETA3      ETA4      ETA5      ETA6      ETA7      ETA8
 ETA1
+        2.92E-06
 ETA2
+        0.00E+00  2.26E-07
 ETA3
+        0.00E+00 -1.72E-07  1.36E-07
 ETA4
+        0.00E+00  0.00E+00  0.00E+00  7.32E-08
 ETA5
+        0.00E+00  0.00E+00  0.00E+00  0.00E+00  0.00E+00
 ETA6
+        0.00E+00  0.00E+00  0.00E+00  0.00E+00  0.00E+00  0.00E+00
 ETA7
+        0.00E+00  0.00E+00  0.00E+00  0.00E+00  0.00E+00  0.00E+00  0.00E+00
 ETA8
+        0.00E+00  0.00E+00  0.00E+00  0.00E+00  0.00E+00  0.00E+00  0.00E+00  0.00E+00

 SIGMA - COV MATRIX FOR RANDOM EFFECTS - EPSILONS  ****
            EPS1      EPS2
 EPS1
+        1.00E+00
 EPS2
+        0.00E+00  1.00E+00

 OMEGA - CORR MATRIX FOR RANDOM EFFECTS - ETAS  *******
            ETA1      ETA2      ETA3      ETA4      ETA5      ETA6      ETA7      ETA8
 ETA1
+        1.71E-03
 ETA2
+        0.00E+00  4.76E-04
 ETA3
+        0.00E+00 -9.82E-01  3.69E-04
 ETA4
+        0.00E+00  0.00E+00  0.00E+00  2.70E-04
 ETA5
+        0.00E+00  0.00E+00  0.00E+00  0.00E+00  0.00E+00
 ETA6
+        0.00E+00  0.00E+00  0.00E+00  0.00E+00  0.00E+00  0.00E+00
 ETA7
+        0.00E+00  0.00E+00  0.00E+00  0.00E+00  0.00E+00  0.00E+00  0.00E+00
 ETA8
+        0.00E+00  0.00E+00  0.00E+00  0.00E+00  0.00E+00  0.00E+00  0.00E+00  0.00E+00

 SIGMA - CORR MATRIX FOR RANDOM EFFECTS - EPSILONS  ***
            EPS1      EPS2
 EPS1
+        1.00E+00
 EPS2
+        0.00E+00  1.00E+00

 ********************               OBJECTIVE FUNCTION EVALUATION BY IMPORTANCE SAMPLING             ********************
 ********************                         STANDARD ERROR OF ESTIMATE (RSR)                       ********************

 THETA - VECTOR OF FIXED EFFECTS PARAMETERS   *********
         TH 1      TH 2      TH 3      TH 4      TH 5      TH 6      TH 7      TH 8      TH 9
         2.37E-02  6.42E-02  5.01E-02  9.79E-03  4.82E-03  2.10E-02  3.62E-02  0.00E+00  2.98E-02

 OMEGA - COV MATRIX FOR RANDOM EFFECTS - ETAS  ********
            ETA1      ETA2      ETA3      ETA4      ETA5      ETA6      ETA7      ETA8
 ETA1
+        2.54E-06
 ETA2
+        0.00E+00  2.23E-05
 ETA3
+        0.00E+00  1.95E-05  1.69E-05
 ETA4
+        0.00E+00  0.00E+00  0.00E+00  8.50E-06
 ETA5
+        0.00E+00  0.00E+00  0.00E+00  0.00E+00  0.00E+00
 ETA6
+        0.00E+00  0.00E+00  0.00E+00  0.00E+00  0.00E+00  0.00E+00
 ETA7
+        0.00E+00  0.00E+00  0.00E+00  0.00E+00  0.00E+00  0.00E+00  0.00E+00
 ETA8
+        0.00E+00  0.00E+00  0.00E+00  0.00E+00  0.00E+00  0.00E+00  0.00E+00  0.00E+00

 SIGMA - COV MATRIX FOR RANDOM EFFECTS - EPSILONS  ****
            EPS1      EPS2
 EPS1
+        0.00E+00
 EPS2
+        0.00E+00  0.00E+00

 OMEGA - CORR MATRIX FOR RANDOM EFFECTS - ETAS  *******
            ETA1      ETA2      ETA3      ETA4      ETA5      ETA6      ETA7      ETA8
 ETA1
+        7.43E-04
 ETA2
+       .........  2.34E-02
 ETA3
+       .........  1.97E+00  2.29E-02
 ETA4
+       ......... ......... .........  1.57E-02
 ETA5
+       ......... ......... ......... ......... .........
 ETA6
+       ......... ......... ......... ......... ......... .........
 ETA7
+       ......... ......... ......... ......... ......... ......... .........
 ETA8
+       ......... ......... ......... ......... ......... ......... ......... .........

 SIGMA - CORR MATRIX FOR RANDOM EFFECTS - EPSILONS  ***
            EPS1      EPS2
 EPS1
+       .........
 EPS2
+       ......... .........
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 #CPUT: Total CPU Time in Seconds,    21170.188
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