$PROB NIVOLUMAB Population PK Analysis
; DESCRIPTION: Linear 2-cmpt PK model, with time-varying CL (sigmoid-Emax) - Final PPK model
; NOTES: Method: FOCEI; proportional residual error model
; Definitions of Variables in PPK dataset
; ATAFD: Actual time after first dose
; NDOSE: Nominal dose
; BSTUDYN: Study number
; BBWT: Baseline body weight
; BALB: Baseline Albumin
; BLDH: Baseline lactate dehydrogenase
; TTYPEN: Tumor type (1=MEL; 2=NSCLC; 3=OTHERS; 4=RCC)
; HEPAN: Hepatic function (1=normal)
; RACEN: Race (1=White; 2=African American; 3=Asian, 4=Others)
; PS: Performance Status (0, 1)
; SEXN: 1=Male; 2=Female
; FLAGN: Exclusion variable (1=excluded records)

$INPUT  ID TIME=ATAFD EVID AMT RATE DV=CONC BSTUDYN NDOSE
       AGE SEXN BBWT BALB BLDH BGFR HEPAN TTYPEN PS RACEN RECNUM
       FLAG FLAGN MDV REGIMEN PKTR DROP

$DATA ../0data/melN1.csv IGNORE=@
 IGNORE=(FLAGN=1)

$SUBROUTINE ADVAN3 TRANS4

$EST MAXEVAL=9999 METHOD=1 INTERACTION PRINT=20 NOABORT POSTHOC
  MSFO=nm.msf

$COVARIANCE PRINT=ER

$THETA
 (0, 0.010) ; CL [L/h] ; theta1
 (0, 4) ; VC [L] ; theta2
 (0, 0.04) ; Q [L/h] ; theta3
 (0, 4) ; VP [L] ; theta4
 0 FIX ; AERR [ug/mL] ; theta5
 (0, 0.5) ; PERR [-] ; theta6
(0.05)  ; CL_BBWT ; theta7
 0 FIX; CL_AGE ; theta8
(0.1) ; CL_GFR ; theta9
0 FIX ; CL_BLDH ; theta10
0 FIX ; CL_BALB; theta11
(0.1) ; CL_SEX ; theta12
(0.05) ; CL_PS ; theta13
0 FIX ; CL_MEL ; theta14
0 FIX ; CL_OTH ; theta15
 0 FIX ; CL_RCC ; theta16
 0 FIX ; CL_RAAA; theta17
(-0.05) ; CL_RAAS; theta18
0 FIX ; CL_HEPA; theta19
(0.05)  ; VC_BBWT ; theta20
(0.1) ; VC_SEX ; theta21
;
0.01 ; CL_EMAX ; theta22
1800 ; CL_T50 ; theta23
1 ; CL_HILL; theta24

$OMEGA BLOCK(2)
0.5 ; ZCL [-]
0.1 0.3 ; ZVC [-]
$OMEGA
0.3 ; ZVP [-]
0.1 ; ZEMAX [h]

$SIGMA
 1 FIX ; RESERR

$PK
; Define fixed effects parameters
 ACL = THETA(1)
 AV1 = THETA(2)
 AQ = THETA(3)
 AV2 = THETA(4)

; Define parameters of time-varying CL (sigmoid Emax)
 AEMAX = THETA(22)
 T50 = THETA(23)
 HILL = THETA(24)

; Define parameters of residual error model
 AERR = THETA(5) ; Additive (fixed to 0)
 PERR = THETA(6) : proportional

; Define parameters of between-subject variability
 ZCL = ETA(1)
 ZV1 = ETA(2)
 ZV2 = ETA(3)
 ZEMAX = ETA(4)

; Impute covariate values and define effects
; Missing continuous covariates are imputed as median
; Missing categorical covariates are imputed as mode

 MVAL = -99 ; missing value in dataset

; Baseline Body Weight
 BBWT_R = 80 ; refernce value, kg
 BBWT_I = BBWT
 IF (BBWT_I .EQ. MVAL) BBWT_I = BBWT_R ; imputation to reference (~median)
;
 CL_BBWT = (BBWT_I/BBWT_R)**THETA(7)

;AGE
 AGE_R = 65; reference value, yrs
 AGE_I = AGE
 IF (AGE_I .EQ. MVAL) AGE_I = AGE_R; imputation to reference
 CL_AGE = (AGE_I/AGE_R)**THETA(8)

;Baseline GFR
 BGFR_R = 90 ; reference value, mL/min
 BGFR_I = BGFR
 IF (BGFR_I .EQ. MVAL) BGFR_I = BGFR_R; GFR imputation to median
 CL_BGFR = (BGFR_I/BGFR_R)**THETA(9)

; Baseline lactate dehydrogenase (BLDH)
 BLDH_R = 200 ; reference value, IU/L
 BLDH_I = BLDH
 IF (BLDH_I .EQ. MVAL) BLDH_I = BLDH_R  ; LDH Imputation to median
 CL_BLDH = (LOG(BLDH_I)/LOG(BLDH_R))**THETA(10)

;Baseline Albumin (BALB)
 BALB_R = 4 ; reference value, g/dL
 BALB_I = BALB
 IF (BALB_I .EQ. MVAL) BALB_I = BALB_R  ; ALB Imputation to median
 CL_BALB = (BALB_I/BALB_R)**THETA(11)

; SEX
 SEX_I = SEXN
 IF (SEX_I .EQ. MVAL) SEX_I = 1; male
 CL_MALE = THETA(12) ; effect of female:male

; Performance Status (PS)
 PS_I = PS
 IF (PS .EQ. MVAL) PS_I = 1 ; impute missing PS to 1
 CL_PS_1 = THETA(13); effect of PS 1+:0

; Tumor type
 TTYPE_I = TTYPEN
 IF(TTYPE_I .EQ. MVAL) TTYPE_I = 3 ; other
 CL_MEL = THETA(14)
 CL_OTH = THETA(15)
 CL_RCC = THETA(16)

; Race
 RACE_I = RACEN
 IF (RACE_I .EQ. MVAL) RACE_I = 1; White
 CL_RAAA = THETA(17) ; effect of African American: White/Other
 CL_RAAS = THETA(18) ; effect of Asian:White/Other

; Hepatic status
 HEPA_I = HEPAN
 IF (HEPA_I .EQ. MVAL) HEPA_I = 1; Normal
 CL_HEPA = THETA(19) ; effect of Dysfunction: Normal

; VC
 V1_BBWT = (BBWT_I/BBWT_R)**THETA(20)
 V1_SEX = THETA(21)

; Time-varying CL (Sigmoid Emax Function)
 EMAX = AEMAX + ZEMAX
 CL_TIME = EXP(EMAX*TIME**HILL/(T50**HILL+TIME**HILL))

; Define model parameters: add covariate effect
 TVCL = ACL * CL_BBWT * CL_AGE * CL_BGFR * CL_BLDH * CL_BALB * CL_TIME
 IF (SEX_I .EQ. 1) TVCL = TVCL * EXP(CL_MALE) ; reference is SEX=2 (Female)
 IF (PS_I .GE. 1) TVCL = TVCL * EXP(CL_PS_1) ; reference is PS=0
 IF (TTYPE_I .EQ. 1) TVCL = TVCL * EXP(CL_MEL) ; reference is TTYPE=2 (NSCLC)
 IF (TTYPE_I .EQ. 3) TVCL = TVCL * EXP(CL_OTH); reference is TTYPE=2 (NSCLC)
 IF (TTYPE_I .EQ. 4) TVCL = TVCL * EXP(CL_RCC); reference is TTYPE=2 (NSCLC)
 IF (RACE_I .EQ. 2) TVCL = TVCL * EXP(CL_RAAA) ; reference is White/Others
 IF (RACE_I .EQ. 3) TVCL = TVCL * EXP(CL_RAAS) ; reference is White/Others
 IF (HEPA_I .GT. 1) TVCL = TVCL * EXP(CL_HEPA) ; reference is Normal hepatic

;
 TVV1 = AV1 * V1_BBWT
 IF (SEX_I .EQ. 1) TVV1 = TVV1 * EXP(V1_SEX) ; reference is SEX=2 (Female)

; Calculate PK parameters
  CL = TVCL*EXP(ZCL)
  V1 = TVV1*EXP(ZV1)
  Q  = AQ
  V2 = AV2*EXP(ZV2)
  S1 = V1

; Calculate alpha and beta half-life
 KE = CL/V1
 K23 = Q/V1
 K32 = Q/V2
 AA = KE+K23+K32
 ALPH = (AA+SQRT(AA*AA-4*KE*K32))/2
 BETA = (AA-SQRT(AA*AA-4*KE*K32))/2

 ALPHHL = LOG(2)/ALPH
 BETAHL = LOG(2)/BETA

$ERROR
; Define Residual Error Weight
 REWT = F*PERR + AERR ;proportional error model (additive error was fixed to zero)
 IPRED = F
 IRES = DV - IPRED
 IWRES = IRES/REWT
 Y = IPRED + REWT*EPS(1)

$TABLE ID ATAFD EVID AMT RATE CONC
       PRED CIPRED RES CIRES CWRES CIWRES
      CL V1 Q V2 ALPHHL BETAHL EMAX T50 HILL ZCL ZV1 ZV2 ZEMAX
       AGE_I SEX_I BBWT_I BALB_I BLDH_I BGFR
       TTYPE_I PS_I RACE_I HEPA_I FLAG FLAGN
       NOPRINT ONEHEADER FILE=nm.tab

NM-TRAN MESSAGES
 WARNINGS AND ERRORS (IF ANY) FOR PROBLEM    1
 (WARNING  2) NM-TRAN INFERS THAT THE DATA ARE POPULATION.

1NONLINEAR MIXED EFFECTS MODEL PROGRAM (NONMEM) VERSION 7.3.0
 ORIGINALLY DEVELOPED BY STUART BEAL, LEWIS SHEINER, AND ALISON BOECKMANN
 CURRENT DEVELOPERS ARE ROBERT BAUER, ICON DEVELOPMENT SOLUTIONS,
 AND ALISON BOECKMANN. IMPLEMENTATION, EFFICIENCY, AND STANDARDIZATION
 PERFORMED BY NOUS INFOSYSTEMS.
 PROBLEM NO.:         1
 NIVOLUMAB PPK
 TOT. NO. OF OBS RECS:    12292
 TOT. NO. OF INDIVIDUALS:   1895
 TWO COMPARTMENT MODEL (ADVAN3)
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 #TBLN:      1
 #METH: First Order Conditional Estimation with Interaction
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
 #TERM:
0MINIMIZATION SUCCESSFUL
 NO. OF FUNCTION EVALUATIONS USED:      866
 NO. OF SIG. DIGITS IN FINAL EST.:  3.5

 ETABAR IS THE ARITHMETIC MEAN OF THE ETA-ESTIMATES,
 AND THE P-VALUE IS GIVEN FOR THE NULL HYPOTHESIS THAT THE TRUE MEAN IS 0.

 ETABAR:         5.8793E-03 -1.2554E-02 -1.4834E-03  3.8031E-03
 SE:             6.8978E-03  6.9764E-03  6.8338E-03  3.1742E-03
 N:                    1895        1895        1895        1895

 P VAL.:         3.9402E-01  7.1939E-02  8.2815E-01  2.3087E-01

 ETAshrink(%):   1.4231E+01  1.3390E+01  4.1410E+01  4.8470E+01
 EBVshrink(%):   1.5018E+01  1.2935E+01  4.1060E+01  4.8540E+01
 EPSshrink(%):   1.5514E+01

 #TERE:
 Elapsed estimation time in seconds:  1063.64
 Elapsed covariance time in seconds:  2810.11

 ********************               FIRST ORDER CONDITIONAL ESTIMATION WITH INTERACTION              ********************
 #OBJT:**************                       MINIMUM VALUE OF OBJECTIVE FUNCTION                      ********************
 #OBJV:********************************************    72766.940       **************************************************

 ********************               FIRST ORDER CONDITIONAL ESTIMATION WITH INTERACTION              ********************
 ********************                             FINAL PARAMETER ESTIMATE                           ********************

 THETA - VECTOR OF FIXED EFFECTS PARAMETERS   *********
         TH 1      TH 2      TH 3      TH 4      TH 5      TH 6      TH 7      TH 8      TH 9      TH10      TH11      TH12
          TH13      TH14      TH15      TH16      TH17      TH18      TH19      TH20      TH21      TH22      TH23      TH24
         9.40E-03  3.63E+00  3.21E-02  2.78E+00  0.00E+00  2.15E-01  5.66E-01  0.00E+00  1.86E-01  0.00E+00  0.00E+00  1.65E-01
          1.72E-01  0.00E+00  0.00E+00  0.00E+00  0.00E+00 -1.25E-01  0.00E+00  5.97E-01  1.52E-01 -2.95E-01  1.41E+03  3.15E+00

 OMEGA - COV MATRIX FOR RANDOM EFFECTS - ETAS  ********
            ETA1      ETA2      ETA3      ETA4
 ETA1
+        1.23E-01
 ETA2
+        4.32E-02  1.23E-01
 ETA3
+        0.00E+00  0.00E+00  2.58E-01
 ETA4
+        0.00E+00  0.00E+00  0.00E+00  7.19E-02

 SIGMA - COV MATRIX FOR RANDOM EFFECTS - EPSILONS  ****
            EPS1
 EPS1
+        1.00E+00

 OMEGA - CORR MATRIX FOR RANDOM EFFECTS - ETAS  *******
            ETA1      ETA2      ETA3      ETA4
 ETA1
+        3.50E-01
 ETA2
+        3.52E-01  3.51E-01
 ETA3
+        0.00E+00  0.00E+00  5.08E-01
 ETA4
+        0.00E+00  0.00E+00  0.00E+00  2.68E-01

 SIGMA - CORR MATRIX FOR RANDOM EFFECTS - EPSILONS  ***
            EPS1
 EPS1
+        1.00E+00

 ********************               FIRST ORDER CONDITIONAL ESTIMATION WITH INTERACTION              ********************
 ********************                            STANDARD ERROR OF ESTIMATE                          ********************

 THETA - VECTOR OF FIXED EFFECTS PARAMETERS   *********
         TH 1      TH 2      TH 3      TH 4      TH 5      TH 6      TH 7      TH 8      TH 9      TH10      TH11      TH12
          TH13      TH14      TH15      TH16      TH17      TH18      TH19      TH20      TH21      TH22      TH23      TH24
         2.55E-04  5.56E-02  1.47E-03  9.92E-02 .........  6.80E-03  4.34E-02 .........  3.06E-02 ......... .........  2.14E-02
          1.87E-02 ......... ......... ......... .........  3.47E-02 .........  4.19E-02  2.00E-02  4.37E-02  9.14E+01  1.30E+00

 OMEGA - COV MATRIX FOR RANDOM EFFECTS - ETAS  ********
            ETA1      ETA2      ETA3      ETA4
 ETA1
+        8.11E-03
 ETA2
+        4.44E-03  1.62E-02
 ETA3
+       ......... .........  3.06E-02
 ETA4
+       ......... ......... .........  1.55E-02

 SIGMA - COV MATRIX FOR RANDOM EFFECTS - EPSILONS  ****
            EPS1
 EPS1
+       .........

 OMEGA - CORR MATRIX FOR RANDOM EFFECTS - ETAS  *******
            ETA1      ETA2      ETA3      ETA4
 ETA1
+        1.16E-02
 ETA2
+        4.03E-02  2.32E-02
 ETA3
+       ......... .........  3.02E-02
 ETA4
+       ......... ......... .........  2.89E-02

 SIGMA - CORR MATRIX FOR RANDOM EFFECTS - EPSILONS  ***
            EPS1
 EPS1
+       .........
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
 ********************               FIRST ORDER CONDITIONAL ESTIMATION WITH INTERACTION              ********************
 ********************                      EIGENVALUES OF COR MATRIX OF ESTIMATE                     ********************

             1         2         3         4         5         6         7         8         9        10        11        12
             13        14        15        16        17        18        19        20
         3.74E-02  6.84E-02  1.18E-01  2.14E-01  3.98E-01  4.30E-01  5.62E-01  6.00E-01  6.32E-01  8.02E-01  8.75E-01  1.00E+00
          1.03E+00  1.11E+00  1.24E+00  1.37E+00  1.46E+00  1.65E+00  2.50E+00  3.89E+00
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 #CPUT: Total CPU Time in Seconds,     3880.226
