27/08/2018
21:08
;; x1. Author: R.C. van Wijk (r.c.van.wijk@lacdr.leidenuniv.nl)
;; 3. Label: Base and covariate model
;; 4. Dataset: Zebrafish larvae exposed to 1 mM paracetamol at 3, 4, or 5 dpf
;; Description: Paracetamol PK model of 3-4-5 dpf zebrafish larvae, AGE as covariate on KA between 3 and 4dpf, and on K25 for all ages, prop and additive error
$PROBLEM    PK
$INPUT      ID TIME AMT DV EVID MDV CMT BQL AGE
$DATA      Paracetamol_Zebrafish_345dpf.csv IGNORE=@ IGNORE=(BQL.EQ.1)

; units

; TIME = min

; DV = pmole / larva

; CL = central volume / min (V = fixed)

; V = total larval volume

; kA = pmole / min
$SUBROUTINE ADVAN13 TOL=9
$MODEL      COMP ; CMT 1 dosing compartment
            COMP ; CMT 2 central paracetamol in larva
$PK
TVK12 = THETA(2)                               ;0-order absorption
IF(AGE.GT.3) TVK12 = THETA(2) * (1 + THETA(3)) ;age-dependent K12 absorption
TVK25 = THETA(1) * EXP(ETA(1))                 ;1-order elimination

K12 = TVK12
K25 = TVK25 * ((1 + THETA(4)) ** (AGE - 3))    ;age-dependent K25 rate of elimination

;base parameters
K25_BASE = THETA(1)
K12_BASE = THETA(2)
;covariate parameters
K12_COVAGE = THETA(3)
K25_COVAGE = THETA(4)

$DES
DADT(1) = 0 ;constant infusion
DADT(2) = K12 * A(1) - K25 * A(2)

$ERROR
IPRED = F
Y = IPRED * (1 + EPS(1)) + EPS(2) ; prop and add error
IRES = DV - IPRED

$THETA  (0,0.0192529) ; K25
$THETA  (0,0.289485) ; K12
$THETA  (0,1.06385) ; AGE_K12
$THETA  (0,0.174529) ; AGE_K25
$OMEGA  0  FIX  ; IIV K25, undistinguishable from residual variability due to destructive sampling
$SIGMA  0.10906  ; prop error
$SIGMA  0.0084383  ;  add error
$ESTIMATION METHOD=1 MAXEVAL=2000 NOABORT PRINT=5 SIG=3 POSTHOC
$COVARIANCE PRINT=E
$TABLE      ID TIME DV IPRED PRED CWRES NOAPPEND NOPRINT ONEHEADER
            FILE=sdtab001
$TABLE      ID K25 K12 K12_COVAGE K25_COVAGE K12_BASE K25_BASE AGE
            NOPRINT NOAPPEND ONEHEADER FILE=patab001

NM-TRAN MESSAGES
 WARNINGS AND ERRORS (IF ANY) FOR PROBLEM    1
 (WARNING  2) NM-TRAN INFERS THAT THE DATA ARE POPULATION.

1NONLINEAR MIXED EFFECTS MODEL PROGRAM (NONMEM) VERSION 7.3.0
 ORIGINALLY DEVELOPED BY STUART BEAL, LEWIS SHEINER, AND ALISON BOECKMANN
 CURRENT DEVELOPERS ARE ROBERT BAUER, ICON DEVELOPMENT SOLUTIONS,
 AND ALISON BOECKMANN. IMPLEMENTATION, EFFICIENCY, AND STANDARDIZATION
 PERFORMED BY NOUS INFOSYSTEMS.
 PROBLEM NO.:         1
 PK
 TOT. NO. OF OBS RECS:      177
 TOT. NO. OF INDIVIDUALS:    242
 GENERAL NONLINEAR KINETICS MODEL USING LSODA (ADVAN13)
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 #TBLN:      1
 #METH: First Order Conditional Estimation
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
 #TERM:
0MINIMIZATION SUCCESSFUL
 NO. OF FUNCTION EVALUATIONS USED:      132
 NO. OF SIG. DIGITS IN FINAL EST.:  3.1

 ETABAR IS THE ARITHMETIC MEAN OF THE ETA-ESTIMATES,
 AND THE P-VALUE IS GIVEN FOR THE NULL HYPOTHESIS THAT THE TRUE MEAN IS 0.

 ETABAR:         0.0000E+00
 SE:             0.0000E+00
 N:                     177

 P VAL.:         1.0000E+00

 ETAshrink(%):   1.0000E+02
 EBVshrink(%):   0.0000E+00
 EPSshrink(%):   1.0000E-10  1.0000E-10

 #TERE:
 Elapsed estimation time in seconds:     0.78
 Elapsed covariance time in seconds:     0.48

 ********************                        FIRST ORDER CONDITIONAL ESTIMATION                      ********************
 #OBJT:**************                       MINIMUM VALUE OF OBJECTIVE FUNCTION                      ********************
 #OBJV:********************************************      466.583       **************************************************

 ********************                        FIRST ORDER CONDITIONAL ESTIMATION                      ********************
 ********************                             FINAL PARAMETER ESTIMATE                           ********************

 THETA - VECTOR OF FIXED EFFECTS PARAMETERS   *********
         TH 1      TH 2      TH 3      TH 4
         1.93E-02  2.89E-01  1.06E+00  1.74E-01

 OMEGA - COV MATRIX FOR RANDOM EFFECTS - ETAS  ********
            ETA1
 ETA1
+        0.00E+00

 SIGMA - COV MATRIX FOR RANDOM EFFECTS - EPSILONS  ****
            EPS1      EPS2
 EPS1
+        1.09E-01
 EPS2
+        0.00E+00  8.44E-03

 OMEGA - CORR MATRIX FOR RANDOM EFFECTS - ETAS  *******
            ETA1
 ETA1
+        0.00E+00

 SIGMA - CORR MATRIX FOR RANDOM EFFECTS - EPSILONS  ***
            EPS1      EPS2
 EPS1
+        3.30E-01
 EPS2
+        0.00E+00  9.19E-02

 ********************                        FIRST ORDER CONDITIONAL ESTIMATION                      ********************
 ********************                            STANDARD ERROR OF ESTIMATE                          ********************

 THETA - VECTOR OF FIXED EFFECTS PARAMETERS   *********
         TH 1      TH 2      TH 3      TH 4
         6.78E-04  1.57E-02  1.45E-01  3.15E-02

 OMEGA - COV MATRIX FOR RANDOM EFFECTS - ETAS  ********
            ETA1
 ETA1
+       .........

 SIGMA - COV MATRIX FOR RANDOM EFFECTS - EPSILONS  ****
            EPS1      EPS2
 EPS1
+        1.51E-02
 EPS2
+       .........  4.06E-03

 OMEGA - CORR MATRIX FOR RANDOM EFFECTS - ETAS  *******
            ETA1
 ETA1
+       .........

 SIGMA - CORR MATRIX FOR RANDOM EFFECTS - EPSILONS  ***
            EPS1      EPS2
 EPS1
+        2.29E-02
 EPS2
+       .........  2.21E-02

 ********************                        FIRST ORDER CONDITIONAL ESTIMATION                      ********************
 ********************                          COVARIANCE MATRIX OF ESTIMATE                         ********************

            TH 1      TH 2      TH 3      TH 4      OM11      SG11      SG12      SG22
 TH 1
+        4.60E-07
 TH 2
+        6.68E-06  2.47E-04
 TH 3
+       -3.66E-05 -1.74E-03  2.10E-02
 TH 4
+       -1.48E-05 -2.31E-04  2.66E-03  9.91E-04
 OM11
+       ......... ......... ......... ......... .........
 SG11
+        1.52E-06  6.59E-07  3.84E-04  2.20E-06 .........  2.28E-04
 SG12
+       ......... ......... ......... ......... ......... ......... .........
 SG22
+        5.74E-07  4.62E-06 -9.92E-06 -9.22E-06 ......... -1.41E-05 .........  1.65E-05

 ********************                        FIRST ORDER CONDITIONAL ESTIMATION                      ********************
 ********************                          CORRELATION MATRIX OF ESTIMATE                        ********************

            TH 1      TH 2      TH 3      TH 4      OM11      SG11      SG12      SG22
 TH 1
+        6.78E-04
 TH 2
+        6.27E-01  1.57E-02
 TH 3
+       -3.73E-01 -7.65E-01  1.45E-01
 TH 4
+       -6.94E-01 -4.67E-01  5.84E-01  3.15E-02
 OM11
+       ......... ......... ......... ......... .........
 SG11
+        1.49E-01  2.77E-03  1.75E-01  4.62E-03 .........  1.51E-02
 SG12
+       ......... ......... ......... ......... ......... ......... .........
 SG22
+        2.08E-01  7.24E-02 -1.69E-02 -7.22E-02 ......... -2.31E-01 .........  4.06E-03
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
 ********************                        FIRST ORDER CONDITIONAL ESTIMATION                      ********************
 ********************                      EIGENVALUES OF COR MATRIX OF ESTIMATE                     ********************

             1         2         3         4         5         6
         7.75E-02  3.64E-01  5.84E-01  9.66E-01  1.23E+00  2.78E+00
 #CPUT: Total CPU Time in Seconds,        1.563
