NOTE: the same output is associated with real and simulated datasets, as alterations to make the simulated dataset did not modify key dosage and concentration data

13.11.2017
08:57
;; Pop-PK model for Colistimethate (CMS) and Colistine (Col) during continuous renal replacement therapy
;; Related article : Multicenter population pharmacokinetic study of colistimethate sodium and colistin
;; dosed as in normal renal function in patients on continuous renal replacement therapy
;; Anne Leuppi-Taegtmeyer, Laurent A Decosterd, Michael Osthoff, Nicolas J Mueller, Thierry Buclin, Natasci Corti
;; Antimicrobial Agents and Chemotherapy 2018
;; Model author: Thierry Buclin

$PROBLEM PK CMS Col in CRRT

$INPUT ID AGE BW SEX EVID QBL QEFF HT ALB DOSE AMT AMTC TINF RATE RATC TIME CMT DV

$DATA Data0.csv IGNORE=#

$SUBROUTINES ADVAN6 TOL=3

$MODEL NCOMP=10
COMP=(CMSCENTR DEFDOSE)   ; central CMS
COMP=(COLCENTR)   ; central Col
COMP=(CMSFILTR)   ; filter CMS
COMP=(COLFILTR)   ; filter Col
COMP=(CMSCART)    ; cartridge CMS
COMP=(COLCART)    ; cartridge Col
COMP=(CMSEFFL)    ; cumulative effluent CMS
COMP=(COLEFFL)    ; cumulative effluent Col
COMP=(CMSAUC)     ; cumulative AUC of CMS
COMP=(COLAUC)     ; cumulative AUC of Col

$PK
TVCL1M = THETA(1)
CL1M = TVCL1M * EXP(ETA(1))  ; clearance CMS -> Colistin (L/h)
TVV1 = THETA(2)
V1 = TVV1 * EXP(ETA(2)) ; distribution volume of CMS (L)
K12 = CL1M/V1
V3 = 0.2   ;  priming volume of filter and lines (L)
IF (HT.EQ.0) THEN
  K13 = (QBL*60/1000)*(1-0.25)/V1
  K31 = (QBL*60/1000)*(1-0.25)/V3
ELSE
  K13 = (QBL*60/1000)*(1-HT)/V1
  K31 = (QBL*60/1000)*(1-HT)/V3
ENDIF
SIV3 = THETA(3) ; sieving of CMS in the absence of albumin value
V5 = 0.3  ; priming volume of cartridge and lines (L)
K35 = SIV3*(QEFF/1000)/V3
K50 = (QEFF/1000)/V5

TVCL2M = THETA(4)
CL2M = TVCL2M * EXP(ETA(3)) ; clearance Colistin -> elimination (L/h)
TVV2 = THETA(5)
V2  = TVV2 * EXP(ETA(4)) ; distribution volume of colistin (L)
K20 = CL2M/V2
V4 = 0.2   ;  priming volume of filter and lines (L)
IF (HT.EQ.0) THEN
  K24 = (QBL*60/1000)*(1-0.25)/V2
  K42 = (QBL*60/1000)*(1-0.25)/V4
ELSE
  K24 = (QBL*60/1000)*(1-HT)/V2
  K42 = (QBL*60/1000)*(1-HT)/V4
ENDIF
SIV4 = THETA(6) ; sieving of CMS
V6 = 0.3  ; priming volume of cartridge and lines (L)
K46 = SIV4*(QEFF/1000)/V4
K60 = (QEFF/1000)/V6

S1 = V1
S2 = V2
S3 = V3
S4 = V4
S5 = V5
S6 = V6
S7 = 1
S8 = 1
S9 = 1
S10 = 1

F1 = 1155.5/1749.8  ; this is to convert AMT (mg of colistimethate Na) into Colistin dose (mg)

; this is to calculate time after LAST dose
IF (AMT.GT.0) THEN
TDOS=TIME
TAD=0.0
ENDIF
IF (AMT.EQ.0) TAD=TIME-TDOS

; differential equations according to model
$DES
DADT(1) = -K12*A(1) -K13*A(1) + K31*A(3)   ; central CMS
DADT(2) = -K24*A(2) -K20*A(2) + K12*A(1) + K42*A(4)   ;  central Col
DADT(3) = K13*A(1) - K31*A(3) - K35*A(3)   ; filter CMS
DADT(4) = K24*A(2) - K42*A(4) - K46*A(4)   ; filter Col
DADT(5) = K35*A(3) - K50*A(5)   ; cartridge CMS
DADT(6) = K46*A(4) - K60*A(6)   ; cartridge Col
DADT(7) = K50*A(5)   ; cumulative effluent CMS
DADT(8) = K60*A(6)   ; cumulative effluent Col
DADT(9) = A(1)/V1    ; cumulative AUC CMS
DADT(10) = A(2)/V2   ; cumulative AUC Col

$ERROR
IPRED = F
    W = SQRT(THETA(7)**2*IPRED**2 + THETA(8)**2)
    Y = IPRED + W*EPS(1)
 IRES = DV-IPRED
IWRES = IRES/W
C1    = A(1)/V1
C2    = A(2)/V2
CFI3    = A(3)/V3
CFI4    = A(4)/V4
CCA5    = A(5)/V5
CCA6    = A(6)/V6
EFF1  = A(7)
EFF2  = A(8)
AUC1  = A(9)
AUC2  = A(10)

$THETA
(0, 2.31)      ; CL1M
(0, 12.1)      ; V1
(0, 1.05,1.2)  ; SIV3
(0, 1.93)      ; CL2M
(0, 70.1)      ; V2
(0, 0.454,1.2) ; SIV4
(0, 0.222)     ; Prop.RE (sd)
(0, 0.459)     ; Add.RE (sd)

$OMEGA
 0.27     ; IIV CL1M
 0.133    ; IIV V1
 0.304    ; IIV CL2M
 0.247    ; IIV v2

$SIGMA
 1 FIX    ; Residual error

$EST METHOD=1 INTER MAXEVAL=1 NOABORT SIG=3 PRINT=1 POSTHOC  ; just fit the same model
$COV

; Xpose
$TABLE ID TIME TAD EVID DOSE AMT CMT DV MDV PRED RES WRES IPRED IWRES
       C1 C2 CFI3 CFI4 CCA5 CCA6 EFF1 EFF2 AUC1 AUC2
	   ONEHEADER NOPRINT NOAPPEND FILE=sdtab00016
$TABLE CL1M V1 CL2M V2 SIV3 SIV4 K12 K13 K31 K20 K24 K42 K35 K46 K50 K60
       AGE BW SEX ONEHEADER NOPRINT NOAPPEND FIRSTONLY FILE=patab00016

NM-TRAN MESSAGES
 WARNINGS AND ERRORS (IF ANY) FOR PROBLEM    1
 (WARNING  2) NM-TRAN INFERS THAT THE DATA ARE POPULATION.

1NONLINEAR MIXED EFFECTS MODEL PROGRAM (NONMEM) VERSION 7.4.1
 ORIGINALLY DEVELOPED BY STUART BEAL, LEWIS SHEINER, AND ALISON BOECKMANN
 CURRENT DEVELOPERS ARE ROBERT BAUER, ICON DEVELOPMENT SOLUTIONS,
 AND ALISON BOECKMANN. IMPLEMENTATION, EFFICIENCY, AND STANDARDIZATION
 PERFORMED BY NOUS INFOSYSTEMS.
 PROBLEM NO.:         1
 PK
 TOT. NO. OF OBS RECS:      240
 TOT. NO. OF INDIVIDUALS:       10
 GENERAL NONLINEAR KINETICS MODEL (DVERK1, ADVAN6)
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 #TBLN:      1
 #METH: First Order Conditional Estimation with Interaction
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
 #TERM:
0MINIMIZATION SUCCESSFUL
 NO. OF FUNCTION EVALUATIONS USED:      292
 NO. OF SIG. DIGITS IN FINAL EST.:  4.4

 ETABAR IS THE ARITHMETIC MEAN OF THE ETA-ESTIMATES,
 AND THE P-VALUE IS GIVEN FOR THE NULL HYPOTHESIS THAT THE TRUE MEAN IS 0.

 ETABAR:         1.9184E-03  6.2377E-04  8.5952E-03 -3.5682E-02
 SE:             1.5461E-01  1.0554E-01  1.5591E-01  1.0162E-01
 N:                      10          10          10          10

 P VAL.:         9.9010E-01  9.9528E-01  9.5603E-01  7.2548E-01

 ETASHRINKSD(%)  8.8742E-01  3.3533E+00  5.8044E+00  3.1811E+01
 ETASHRINKVR(%)  1.7670E+00  6.5941E+00  1.1272E+01  5.3502E+01
 EBVSHRINKSD(%)  5.4165E+00  6.9809E+00  9.2491E+00  3.4598E+01
 EBVSHRINKVR(%)  1.0540E+01  1.3475E+01  1.7643E+01  5.7225E+01
 EPSSHRINKSD(%)  5.9394E+00
 EPSSHRINKVR(%)  1.1526E+01


 TOTAL DATA POINTS NORMALLY DISTRIBUTED (N):          240
 N*LOG(2PI) CONSTANT TO OBJECTIVE FUNCTION:    441.09049593824290
 OBJECTIVE FUNCTION VALUE WITHOUT CONSTANT:    300.33693949853631
 OBJECTIVE FUNCTION VALUE WITH CONSTANT:       741.42743543677921
 REPORTED OBJECTIVE FUNCTION DOES NOT CONTAIN CONSTANT

 TOTAL EFFECTIVE ETAS (NIND*NETA):                            40


 #TERE:
 Elapsed estimation  time in seconds:   480.71
0S MATRIX ALGORITHMICALLY SINGULAR
0S MATRIX IS OUTPUT
0INVERSE COVARIANCE MATRIX SET TO RS*RMAT, WHERE S* IS A PSEUDO INVERSE OF S
 Elapsed covariance  time in seconds:   620.71
 Elapsed postprocess time in seconds:     3.82

 ********************               FIRST ORDER CONDITIONAL ESTIMATION WITH INTERACTION              ********************
 #OBJT:**************                       MINIMUM VALUE OF OBJECTIVE FUNCTION                      ********************
 #OBJV:********************************************      300.337       **************************************************

 ********************               FIRST ORDER CONDITIONAL ESTIMATION WITH INTERACTION              ********************
 ********************                             FINAL PARAMETER ESTIMATE                           ********************

 THETA - VECTOR OF FIXED EFFECTS PARAMETERS   *********
         TH 1      TH 2      TH 3      TH 4      TH 5      TH 6      TH 7      TH 8
         2.31E+00  1.21E+01  1.05E+00  1.93E+00  7.01E+01  4.54E-01  2.22E-01  4.59E-01

 OMEGA - COV MATRIX FOR RANDOM EFFECTS - ETAS  ********
         ETA1      ETA2      ETA3      ETA4
 ETA1
+        2.70E-01
 ETA2
+        0.00E+00  1.33E-01
 ETA3
+        0.00E+00  0.00E+00  3.04E-01
 ETA4
+        0.00E+00  0.00E+00  0.00E+00  2.47E-01

 SIGMA - COV MATRIX FOR RANDOM EFFECTS - EPSILONS  ****
         EPS1
 EPS1
+        1.00E+00

 OMEGA - CORR MATRIX FOR RANDOM EFFECTS - ETAS  *******
         ETA1      ETA2      ETA3      ETA4
 ETA1
+        5.20E-01
 ETA2
+        0.00E+00  3.64E-01
 ETA3
+        0.00E+00  0.00E+00  5.52E-01
 ETA4
+        0.00E+00  0.00E+00  0.00E+00  4.97E-01

 SIGMA - CORR MATRIX FOR RANDOM EFFECTS - EPSILONS  ***
         EPS1
 EPS1
+        1.00E+00

 ********************               FIRST ORDER CONDITIONAL ESTIMATION WITH INTERACTION              ********************
 ********************                            STANDARD ERROR OF ESTIMATE                          ********************

 THETA - VECTOR OF FIXED EFFECTS PARAMETERS   *********
         TH 1      TH 2      TH 3      TH 4      TH 5      TH 6      TH 7      TH 8
         4.12E-01  1.42E+00  6.67E-02  4.44E-01  1.55E+01  1.81E-02  2.23E-02  9.41E-02

 OMEGA - COV MATRIX FOR RANDOM EFFECTS - ETAS  ********
         ETA1      ETA2      ETA3      ETA4
 ETA1
+        1.62E-01
 ETA2
+       .........  1.06E-01
 ETA3
+       ......... .........  2.18E-01
 ETA4
+       ......... ......... .........  1.27E-01

 SIGMA - COV MATRIX FOR RANDOM EFFECTS - EPSILONS  ****
         EPS1
 EPS1
+       .........

 OMEGA - CORR MATRIX FOR RANDOM EFFECTS - ETAS  *******
         ETA1      ETA2      ETA3      ETA4
 ETA1
+        1.56E-01
 ETA2
+       .........  1.46E-01
 ETA3
+       ......... .........  1.98E-01
 ETA4
+       ......... ......... .........  1.28E-01

 SIGMA - CORR MATRIX FOR RANDOM EFFECTS - EPSILONS  ***
         EPS1
 EPS1
+       .........
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 Elapsed finaloutput time in seconds:     0.33
 #CPUT: Total CPU Time in Seconds,     1103.832
