Mon Apr 15 17:23:02 CEST 2019
;; 1. Based on: 3
;; 2. Description: covariate model + WT on V2 + CPRED in pred3 ($TABLE)
;; x1. Author: user
$PROBLEM    MEROPENEM IV INFUSION 3COMP DESCRIPTION PLASMA AND ELF
;           CONCENTRATIONS FINAL COV MODEL

; ------------dataset------------
$INPUT      ID WT GFR DV TIME MDV CMT AMT RATE SS II EVID
; WT [kg], GFRC [0: poor hepatic function, 1: good hepatic function],
; GFR [mL/min], DV [mg/L], TIME [h], CMT [1: plasma conc., 2: ELF conc],
; AMT (DOSE) [g], RATE (K) [g/h], II (T) [h], GRP=AMT/RATE (delta) [h]

; CL [L/h], V1 V2 V3 [L], Q2 Q3 [L/h], S1 S2 [L]
$DATA      simulated_dataset.csv IGNORE=@

; ------------model------------
$SUBROUTINE ADVAN11 TRANS4
$PK
    ; parmacokinetic parameters
	TVCL=THETA(1)*((GFR/65)**THETA(2)) ; CENTRAL
	TVV1=THETA(3)*((WT/75)**THETA(4))
    TVQ2=THETA(5)                      ; ELF
	TVV2=THETA(6)*((WT/75)**THETA(9))
	TVQ3=THETA(7)                      ; PERIPHERAL
	TVV3=THETA(8)

	; interindividual variance model
	CL=TVCL*EXP(ETA(1))
	V1=TVV1*EXP(ETA(2))
	Q2=TVQ2
	V2=TVV2*EXP(ETA(3))
	Q3=TVQ3*EXP(ETA(4))
	V3=TVV3

	; scaling factor
	S1=V1/1000 ; dose [g] and conc. [mg/L]
	S2=V2/THETA(10)

$ERROR
; calcultate de result (i.e. model prediction)
	H1=0
	H2=0
	IF(CMT.EQ.1) H1=1
	IF(CMT.EQ.2) H2=1
	Y=H1*(F*(1+EPS(1))+EPS(2))+H2*(F*(1+EPS(3)))   ; +EPS(4)
	W=F

	IPRED=F ; prediction individuelle
	IRES=DV-IPRED ; (individual-specific residual)
	IWRES=IRES/W ;  (individual-specific weighted residual)


; Initial conditions
$THETA  (0,7.28847922347366) ; CL
$THETA  0.741447648249536    ; GFRCL
$THETA  (0,14.1662561197661) ; V1
$THETA  (0,0.889886352071436); WTV1
$THETA  (0,7.35442828009044) ; Q2; ELF
$THETA  (0,4.11640593262913) ; V2
$THETA  (0,7.73152957383366) ; Q3; PERIPHERAL
$THETA  (0,10.033350553562)  ; V3
$THETA  (0,0.944423036580702); WTV2
$THETA  251.758138000927 ; V2/S2
$OMEGA  BLOCK(4)
 0.130531253539076  ;      IIVCL
 0 0.149440414536403  ;      IIVV1
 0 0 1.71967661710853  ;      IIVV2
 0 0 0 0.171838259641997  ;      IIVQ3
$SIGMA  0.0263659853631903  ;   epsPROP1
 0.219976467635949  ;    epsADD1
 0.368481652473912  ;   epsPROP2
$ESTIMATION METHOD=1 INTER MAXEVAL=9999 SIGDIGITS=3 POSTHOC PRINT=5 ; PRINT=1 ;

; precision des estimation? standard error of estimates & matrice de correlation
$COVARIANCE PRINT=E

$TABLE      ID WT GFR TIME MDV CMT RATE PRED CPRED RES WRES IPRED IRES
            IWRES CWRES EVID NOPRINT FILE=pred4new ; population and individual predictions and residuals
$TABLE      ID WT GFR CL V1 Q2 V2 Q3 V3 ETA(1) ETA(2) ETA(3) ETA(4)
            TVCL TVV1 TVQ2 TVV2 TVQ3 TVV3 NOPRINT NOAPPEND FIRSTONLY
            FILE=param4new ; individual PK parameters (bayesiens,posthoc)

NM-TRAN MESSAGES
 WARNINGS AND ERRORS (IF ANY) FOR PROBLEM    1
 (WARNING  2) NM-TRAN INFERS THAT THE DATA ARE POPULATION.

1NONLINEAR MIXED EFFECTS MODEL PROGRAM (NONMEM) VERSION 7.4.3
 ORIGINALLY DEVELOPED BY STUART BEAL, LEWIS SHEINER, AND ALISON BOECKMANN
 CURRENT DEVELOPERS ARE ROBERT BAUER, ICON DEVELOPMENT SOLUTIONS,
 AND ALISON BOECKMANN. IMPLEMENTATION, EFFICIENCY, AND STANDARDIZATION
 PERFORMED BY NOUS INFOSYSTEMS.
 PROBLEM NO.:         1
 MEROPENEM IV INFUSION 3COMP DESCRIPTION PLASMA AND ELF
 TOT. NO. OF OBS RECS:      433
 TOT. NO. OF INDIVIDUALS:       60
 THREE COMPARTMENT MODEL (ADVAN11)
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 #TBLN:      1
 #METH: First Order Conditional Estimation with Interaction
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
 #TERM:
0MINIMIZATION SUCCESSFUL
 NO. OF FUNCTION EVALUATIONS USED:      739
 NO. OF SIG. DIGITS IN FINAL EST.:  3.6
0PARAMETER ESTIMATE IS NEAR ITS BOUNDARY
 THIS MUST BE ADDRESSED BEFORE THE COVARIANCE STEP CAN BE IMPLEMENTED

 ETABAR IS THE ARITHMETIC MEAN OF THE ETA-ESTIMATES,
 AND THE P-VALUE IS GIVEN FOR THE NULL HYPOTHESIS THAT THE TRUE MEAN IS 0.

 ETABAR:         3.7198E-04 -6.7102E-03  1.5416E-02 -1.7335E-06
 SE:             4.1181E-02  3.1359E-02  5.2205E-02  1.9963E-06
 N:                      60          60          60          60

 P VAL.:         9.9279E-01  8.3056E-01  7.6776E-01  3.8519E-01

 ETASHRINKSD(%)  1.4459E+00  2.1301E+01  3.9991E+01  9.9624E+01
 ETASHRINKVR(%)  2.8708E+00  3.8065E+01  6.3989E+01  9.9999E+01
 EBVSHRINKSD(%)  2.1758E+00  2.1566E+01  3.8644E+01  9.9588E+01
 EBVSHRINKVR(%)  4.3043E+00  3.8481E+01  6.2354E+01  9.9998E+01
 EPSSHRINKSD(%)  1.4402E+01  1.4402E+01  4.9416E+00
 EPSSHRINKVR(%)  2.6730E+01  2.6730E+01  9.6390E+00


 TOTAL DATA POINTS NORMALLY DISTRIBUTED (N):          433
 N*LOG(2PI) CONSTANT TO OBJECTIVE FUNCTION:    795.80076975524651
 OBJECTIVE FUNCTION VALUE WITHOUT CONSTANT:    1489.5133259473719
 OBJECTIVE FUNCTION VALUE WITH CONSTANT:       2285.3140957026185
 REPORTED OBJECTIVE FUNCTION DOES NOT CONTAIN CONSTANT

 TOTAL EFFECTIVE ETAS (NIND*NETA):                           240


 #TERE:
 Elapsed estimation  time in seconds:    19.04
 Elapsed postprocess time in seconds:     0.09

 ********************               FIRST ORDER CONDITIONAL ESTIMATION WITH INTERACTION              ********************
 #OBJT:**************                       MINIMUM VALUE OF OBJECTIVE FUNCTION                      ********************
 #OBJV:********************************************     1489.513       **************************************************

 ********************               FIRST ORDER CONDITIONAL ESTIMATION WITH INTERACTION              ********************
 ********************                             FINAL PARAMETER ESTIMATE                           ********************

 THETA - VECTOR OF FIXED EFFECTS PARAMETERS   *********
         TH 1      TH 2      TH 3      TH 4      TH 5      TH 6      TH 7      TH 8      TH 9      TH10
         8.24E+00  7.51E-01  1.52E+01  1.20E+00  8.23E+00  5.93E+00  6.09E+00  7.70E+00  2.20E+00  2.69E+02

 OMEGA - COV MATRIX FOR RANDOM EFFECTS - ETAS  ********
         ETA1      ETA2      ETA3      ETA4
 ETA1
+        1.07E-01
 ETA2
+        0.00E+00  9.69E-02
 ETA3
+        0.00E+00  0.00E+00  4.62E-01
 ETA4
+        0.00E+00  0.00E+00  0.00E+00  1.72E-05

 SIGMA - COV MATRIX FOR RANDOM EFFECTS - EPSILONS  ****
         EPS1      EPS2      EPS3
 EPS1
+        2.74E-02
 EPS2
+        0.00E+00  2.46E-01
 EPS3
+        0.00E+00  0.00E+00  3.15E-01

 OMEGA - CORR MATRIX FOR RANDOM EFFECTS - ETAS  *******
         ETA1      ETA2      ETA3      ETA4
 ETA1
+        3.26E-01
 ETA2
+        0.00E+00  3.11E-01
 ETA3
+        0.00E+00  0.00E+00  6.80E-01
 ETA4
+        0.00E+00  0.00E+00  0.00E+00  4.15E-03

 SIGMA - CORR MATRIX FOR RANDOM EFFECTS - EPSILONS  ***
         EPS1      EPS2      EPS3
 EPS1
+        1.65E-01
 EPS2
+        0.00E+00  4.96E-01
 EPS3
+        0.00E+00  0.00E+00  5.61E-01
 Elapsed finaloutput time in seconds:     0.04
 #CPUT: Total CPU Time in Seconds,       19.192
