Tue Apr  8 11:48:30 EDT 2014
;; 1. Based on: run8
;; 2. Description: run14.mod CAMD ADAS-COG TOTAL
;; x1. Author: user
$PROBLEM run46.mod CAMD ADAS-COG TOTAL

$INPUT
ID
STUDY
TIME
WEEK
ADAS
DROPOUT
MMSE
AGE
SEX
DXDATE
START
END
QSDTC
APOE4
COMED
COMEDEND
COMEDSTART
COMEDENDIND
COMEDSTARTIND
PRIMCOMED
PRIMCOMEDS
ADASBL
MDV
ADASMOD
ADASTRANS=DV
COMED2
APOE4C

;ID: patient identification
;STUDY: study identification
;VISIT: study visit
;WEEK: study week
;TIME: time (days)
;ADAS: ADAS-cog total score (0-70)
;DROPOUT: 0=patient has never dropped out; 1=patient has dropped out at some point
;It does not directly carry time information, meaning that each subject has been assigned to one dropout code
;Do not know when exactly the patient dropped out but can infer based on the last time of the non-missing DV
;COVARIATES AT MMSE BASELINE:
;MMSE: BASELINE mini-mental state evaluation (normally taken at screening)
;AGE: age (years)
;SEX: 1=female, 2=male
;DXDATE: year of diagnosis
;RACE: 1="AMERICAN INDIAN OR ALASKA NATIVE", 2="ASIAN", 3="BLACK OR AFRICAN AMERICAN", 4/5="MULTIPLE"/"MUTIPLE",
;6="NATIVE HAWAIIAN OR OTHER PACIFIC ISLANDER", 7="OTHER", 8="UNKNOWN", 9="WHITE"
;FAMILY: family history of AD 1=no, 2=unknown, 3=yes
;START: patient start year
;END: patient end year
;QSDTC: CDISC standard term for Date/Time of Finding
;APOE: 0=non-carrrier, 1=heterozygous, 2=homozygous, 3=unknown
;MDV: missing dependent variable
;ADASMOD: (ADAS * (nid-1) + 0.5)/nid, where nid is the total number of individuals
;Based on: Smithson & Verkuilen. Psychological Methods, 11: 54-71, 2006 [please refer to page 55]
;ADASTRANS: (ADASMOD - 0)/(70 - 0)
;ADASBLT2TRANS: adas baseline including the ones with baseline indicator; for missing bl, adas at time 0 or 1 was used in this order
;Based on: Smithson & Verkuilen. Psychological Methods, 11: 54-71, 2006 [please refer to page 54]
;INITIAL ESTIMATES:unless stated differently, it was based on lme model for ADASTRANS in R
;MOTIVATION FOR USING BETA-REGRESSION: for bounded data, the expectation must be nonlinear due to the ceiling/floor effects,
;and the error distribution must be heteroscedastic since the variance must approach zero as their mean approaches
;either boundary score (Reference: Xu et al. J PK PD, 40: 537-544, 2013)

$DATA nonmemdata022614.csv IGNORE=@ IGNORE=(MDV.EQ.1,ID.EQ.528);

$OMEGA  BLOCK(2)
 0.156  ;   1 BSV_BL
 0.0224  ; CORR BSV_BL:BSV_SL
 0.0424 ; 2 BSV_SL

$OMEGA  BLOCK(2)
0.0084 ;   1 ISV_BL
0.0014 ;   2 CORR ISV_BL:ISV_SL
0.0004 ;   3 ISV_SL

;##########################################################################################################################################

$PRED

;;; BLAPOE4C-DEFINITION START
BLAPOE4C = ( 1 + THETA(9)*(APOE4C - 0.72))
;;; BLAPOE4C-DEFINITION END

;;; SLCOMED2-DEFINITION START
IF(COMED2.EQ.1) SLCOMED2 = 1  ; Most common
IF(COMED2.EQ.0) SLCOMED2 = 1+THETA(8)
;;; SLCOMED2-DEFINITION END

;;; SLAPOE4C-DEFINITION START
SLAPOE4C = ( 1 + THETA(7)*(APOE4C - 0.72))
;;; SLAPOE4C-DEFINITION END

;;; SLAGE-DEFINITION START
SLAGE = ( 1 + THETA(6)*(AGE - 75.00))
;;; SLAGE-DEFINITION END

;;; SL-RELATION START
SLCOV=SLAGE*SLAPOE4C*SLCOMED2
;;; SL-RELATION END

;;; BLSEX-DEFINITION START
IF(SEX.EQ.1) BLSEX = 1  ; Most common
IF(SEX.EQ.2) BLSEX = THETA(5)
;;; BLSEX-DEFINITION END

;;; BL-RELATION START
BLCOV=BLSEX*BLAPOE4C
;;; BL-RELATION END

YTIME	 = TIME/365.25									;TIME in years to avoid such small slope
;############################### DEFINING THETAS ###########################################################################################

TVBL     = THETA(1)				 					    ;POPULATION BASELINE ADAS-Cog

TVBL = BLCOV*TVBL
TVSL     = THETA(2)                					    ;POPULATION SLOPE: disease progression rate constant

TVSL = SLCOV*TVSL

STEWSV = 1
STEBSV = 1
IF(STUDY.EQ.1131) THEN
  STEWSV = EXP(THETA(10))
  STEBSV = EXP(THETA(11))
ENDIF

BL       = TVBL*EXP(ETA(1)*STEBSV + ETA(3))        			    ;EXPONENTIAL ERROR: to prevent individual baseline from becoming negative
SL       = TVSL + ETA(2) + ETA(4)		     			;ADDITIVE ERROR: slope can be positive or negative on individual basis

TVSHAPE  = THETA(3)				 					    ;POPULATION SHAPE factor of the Richards logistic growth model
TAU      = THETA(4)*STEWSV				 					    ;TAU is the precision parameter of the beta distribution (=ALPHA+BETA)
														;VARIANCE of the beta distribution is MUR*(1-MUR)/(TAU+1),
														;meaning that the variance increases as TAU increase; although, it is not
														;the sole determinante of dispersion, since dispersion also depends on MUR

;############################### STRUCTURAL MODEL TO DESCRIBE THE RATE OF DISEASE PROGRESSION ##############################################
														;Using Richards logistic growth model: three-parameter logistic model
														;Tsoularis & Wallace. Mathematical Biosciences, 179:21-55, 2002 [please refer to page 33]

;GG=1.0E-30
;IF(BL<GG) THEN
;   BL=GG
;   PRINT 1,ID
;ENDIF
DEN1     = BL**TVSHAPE
DEN2     = (70**TVSHAPE) - (BL**TVSHAPE)
DEN3     = EXP(-TVSHAPE*SL*YTIME)
DENN=DEN1 + DEN2*DEN3
;IF(DENN<GG) THEN
;  DENN=GG
;  PRINT 2, ID
;ENDIF
MUR      = BL/((DENN)**(1/TVSHAPE)) 	     			;INDIVIDUAL ADAS-Cog response as a function of time

;############################### DEFINING IPRED/PRED ########################################################################################

F        = MUR					      					;INDIVIDUAL (IPRED)
IPRED    = F

;############################## RATE OF CHANGE IN ADAS-Cog AS A FUNCTION OF TIME ############################################################

;RATE     = SL*MUR*(1-((MUR/70)**TVSHAPE)) 				;as differential equation: RATE=d(ADAS-Cog)/dt
;TVRATE   = TVSL*TVMUR*(1-((TVMUR/70)**TVSHAPE))		    ;population value

;############################## BETA REGRESSION #############################################################################################
														;Reference: Smithson & Verkuilen. Psychological Methods, 11: 54-71, 2006 [page 58]
														;MUR is the location parameter of the beta distrution
														;TAU is the precision parameter of the beta distribution
														;MUR and TAU have no restriction on each other, so that they can be modeled separately
ALPHA    = MUR*TAU										;BETA DISTRIBUTION shape parameter pulling density toward 0 (alpha>0)
BETA     = (1-MUR)*TAU								    ;BETA DISTRIBUTION shape parameter pulling density toward 1 (beta >0)

X1       = ALPHA+BETA									;It is really TAU
X2       = ALPHA
X3       = BETA

;NEMES APPROXIMATION OF THE LN(GAMMA) DISTRIBUTION
GG1=1.0E-150
;IF(X1<GG1) THEN
;   X1=GG1
;   PRINT 3, ID
;ENDIF
;IF(X2<GG1) THEN
;  X2=GG1
;  PRINT 4,ID
;ENDIF
;IF(X3<GG1) THEN
;  X3=GG1
;  PRINT 5,ID
;ENDIF
LGAMMAX1 = X1*(LOG(X1)-1) + 0.5*(LOG(2*3.1415)-LOG(X1)) + (5/4)*X1*LOG(1+(1/(15*X1**2)))
LGAMMAX2 = X2*(LOG(X2)-1) + 0.5*(LOG(2*3.1415)-LOG(X2)) + (5/4)*X2*LOG(1+(1/(15*X2**2)))
LGAMMAX3 = X3*(LOG(X3)-1) + 0.5*(LOG(2*3.1415)-LOG(X3)) + (5/4)*X3*LOG(1+(1/(15*X3**2)))

;LOG-LIKELIHOOD OF THE BETA DISTRIBUTION: LN of the probability density function of the beta distribution
WDV=DV
IF(WDV<0.001) THEN
   WDV=0.001
;   PRINT 6,ID
ENDIF
IF(WDV>0.999) THEN
   WDV=0.999
;   PRINT 7,ID
ENDIF
LLBETA   = LGAMMAX1 - LGAMMAX2 - LGAMMAX3 + (ALPHA-1)*LOG(WDV) + (BETA-1)*LOG(1-WDV)

;############################### DEFINING RESIDUALS AND Y ###################################################################################

;PEARSON RESIDUALS
;SOR      = (WDV-IPRED)/SQRT(IPRED*(1-IPRED)/(1+TAU))    ;Standardized ordinary residuals

LLB2=-2.0*LLBETA
;IF(LLB2.GT.300.0) THEN
;   LLB2=300.0
;   PRINT 8,ID
;ENDIF
;IF(LLB2.LT.-300.0) THEN
;   LLB2=-300.0
;   PRINT 9,ID
;ENDIF
Y        = LLB2
;############################## INITIAL ESTIMATES ###########################################################################################

$THETA
(0, 22.3, 100) 				; 1 TVBL
(-100, 0.151, 50) 			; 2 TVSL
(0, 6.98, 100) 				; 3 TVSHAPE (initial estimate from bapineuzumab model)
(-300, 87.8, 300) 		        ; 4 TAU (initial estimate from bapineuzumab model)
(0,1)                            	; 5 BLSEX1
(0.1)                   		; 6 SLAGE1
(0.2)    		                ; 7 SLAPOE4C1
(-0.5, -0.275, 0.1)                   		; 8 SLCOMED21
(0.1)  	                                ; 9 BLAPOE4C1
(0.1)                                   ; 10 STE WSV EFFECT
(0.1)                                   ; 11 STE BSV EFFECT

$LEVEL
STUDY=(3[1],4[2])

$ESTIMATION MAXEVAL=9999 PRINT=1 METHOD=COND -2LL LAPLACIAN NOHABORT FNLETA=0 NSIG=2 SIGL=7 SLOW MCETA=10 NONINFETA=1  FILE=run46.ext
;$ESTIMATION MAXEVAL=9999 PRINT=1 METHOD=COND -2LL LAPLACIAN NOHABORT SIGL=10 FILE=run46.ext

$COV MATRIX=R UNCONDITIONAL SIGL=9 SLOW PRINT=E

$TABLE STUDY ID TIME ADAS WDV MUR NOPRINT ONEHEADER FILE=sdtab46.txt
;$TABLE STUDY ID TIME ADAS RATE TVRATE WDV MUR TVMUR SOR NOPRINT ONEHEADER FILE=sdtab46.txt
;$TABLE STUDY ID BL SL TVSHAPE ALPHA BETA TAU ETA(1) ETA(2) ETA(3) ETA(4) NOPRINT ONEHEADER FIRSTONLY FILE=patab46.txt
$TABLE STUDY ID BL SL TVSHAPE ALPHA BETA TAU ETA(1) ETA(2) NOPRINT ONEHEADER FIRSTONLY FILE=patab46.txt
$TABLE STUDY ID AGE SEX START APOE4 APOE4C COMED2 MMSE BL ADASBL NOPRINT ONEHEADER FILE=cotab46.txt

NM-TRAN MESSAGES
 WARNINGS AND ERRORS (IF ANY) FOR PROBLEM    1
 (WARNING  2) NM-TRAN INFERS THAT THE DATA ARE POPULATION.
 (WARNING  97) A RANDOM QUANTITY IS RAISED TO A POWER. IF THE RESULT AFFECTS
 THE VALUE OF THE OBJECTIVE FUNCTION, THE USER SHOULD ENSURE THAT THE
 RANDOM QUANTITY IS NEVER 0 WHEN THE POWER IS < 1.

1NONLINEAR MIXED EFFECTS MODEL PROGRAM (NONMEM) VERSION 7.3.0
 ORIGINALLY DEVELOPED BY STUART BEAL, LEWIS SHEINER, AND ALISON BOECKMANN
 CURRENT DEVELOPERS ARE ROBERT BAUER, ICON DEVELOPMENT SOLUTIONS,
 AND ALISON BOECKMANN. IMPLEMENTATION, EFFICIENCY, AND STANDARDIZATION
 PERFORMED BY NOUS INFOSYSTEMS.
 PROBLEM NO.:         1
 run46.mod CAMD ADAS-COG TOTAL
 TOT. NO. OF OBS RECS:    24988
 TOT. NO. OF INDIVIDUALS:   4494
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 #TBLN:      1
 #METH: Laplacian Conditional Estimation
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
 #TERM:
0MINIMIZATION SUCCESSFUL
 HOWEVER, PROBLEMS OCCURRED WITH THE MINIMIZATION.
 REGARD THE RESULTS OF THE ESTIMATION STEP CAREFULLY, AND ACCEPT THEM ONLY
 AFTER CHECKING THAT THE COVARIANCE STEP PRODUCES REASONABLE OUTPUT.
 NO. OF FUNCTION EVALUATIONS USED:     1147
 NO. OF SIG. DIGITS IN FINAL EST.:  2.4

 ETABAR IS THE ARITHMETIC MEAN OF THE ETA-ESTIMATES,
 AND THE P-VALUE IS GIVEN FOR THE NULL HYPOTHESIS THAT THE TRUE MEAN IS 0.

 ETABAR:         1.0043E-02  1.4650E-03 -1.4995E-15  1.8388E-06
 SE:             5.7310E-03  2.2035E-03  2.0751E-02  4.8614E-03
 N:                    4494        4494          15          15

 P VAL.:         7.9700E-02  5.0615E-01  1.0000E+00  9.9970E-01

 ETAshrink(%):   2.5615E+00  2.7168E+01  1.5818E+01  2.4744E+01
 EBVshrink(%):   2.7022E+00  2.7023E+01  0.0000E+00  0.0000E+00
 EPSshrink(%):   1.0000E+02

 #TERE:
 Elapsed estimation time in seconds:  5685.42
 Elapsed covariance time in seconds:  3297.18
 SKIPPING EXECUTION OF SLOW FNLMOD/FNLETA BY USER REQUEST

 ********************                         LAPLACIAN CONDITIONAL ESTIMATION                       ********************
 #OBJT:**************                       MINIMUM VALUE OF OBJECTIVE FUNCTION                      ********************
 #OBJV:********************************************   -61173.438       **************************************************

 ********************                         LAPLACIAN CONDITIONAL ESTIMATION                       ********************
 ********************                             FINAL PARAMETER ESTIMATE                           ********************

 THETA - VECTOR OF FIXED EFFECTS PARAMETERS   *********
         TH 1      TH 2      TH 3      TH 4      TH 5      TH 6      TH 7      TH 8      TH 9      TH10      TH11
         2.22E+01  1.53E-01  6.91E+00  8.75E+01  9.53E-01 -2.40E-02  1.95E-01 -3.02E-01  3.72E-02  1.06E+00 -7.89E-01

 OMEGA - COV MATRIX FOR RANDOM EFFECTS - ETAS  ********
            ETA1      ETA2      ETA3      ETA4
 ETA1
+        1.56E-01
 ETA2
+        2.24E-02  4.13E-02
 ETA3
+        0.00E+00  0.00E+00  9.77E-03
 ETA4
+        0.00E+00  0.00E+00  2.11E-03  6.71E-04

 OMEGA - CORR MATRIX FOR RANDOM EFFECTS - ETAS  *******
            ETA1      ETA2      ETA3      ETA4
 ETA1
+        3.95E-01
 ETA2
+        2.79E-01  2.03E-01
 ETA3
+        0.00E+00  0.00E+00  9.88E-02
 ETA4
+        0.00E+00  0.00E+00  8.25E-01  2.59E-02

 ********************                         LAPLACIAN CONDITIONAL ESTIMATION                       ********************
 ********************                            STANDARD ERROR OF ESTIMATE                          ********************

 THETA - VECTOR OF FIXED EFFECTS PARAMETERS   *********
         TH 1      TH 2      TH 3      TH 4      TH 5      TH 6      TH 7      TH 8      TH 9      TH10      TH11
         1.81E-01  4.95E-03  2.53E-01  9.40E-01  1.13E-02  3.82E-03  5.49E-02  1.26E-02  1.36E-02  1.12E-01  8.75E-02

 OMEGA - COV MATRIX FOR RANDOM EFFECTS - ETAS  ********
            ETA1      ETA2      ETA3      ETA4
 ETA1
+        3.56E-03
 ETA2
+        1.83E-03  1.66E-03
 ETA3
+       ......... .........  2.31E-03
 ETA4
+       ......... .........  8.07E-04  2.95E-04

 OMEGA - CORR MATRIX FOR RANDOM EFFECTS - ETAS  *******
            ETA1      ETA2      ETA3      ETA4
 ETA1
+        4.51E-03
 ETA2
+        2.21E-02  4.09E-03
 ETA3
+       ......... .........  1.17E-02
 ETA4
+       ......... .........  6.36E-02  5.69E-03
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
 ********************                         LAPLACIAN CONDITIONAL ESTIMATION                       ********************
 ********************                      EIGENVALUES OF COR MATRIX OF ESTIMATE                     ********************

             1         2         3         4         5         6         7         8         9        10        11        12
             13        14        15        16        17
         8.20E-03  1.97E-01  2.67E-01  3.58E-01  6.21E-01  6.32E-01  7.66E-01  8.44E-01  9.17E-01  9.79E-01  1.02E+00  1.07E+00
          1.08E+00  1.25E+00  1.39E+00  1.72E+00  3.88E+00
 #CPUT: Total CPU Time in Seconds,     8972.140
