ons maj 10 12:12:20 CEST 2017
$PROBLEM    The Multistate Tuberculosis Pharmacometric Model
;The Multistate Tuberculosis Pharmacometric Model

;Oskar Clewe

;Uppsala University

;October 2015

;M.tuberculosis H37Rv (St George´s Uni)

;NM7.3

;Log-transformed both sides

;DV is ln(CFU/mL)

;Time in days
$INPUT      TIME ID NDV DV EVID MDV AMT
$DATA      Data.csv IGNORE=@
$SUBROUTINE ADVAN13 TOL=9
$MODEL      NCOMP=3 COMP=(FBUGS) COMP=(SBUGS) COMP=(NBUGS)
$PK
TVKG=THETA(1)            ; Growth rate of F bacteria

KFSLIN=THETA(2)/100    ; Rate parameter, F -> S, Linear time dependent
KFN=THETA(3)/1000000   ; Rate parameter, F -> N
KSF=THETA(4)/10        ; Rate parameter, S -> F
KSN=THETA(5)           ; Rate parameter, S -> N
KNS=THETA(6)/100       ; Rate parameter, N -> S

TVBMAX=THETA(7)*1000000  ; System carrying capacity (CFU/ml)

TVF0=THETA(8)            ; Initial F bacterial number (CFU/ml)
TVS0=THETA(9)            ; Initial S bacterial number (CFU/ml)

KG=TVKG
BMAX=TVBMAX
F0=TVF0*EXP(ETA(1))      ; IIV on initial F bacterial number
S0=TVS0

A_0(1)=F0                ; Initial F bacterial number with IIV
A_0(2)=S0                ; Initial S bacterial number
A_0(3)=0.00001           ; Initial N bacterial number

$DES
GROWTHFUNC=KG*LOG(BMAX/(A(1)+A(2)+A(3))) ; Gompertz growth function
IF(GROWTHFUNC.LT.0) GROWTHFUNC=0         ; Keep GROWTHFUNC from turning negative

KFS=KFSLIN*T                             ; Linear time dependendent transfer, F -> S

DADT(1)=A(1)*GROWTHFUNC+KSF*A(2)-KFS*A(1)-KFN*A(1) ;F
DADT(2)=KFS*A(1)+KNS*A(3)-KSN*A(2)-KSF*A(2)        ;S
DADT(3)=KSN*A(2)+KFN*A(1)-KNS*A(3)                 ;N

$ERROR
FBUGS=A(1)             ; F
SBUGS=A(2)             ; S
NBUGS=A(3)             ; N
TOTBUGS=A(1)+A(2)+A(3) ; F+S+N

IPRED=LOG(A(1)+A(2))
IRES=DV-IPRED
ADD=SQRT(SIGMA(1))
SD=SQRT((ADD)**2)      ; SD for additive residual error on log scale
IWRES=IRES/SD
Y=IPRED+EPS(1)

$THETA  (0,0.206361) ; 1 kG
$THETA  (0,0.1657) ; 2 kFSLIN (/100)
$THETA  (0,0.9) ; 3 kFN (/1000000)
$THETA  (0,0.14478) ; 4 kSF (/10)
$THETA  (0,0.185568) ; 5 kSN
$THETA  (0,0.1227) ; 6 kNS (/100)
$THETA  (0,241.6170) ; 7 Bmax (*1000000)
$THETA  (0,4.109880) ; 8 F0
$THETA  (0,9770.730) ; 9 S0
$OMEGA  22.37250  ; variance for ETA(1) on F0
$SIGMA  0.400262  ; variance for add residual error on logscale
$ESTIMATION METHOD=1 MAXEVAL=9999 NSIG=3 SIGL=9
$COVARIANCE PRINT=E
$TABLE      ID TIME IPRED ADD IRES IWRES CWRES DV NDV FBUGS SBUGS
            NBUGS TOTBUGS EVID ONEHEADER NOPRINT FILE=sdtabMTP
$TABLE      ID TIME GROWTHFUNC KG KFN KFS KFSLIN KSF KSN KNS BMAX F0
            S0 ETA(1) ONEHEADER NOPRINT FILE=patabMTP
$TABLE      ID TIME ONEHEADER NOPRINT FILE=cotabMTP
$TABLE      ID TIME ONEHEADER NOPRINT FILE=catabMTP

NM-TRAN MESSAGES
 WARNINGS AND ERRORS (IF ANY) FOR PROBLEM    1
 (WARNING  2) NM-TRAN INFERS THAT THE DATA ARE POPULATION.
 (WARNING  48) DES-DEFINED ITEMS ARE COMPUTED ONLY WHEN EVENT TIME
 INCREASES. E.G., DISPLAYED VALUES ASSOCIATED WITH THE FIRST EVENT RECORD
 OF AN INDIVIDUAL RECORD ARE COMPUTED WITH (THE LAST ADVANCE TO) AN EVENT
 TIME OF THE PRIOR INDIVIDUAL RECORD.
 (WARNING  79) SIGMA IS USED ON THE RIGHT. WITH A SUBSEQUENT RUN, IF AN
 INITIAL ESTIMATE OF A DIAGONAL BLOCK OF SIGMA IS TO BE COMPUTED BY
 NONMEM, THAT BLOCK WILL BE SET TO AN IDENTITY MATRIX DURING THAT
 COMPUTATION. THIS COULD LEAD TO AN ARITHMETIC EXCEPTION.*
 * THE MAXIMUM NUMBER OF WARNINGS OF ONE OR MORE TYPES WAS REACHED.
 IT IS POSSIBLE THAT SOME WARNING MESSAGES WERE SUPPRESSED.

1NONLINEAR MIXED EFFECTS MODEL PROGRAM (NONMEM) VERSION 7.3.0
 ORIGINALLY DEVELOPED BY STUART BEAL, LEWIS SHEINER, AND ALISON BOECKMANN
 CURRENT DEVELOPERS ARE ROBERT BAUER, ICON DEVELOPMENT SOLUTIONS,
 AND ALISON BOECKMANN. IMPLEMENTATION, EFFICIENCY, AND STANDARDIZATION
 PERFORMED BY NOUS INFOSYSTEMS.
 PROBLEM NO.:         1
 The Multistate Tuberculosis Pharmacometric Model
 TOT. NO. OF OBS RECS:      132
 TOT. NO. OF INDIVIDUALS:     12
 GENERAL NONLINEAR KINETICS MODEL USING LSODA (ADVAN13)
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 #TBLN:      1
 #METH: First Order Conditional Estimation
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
 #TERM:
0MINIMIZATION SUCCESSFUL
 NO. OF FUNCTION EVALUATIONS USED:      374
 NO. OF SIG. DIGITS IN FINAL EST.:  3.2

 ETABAR IS THE ARITHMETIC MEAN OF THE ETA-ESTIMATES,
 AND THE P-VALUE IS GIVEN FOR THE NULL HYPOTHESIS THAT THE TRUE MEAN IS 0.

 ETABAR:         1.4447E+00
 SE:             7.7477E-01
 N:                      12

 P VAL.:         6.2216E-02

 ETAshrink(%):   4.0750E+01
 EBVshrink(%):   3.4306E+01
 EPSshrink(%):   1.9041E+00

 #TERE:
 Elapsed estimation time in seconds:    24.97
 Elapsed covariance time in seconds:    30.84

 ********************                        FIRST ORDER CONDITIONAL ESTIMATION                      ********************
 #OBJT:**************                       MINIMUM VALUE OF OBJECTIVE FUNCTION                      ********************
 #OBJV:********************************************      -92.456       **************************************************

 ********************                        FIRST ORDER CONDITIONAL ESTIMATION                      ********************
 ********************                             FINAL PARAMETER ESTIMATE                           ********************

 THETA - VECTOR OF FIXED EFFECTS PARAMETERS   *********
         TH 1      TH 2      TH 3      TH 4      TH 5      TH 6      TH 7      TH 8      TH 9
         2.06E-01  1.66E-01  8.97E-01  1.45E-01  1.86E-01  1.23E-01  2.42E+02  4.10E+00  9.77E+03

 OMEGA - COV MATRIX FOR RANDOM EFFECTS - ETAS  ********
            ETA1
 ETA1
+        2.24E+01

 SIGMA - COV MATRIX FOR RANDOM EFFECTS - EPSILONS  ****
            EPS1
 EPS1
+        1.60E-01

 OMEGA - CORR MATRIX FOR RANDOM EFFECTS - ETAS  *******
            ETA1
 ETA1
+        4.73E+00

 SIGMA - CORR MATRIX FOR RANDOM EFFECTS - EPSILONS  ***
            EPS1
 EPS1
+        4.00E-01

 ********************                        FIRST ORDER CONDITIONAL ESTIMATION                      ********************
 ********************                            STANDARD ERROR OF ESTIMATE                          ********************

 THETA - VECTOR OF FIXED EFFECTS PARAMETERS   *********
         TH 1      TH 2      TH 3      TH 4      TH 5      TH 6      TH 7      TH 8      TH 9
         2.12E-03  2.71E-03  1.11E-02  7.10E-03  7.99E-03  3.38E-03  1.10E+01  1.19E-01  2.39E+02

 OMEGA - COV MATRIX FOR RANDOM EFFECTS - ETAS  ********
            ETA1
 ETA1
+        2.63E+00

 SIGMA - COV MATRIX FOR RANDOM EFFECTS - EPSILONS  ****
            EPS1
 EPS1
+        1.62E-02

 OMEGA - CORR MATRIX FOR RANDOM EFFECTS - ETAS  *******
            ETA1
 ETA1
+        2.78E-01

 SIGMA - CORR MATRIX FOR RANDOM EFFECTS - EPSILONS  ***
            EPS1
 EPS1
+        2.02E-02

 ********************                        FIRST ORDER CONDITIONAL ESTIMATION                      ********************
 ********************                          COVARIANCE MATRIX OF ESTIMATE                         ********************

            TH 1      TH 2      TH 3      TH 4      TH 5      TH 6      TH 7      TH 8      TH 9      OM11      SG11
 TH 1
+        4.49E-06
 TH 2
+       -3.48E-06  7.36E-06
 TH 3
+       -5.19E-06  2.24E-06  1.22E-04
 TH 4
+       -1.16E-05  1.32E-05  3.73E-05  5.05E-05
 TH 5
+       -9.76E-06  9.32E-06 -2.93E-05  1.29E-05  6.38E-05
 TH 6
+       -1.68E-06  3.35E-06  1.86E-05  7.05E-06  2.79E-06  1.14E-05
 TH 7
+       -1.14E-02  1.22E-02 -4.75E-02  1.30E-02  8.37E-02  9.21E-03  1.20E+02
 TH 8
+        1.06E-04 -9.76E-05 -1.12E-04 -9.05E-05 -6.97E-04 -2.75E-04 -1.03E+00  1.43E-02
 TH 9
+        6.28E-02 -2.94E-01  1.74E+00 -3.20E-01 -2.32E-01  2.74E-01 -4.19E+02 -9.62E+00  5.70E+04
 OM11
+       -1.71E-03  1.03E-03  7.74E-03  9.46E-03 -1.92E-03 -2.38E-03 -4.93E+00  1.23E-01 -2.64E+01  6.92E+00
 SG11
+       -9.36E-06  9.54E-06  8.06E-05  5.23E-05 -2.19E-05  3.31E-05 -2.07E-02 -3.29E-04  2.72E-01  2.63E-03  2.61E-04

 ********************                        FIRST ORDER CONDITIONAL ESTIMATION                      ********************
 ********************                          CORRELATION MATRIX OF ESTIMATE                        ********************

            TH 1      TH 2      TH 3      TH 4      TH 5      TH 6      TH 7      TH 8      TH 9      OM11      SG11
 TH 1
+        2.12E-03
 TH 2
+       -6.07E-01  2.71E-03
 TH 3
+       -2.21E-01  7.45E-02  1.11E-02
 TH 4
+       -7.72E-01  6.86E-01  4.75E-01  7.10E-03
 TH 5
+       -5.77E-01  4.30E-01 -3.32E-01  2.28E-01  7.99E-03
 TH 6
+       -2.35E-01  3.65E-01  4.98E-01  2.94E-01  1.03E-01  3.38E-03
 TH 7
+       -4.91E-01  4.10E-01 -3.92E-01  1.68E-01  9.57E-01  2.49E-01  1.10E+01
 TH 8
+        4.20E-01 -3.01E-01 -8.47E-02 -1.07E-01 -7.31E-01 -6.81E-01 -7.86E-01  1.19E-01
 TH 9
+        1.24E-01 -4.55E-01  6.61E-01 -1.89E-01 -1.22E-01  3.39E-01 -1.60E-01 -3.37E-01  2.39E+02
 OM11
+       -3.07E-01  1.45E-01  2.66E-01  5.06E-01 -9.13E-02 -2.68E-01 -1.71E-01  3.90E-01 -4.21E-02  2.63E+00
 SG11
+       -2.73E-01  2.17E-01  4.51E-01  4.56E-01 -1.69E-01  6.07E-01 -1.17E-01 -1.70E-01  7.06E-02  6.18E-02  1.62E-02
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
 ********************                        FIRST ORDER CONDITIONAL ESTIMATION                      ********************
 ********************                      EIGENVALUES OF COR MATRIX OF ESTIMATE                     ********************

             1         2         3         4         5         6         7         8         9        10        11
         4.90E-07  2.81E-05  1.35E-03  1.10E-01  1.20E-01  3.34E-01  4.92E-01  1.13E+00  2.19E+00  2.71E+00  3.91E+00
 #CPUT: Total CPU Time in Seconds,       56.025
