Tue 08/28/2012
11:41 PM
;; 1. Based on: md3049
;; 2. Description: remove exp on V1
;; x1. Author: wangm
;;    include children less than 3 years and adults who have morphine, M3G and M6G concentrations.
;;    only morphine and m3g concentration are modeled
;;-----------------------------------------------
;; AMT      ug
;; RATE     ug/min
;; TIME     min
;; DV       natural log-transformed concentration
;; CONC     ug/L or ng/mL
;; AGE      year
;; PNA      day
;; BW       kg
;; CMT      1=morphine 2=m3g 3=m6g
;;-----------------------------------------------
$PROBLEM    MorphModel3
$INPUT      ID TIME AMT RATE DV MDV CONC CMT PNA AGE BW POP NKOD OID
            STUD
$DATA       morph_md3_clean.csv IGNORE=I
$SUBROUTINE ADVAN5
;-------------------------------------------------------------------------------
$MODEL      NCOMPARTMENTS=3 COMP (CENTRAL,DEFDOSE) ;MORPHINE CENTRAL
            COMP=(2) ;M3G
            COMP=(3) ;PERPHERAL COM OF MORHINE

;-------------------------------------------------------------------------------
$PK

KDEC1   = THETA(1)                      ; DECREASE OF EXPONENT FOR CLM1
KMAX1   = THETA(2)+KDEC1                ; MAXIMUM EXPONENT OF CLM1
KHAL1   = THETA(3)                      ; K50 OF CLM1
GAMMA1  = THETA(4)                      ; GAMMA OF CLM1
KBDE1   = KMAX1-KDEC1*(BW**GAMMA1)/(KHAL1**GAMMA1+BW**GAMMA1)

KDEC2   = THETA(5)                      ; DECREASE OF EXPONENT FOR CLE2
KMAX2   = THETA(6)+KDEC2                ; MAXIMUM EXPONENT OF CLE2
KHAL2   = THETA(7)                      ; K50 OF CLE2
GAMMA2  = THETA(8)                      ; GAMMA OF CLE2
KBDE2   = KMAX2-KDEC2*(BW**GAMMA2)/(KHAL2**GAMMA2+BW**GAMMA2)

;-------------------------------------------------------------------------------
TVCLM1  = THETA(9)*(BW/70)**KBDE1       ; POPULATION METABOLISM OF MORPHINE TO M3G
CLM1    = TVCLM1*EXP(ETA(1))            ; INDIVIDUAL ...
TVCLE1  = THETA(10)*(BW/70)             ; POPULATION EXCRETION OF MORPHINE + METABOLISM TO M6G
CLE1    = TVCLE1*EXP(ETA(2))            ; INDIVIDUAL ...
TVCLE2  = THETA(11)*(BW/70)**KBDE2      ; POPULATION EXCRETION OF M3G
CLE2    = TVCLE2*EXP(ETA(3))            ; INDIVIDUAL ...
;-------------------------------------------------------------------------------
TVV1    = THETA(12)*(BW/70)             ; POPULATION VOLUME OF MORPHINE CENTRAL COMPARTMENT
V1      = TVV1 * EXP(ETA(4))            ; INDIVIDUAL ...
TVV2    = THETA(13)*(BW/70)**THETA(18)  ; POPULATION VOLUME OF M3G
V2      = TVV2 * EXP(ETA(5))            ; INDIVIDUAL ...
TVQ2    = THETA(14)*(BW/70)             ; POPULATION INTERCOMPARTMENTAL CLEARANCE OF MORHPINE
Q2      = TVQ2*EXP(ETA(6))              ; INDIVIDUAL ...
TVV3    = THETA(15)*(BW/70)             ; POPULATION VOLUME OF MORPHINE PEREPHERAL COMPARTMENT
V3      = TVV3*EXP(ETA(7))              ; INDIVIDUAL ...

F1      = 1
IF (POP.EQ.3) F1 = 0.88
;-------------------------------------------------------------------------------
ET1  = ETA(1)
ET2  = ETA(2)
ET3  = ETA(3)
ET4  = ETA(4)
ET5  = ETA(5)
ET6  = ETA(6)
ET7  = ETA(7)
;-------------------------------------------------------------------------------
S1=V1
S2=V2
;-------------------------------------------------------------------------------
K10  = CLE1/V1
K12  = CLM1/V1
K13  = Q2/V1
K20  = CLE2/V2
K31  = Q2/V3

;-------------------------------------------------------------------------------
$ERROR

COM1=0
IF (CMT.EQ.1) COM1=1
COM2=0
IF (CMT.EQ.2) COM2=1
;
IPRED=LOG(0.000001)
IF (F.GT.0) IPRED = LOG(F)
W1   =  THETA(16)          ;ERR Morphine
W2   =  THETA(17)          ;ERR M3G

IRES  = IPRED-DV
IWRES = IRES/(COM1*W1+COM2*W2)

TEH=0
IF (TIME.GT.1900.AND.NKOD.EQ.1) TEH = 1
IF (TIME.GT.1900.AND.NKOD.EQ.2) TEH = 1

Y1 = IPRED + ERR(1)*W1 + TEH*ERR(3)    ; MORPHINE
Y2 = IPRED + ERR(2)*W2 + TEH*ERR(3)    ; M3G

Y=COM1*Y1+COM2*Y2
;-------------------------------------------------------------------------------
$THETA  (0.1,0.74) ; KDEC1
 (0.4,0.7) ; KMAX1-KDEC1 OR MINMUM EXP1 (TH2)
 (0.05,4,20) ; KHAL1
 (1,3) ; GAMMA1
 (0.1,0.47) ; KDEC2
 (0.4,0.6) ; KMAX2-KDEC2 OR MINMUM EXP2 (TH15)
 (0.05,5,20) ; KHAL2
 (1,6) ; GAMMA2
 (0.001,1.4) ; CLM1
 (0.001,0.1) ; CLE1
 (0.001,0.23) ; CLE2
 (0.01,30) ; V1
 20 FIX ; V2
 (0.001,4) ; Q2
 (0.01,180) ; V4
 (0,0.435) ; ERR MORP
 (0,0.362) ; ERR M3G
 (0.1,0.7) ; EXP V2
;--------------------------------------------------------
;---------------------------------------------------------
;-------------------------------------------------------------------------------
$OMEGA  0.2  ;       CLM1
 0.1  ;       CLE1
 0.19  ;       CLE2
 0.2  ;         V1
 0.2  ;         V2
 0  FIX  ;         Q2
 0.3  ;         V3
;-------------------------------------------------------------------------------
$SIGMA  1  FIX
 1  FIX
 2  ;       ERR3
;-------------------------------------------------------------------------------
$ESTIMATION NOABORT SIGDIG=3 PRINT=15 MAXEVAL=9999 METHOD=1
            INTERACTION POSTHOC
$COVARIANCE COMP PRINT=E
$TABLE      ID TIME AMT RATE DV PRED CWRES IWRES IPRED MDV CONC CMT
            PNA AGE BW POP NKOD OID STUD TVCLM1 KBDE1 KBDE2 CLM1
            TVCLE1 CLE1 TVCLE2 CLE2 Q2 TVV1 V1 TVV2 V2 TVV3 V3 ET1 ET2
            ET3 ET4 ET5 ET6 ET7 NOPRINT ONEHEADER NOAPPEND
            FILE=md3050.tab

NM-TRAN MESSAGES
 WARNINGS AND ERRORS (IF ANY) FOR PROBLEM    1
 (WARNING  2) NM-TRAN INFERS THAT THE DATA ARE POPULATION.

1NONLINEAR MIXED EFFECTS MODEL PROGRAM (NONMEM) VERSION 7.2.0
 ORIGINALLY DEVELOPED BY STUART BEAL, LEWIS SHEINER, AND ALISON BOECKMANN
 CURRENT DEVELOPERS ARE ROBERT BAUER, ICON DEVELOPMENT SOLUTIONS,
 AND ALISON BOECKMANN. IMPLEMENTATION, EFFICIENCY, AND STANDARDIZATION
 PERFORMED BY NOUS INFOSYSTEMS.
 PROBLEM NO.:         1
 MorphModel3
 TOT. NO. OF OBS RECS:     2415
 TOT. NO. OF INDIVIDUALS:    355
 GENERAL LINEAR KINETICS MODEL (ADVAN5)
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 #TBLN:      1
 #METH: First Order Conditional Estimation with Interaction
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
 #TERM:
0MINIMIZATION SUCCESSFUL
 NO. OF FUNCTION EVALUATIONS USED:     1389
 NO. OF SIG. DIGITS IN FINAL EST.:  4.2

 ETABAR IS THE ARITHMETIC MEAN OF THE ETA-ESTIMATES,
 AND THE P-VALUE IS GIVEN FOR THE NULL HYPOTHESIS THAT THE TRUE MEAN IS 0.

 ETABAR:         1.6365E-03 -3.1453E-03 -9.9728E-04 -1.8739E-02 -2.7863E-03  0.0000E+00 -1.6744E-02
 SE:             1.9462E-02  1.4378E-03  1.8575E-02  1.4903E-02  1.6035E-02  0.0000E+00  1.5777E-02

 P VAL.:         9.3299E-01  2.8707E-02  9.5718E-01  2.0859E-01  8.6206E-01  1.0000E+00  2.8858E-01

 ETAshrink(%):   1.8890E+01  8.9626E+01  2.0391E+01  6.0817E+01  5.0396E+01  1.0000E+02  4.6767E+01
 EPSshrink(%):   1.3475E+01  1.7938E+01  1.4786E+01

 #TERE:
 Elapsed estimation time in seconds:  4026.09
0R MATRIX ALGORITHMICALLY SINGULAR
 AND ALGORITHMICALLY NON-POSITIVE-SEMIDEFINITE
0R MATRIX IS OUTPUT
0COVARIANCE STEP ABORTED
 Elapsed covariance time in seconds: 10504.15

 ********************               FIRST ORDER CONDITIONAL ESTIMATION WITH INTERACTION              ********************
 #OBJT:**************                       MINIMUM VALUE OF OBJECTIVE FUNCTION                      ********************
 #OBJV:********************************************     -481.615       **************************************************

 ********************               FIRST ORDER CONDITIONAL ESTIMATION WITH INTERACTION              ********************
 ********************                             FINAL PARAMETER ESTIMATE                           ********************

 THETA - VECTOR OF FIXED EFFECTS PARAMETERS   *********
         TH 1      TH 2      TH 3      TH 4      TH 5      TH 6      TH 7      TH 8      TH 9      TH10      TH11      TH12
          TH13      TH14      TH15      TH16      TH17      TH18
         6.65E-01  8.90E-01  3.89E+00  3.61E+00  4.48E-01  6.10E-01  4.87E+00  6.84E+00  1.67E+00  5.72E-02  2.25E-01  2.93E+01
          2.00E+01  4.20E+00  1.55E+02  4.47E-01  3.71E-01  7.11E-01

 OMEGA - COV MATRIX FOR RANDOM EFFECTS - ETAS  ********
            ETA1      ETA2      ETA3      ETA4      ETA5      ETA6      ETA7
 ETA1
+        2.02E-01
 ETA2
+        0.00E+00  6.74E-02
 ETA3
+        0.00E+00  0.00E+00  1.91E-01
 ETA4
+        0.00E+00  0.00E+00  0.00E+00  5.08E-01
 ETA5
+        0.00E+00  0.00E+00  0.00E+00  0.00E+00  3.67E-01
 ETA6
+        0.00E+00  0.00E+00  0.00E+00  0.00E+00  0.00E+00  0.00E+00
 ETA7
+        0.00E+00  0.00E+00  0.00E+00  0.00E+00  0.00E+00  0.00E+00  3.08E-01

 SIGMA - COV MATRIX FOR RANDOM EFFECTS - EPSILONS  ****
            EPS1      EPS2      EPS3
 EPS1
+        1.00E+00
 EPS2
+        0.00E+00  1.00E+00
 EPS3
+        0.00E+00  0.00E+00  1.85E+00

 OMEGA - CORR MATRIX FOR RANDOM EFFECTS - ETAS  *******
            ETA1      ETA2      ETA3      ETA4      ETA5      ETA6      ETA7
 ETA1
+        4.50E-01
 ETA2
+        0.00E+00  2.60E-01
 ETA3
+        0.00E+00  0.00E+00  4.37E-01
 ETA4
+        0.00E+00  0.00E+00  0.00E+00  7.13E-01
 ETA5
+        0.00E+00  0.00E+00  0.00E+00  0.00E+00  6.06E-01
 ETA6
+        0.00E+00  0.00E+00  0.00E+00  0.00E+00  0.00E+00  0.00E+00
 ETA7
+        0.00E+00  0.00E+00  0.00E+00  0.00E+00  0.00E+00  0.00E+00  5.55E-01

 SIGMA - CORR MATRIX FOR RANDOM EFFECTS - EPSILONS  ***
            EPS1      EPS2      EPS3
 EPS1
+        1.00E+00
 EPS2
+        0.00E+00  1.00E+00
 EPS3
+        0.00E+00  0.00E+00  1.36E+00
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