11/09/2017
15:52
$PROBLEM    Midazolam PK in critically ill Children
$INPUT      ID TIME ; in hours
            CMT AMT ; in microgram
            RATE ; in microgram / hour
            DV ; in microgram / L
            MDV ORGF ; number of organs that are failig
            WT ; bodyweight in kg
            CRP ; CRP concentration in mg/L
$DATA      Data20150701.csv IGNORE=@
$SUBROUTINE ADVAN6 TOL=6
$MODEL      COMP=(CENTRAL) COMP=(PERIPH)
$PK
OCC=1
IF(TIME.GE.24)OCC=2
IF(TIME.GE.48)OCC=3
IF(TIME.GE.72)OCC=4
IF(TIME.GE.96)OCC=5
IF(TIME.GE.120)OCC=6

FLAG1=0
FLAG2=0
FLAG3=0
FLAG4=0
FLAG5=0
FLAG6=0

IF(OCC.EQ.1) FLAG1 = 1
IF(OCC.EQ.2) FLAG2 = 1
IF(OCC.EQ.3) FLAG3 = 1
IF(OCC.EQ.4) FLAG4 = 1
IF(OCC.EQ.5) FLAG5 = 1
IF(OCC.EQ.6) FLAG6 = 1

IOV=FLAG1*ETA(3)+FLAG2*ETA(4)+FLAG3*ETA(5)+FLAG4*ETA(6)+FLAG5*ETA(7)+FLAG6*ETA(8)

IIVCL = ETA(1)

ETCL = IIVCL + IOV

IF (ORGF.EQ.0) TVCL = THETA(1) * (WT/5)**(THETA(5)) * (CRP/32)**THETA(11)
IF (ORGF.EQ.1) TVCL = THETA(7) * (WT/5)**(THETA(5)) * (CRP/32)**THETA(11)
IF (ORGF.EQ.2) TVCL = THETA(8) * (WT/5)**(THETA(5)) * (CRP/32)**THETA(11)
IF (ORGF.EQ.3) TVCL = THETA(9) * (WT/5)**(THETA(5)) * (CRP/32)**THETA(11)
IF (ORGF.GT.3.5) TVCL = THETA(10) * (WT/5)**(THETA(5)) * (CRP/32)**THETA(11)
CL = TVCL * EXP(ETCL)
TVV1 = THETA(2) * (WT/5)**(THETA(6))
V1 = TVV1 * EXP(ETA(2))
TVQ  = THETA(3)
Q  = TVQ
TVV2 = THETA(4)
V2 = TVV2
S1 = V1

K10 = CL/V1
K12 = Q/V1
K21 = Q/V2

$DES
DADT(1) = -K10*A(1) - K12*A(1) + K21*A(2)
DADT(2) =             K12*A(1) - K21*A(2)

$ERROR
Y=F*(1+ERR(1))+ERR(2)
IPRED=F

$THETA  1.6 FIX ; CL orgf = 0
 (0.001,10) ; V1 (L)
 (0.001,1) ; Q (L/h)
 (0.001,10) ; V2 (L)
 (0.001,0.75) ; WT-CL pow
 (0.001,0.75) ; WT-V1 pow
 (0.001,1) ; CL orgf 1
 (0.001,1) ; CL orgf 2
 (0.001,1) ; CL orgf 3
 (0.001,1) ; CL orgf 4/5
 (-5,-0.5) ; CRP-CL pwr
$OMEGA  0.1  ;     IIV CL
 0.1  ;     IIV V1
$OMEGA  BLOCK(1)
 0.05  ;        IOV
$OMEGA  BLOCK(1) SAME
$OMEGA  BLOCK(1) SAME
$OMEGA  BLOCK(1) SAME
$OMEGA  BLOCK(1) SAME
$OMEGA  BLOCK(1) SAME
$SIGMA  0.1  ; Proportional error PK
 0.1  ; Additive error PK
$ESTIMATION METHOD=1 INTER MAXEVAL=2000 NOABORT SIG=3 PRINT=5 POSTHOC
$COVARIANCE PRINT=E
$TABLE      ID TIME DV MDV PRED IPRED CWRES WT ONEHEADER NOPRINT
            FILE=sdtab
$TABLE      ID CL V1 V2 Q ETA(1) ETA(2) ETCL IOV WT ORGF CRP ONEHEADER
            NOPRINT FIRSTONLY FILE=patab

NM-TRAN MESSAGES
 WARNINGS AND ERRORS (IF ANY) FOR PROBLEM    1
 (WARNING  2) NM-TRAN INFERS THAT THE DATA ARE POPULATION.

1NONLINEAR MIXED EFFECTS MODEL PROGRAM (NONMEM) VERSION 7.3.0
 ORIGINALLY DEVELOPED BY STUART BEAL, LEWIS SHEINER, AND ALISON BOECKMANN
 CURRENT DEVELOPERS ARE ROBERT BAUER, ICON DEVELOPMENT SOLUTIONS,
 AND ALISON BOECKMANN. IMPLEMENTATION, EFFICIENCY, AND STANDARDIZATION
 PERFORMED BY NOUS INFOSYSTEMS.
 PROBLEM NO.:         1
 Midazolam PK in critically ill Children
 TOT. NO. OF OBS RECS:      523
 TOT. NO. OF INDIVIDUALS:     83
 GENERAL NONLINEAR KINETICS MODEL (ADVAN6)
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 #TBLN:      1
 #METH: First Order Conditional Estimation with Interaction
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
 #TERM:
0MINIMIZATION SUCCESSFUL
 NO. OF FUNCTION EVALUATIONS USED:      773
 NO. OF SIG. DIGITS IN FINAL EST.:  3.4

 ETABAR IS THE ARITHMETIC MEAN OF THE ETA-ESTIMATES,
 AND THE P-VALUE IS GIVEN FOR THE NULL HYPOTHESIS THAT THE TRUE MEAN IS 0.

 ETABAR:        -1.2405E-02 -3.2843E-02  5.8023E-04 -8.0764E-02 -2.9366E-02 -1.3178E-02  3.3338E-02  8.2297E-02
 SE:             5.5501E-02  7.1236E-02  1.1991E-02  2.7396E-02  2.3377E-02  2.8746E-02  2.3722E-02  2.4860E-02
 N:                      83          83          83          83          83          83          83          83

 P VAL.:         8.2314E-01  6.4477E-01  9.6141E-01  3.1987E-03  2.0904E-01  6.4665E-01  1.5992E-01  9.3155E-04

 ETAshrink(%):   1.3430E+01  4.0260E+01  7.5265E+01  4.3488E+01  5.1780E+01  4.0704E+01  5.1067E+01  4.8721E+01
 EBVshrink(%):   1.2769E+01  4.0835E+01  7.7329E+01  4.3440E+01  4.0429E+01  4.2342E+01  4.7986E+01  5.4408E+01
 EPSshrink(%):   1.8675E+01  1.8675E+01

 #TERE:
 Elapsed estimation time in seconds:   428.03
 Elapsed covariance time in seconds:   850.22

 ********************               FIRST ORDER CONDITIONAL ESTIMATION WITH INTERACTION              ********************
 #OBJT:**************                       MINIMUM VALUE OF OBJECTIVE FUNCTION                      ********************
 #OBJV:********************************************     6301.530       **************************************************

 ********************               FIRST ORDER CONDITIONAL ESTIMATION WITH INTERACTION              ********************
 ********************                             FINAL PARAMETER ESTIMATE                           ********************

 THETA - VECTOR OF FIXED EFFECTS PARAMETERS   *********
         TH 1      TH 2      TH 3      TH 4      TH 5      TH 6      TH 7      TH 8      TH 9      TH10      TH11
         1.60E+00  3.28E+00  1.52E+00  5.44E+00  1.02E+00  1.34E+00  1.29E+00  9.57E-01  8.42E-01  6.78E-01 -3.12E-01

 OMEGA - COV MATRIX FOR RANDOM EFFECTS - ETAS  ********
            ETA1      ETA2      ETA3      ETA4      ETA5      ETA6      ETA7      ETA8
 ETA1
+        3.45E-01
 ETA2
+        0.00E+00  1.19E+00
 ETA3
+        0.00E+00  0.00E+00  1.97E-01
 ETA4
+        0.00E+00  0.00E+00  0.00E+00  1.97E-01
 ETA5
+        0.00E+00  0.00E+00  0.00E+00  0.00E+00  1.97E-01
 ETA6
+        0.00E+00  0.00E+00  0.00E+00  0.00E+00  0.00E+00  1.97E-01
 ETA7
+        0.00E+00  0.00E+00  0.00E+00  0.00E+00  0.00E+00  0.00E+00  1.97E-01
 ETA8
+        0.00E+00  0.00E+00  0.00E+00  0.00E+00  0.00E+00  0.00E+00  0.00E+00  1.97E-01

 SIGMA - COV MATRIX FOR RANDOM EFFECTS - EPSILONS  ****
            EPS1      EPS2
 EPS1
+        9.77E-02
 EPS2
+        0.00E+00  1.38E-01

 OMEGA - CORR MATRIX FOR RANDOM EFFECTS - ETAS  *******
            ETA1      ETA2      ETA3      ETA4      ETA5      ETA6      ETA7      ETA8
 ETA1
+        5.88E-01
 ETA2
+        0.00E+00  1.09E+00
 ETA3
+        0.00E+00  0.00E+00  4.44E-01
 ETA4
+        0.00E+00  0.00E+00  0.00E+00  4.44E-01
 ETA5
+        0.00E+00  0.00E+00  0.00E+00  0.00E+00  4.44E-01
 ETA6
+        0.00E+00  0.00E+00  0.00E+00  0.00E+00  0.00E+00  4.44E-01
 ETA7
+        0.00E+00  0.00E+00  0.00E+00  0.00E+00  0.00E+00  0.00E+00  4.44E-01
 ETA8
+        0.00E+00  0.00E+00  0.00E+00  0.00E+00  0.00E+00  0.00E+00  0.00E+00  4.44E-01

 SIGMA - CORR MATRIX FOR RANDOM EFFECTS - EPSILONS  ***
            EPS1      EPS2
 EPS1
+        3.13E-01
 EPS2
+        0.00E+00  3.71E-01

 ********************               FIRST ORDER CONDITIONAL ESTIMATION WITH INTERACTION              ********************
 ********************                            STANDARD ERROR OF ESTIMATE                          ********************

 THETA - VECTOR OF FIXED EFFECTS PARAMETERS   *********
         TH 1      TH 2      TH 3      TH 4      TH 5      TH 6      TH 7      TH 8      TH 9      TH10      TH11
        .........  1.13E+00  5.18E-01  9.13E-01  1.31E-01  2.36E-01  1.80E-01  1.21E-01  2.18E-01  1.70E-01  6.57E-02

 OMEGA - COV MATRIX FOR RANDOM EFFECTS - ETAS  ********
            ETA1      ETA2      ETA3      ETA4      ETA5      ETA6      ETA7      ETA8
 ETA1
+        7.92E-02
 ETA2
+       .........  6.02E-01
 ETA3
+       ......... .........  4.76E-02
 ETA4
+       ......... ......... ......... .........
 ETA5
+       ......... ......... ......... ......... .........
 ETA6
+       ......... ......... ......... ......... ......... .........
 ETA7
+       ......... ......... ......... ......... ......... ......... .........
 ETA8
+       ......... ......... ......... ......... ......... ......... ......... .........

 SIGMA - COV MATRIX FOR RANDOM EFFECTS - EPSILONS  ****
            EPS1      EPS2
 EPS1
+        1.45E-02
 EPS2
+       .........  2.59E-02

 OMEGA - CORR MATRIX FOR RANDOM EFFECTS - ETAS  *******
            ETA1      ETA2      ETA3      ETA4      ETA5      ETA6      ETA7      ETA8
 ETA1
+        6.74E-02
 ETA2
+       .........  2.76E-01
 ETA3
+       ......... .........  5.36E-02
 ETA4
+       ......... ......... ......... .........
 ETA5
+       ......... ......... ......... ......... .........
 ETA6
+       ......... ......... ......... ......... ......... .........
 ETA7
+       ......... ......... ......... ......... ......... ......... .........
 ETA8
+       ......... ......... ......... ......... ......... ......... ......... .........

 SIGMA - CORR MATRIX FOR RANDOM EFFECTS - EPSILONS  ***
            EPS1      EPS2
 EPS1
+        2.31E-02
 EPS2
+       .........  3.49E-02
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
 ********************               FIRST ORDER CONDITIONAL ESTIMATION WITH INTERACTION              ********************
 ********************                      EIGENVALUES OF COR MATRIX OF ESTIMATE                     ********************

             1         2         3         4         5         6         7         8         9        10        11        12
             13        14        15
         7.71E-02  1.18E-01  1.91E-01  2.04E-01  2.29E-01  2.72E-01  3.35E-01  4.17E-01  4.76E-01  8.88E-01  9.47E-01  1.34E+00
          1.88E+00  3.24E+00  4.39E+00
 #CPUT: Total CPU Time in Seconds,     1280.004
