07/08/2014
11:56
$PROBLEM    Model CTCs + PSA + TTT
; Inhibition production CTC et PSA

; PSA en log, BQL=log(LOQ/2)

; CTC: Basic Cell life span model, sans précurseur

; Negative Binomiale model sur Obs

; 2 CMT pour PK: Chemo vs Hormo

; Ajout variable latente: TS

; Relation directe: LV*KinPSA

; Condition TS0<KinPSA/KoutPSA

; Même TS0 pour TS cmt 3 et TS retardée cmt 7

; Distrib K0 et ALAG additive

; Mat Block PK-TS-PSA + K0-ALAG

; Estim omega OVDP

; Méthode: SAEM

; Nouvelle version NM 7.3

; Utilisation gamln

; Bdd arrêté à 180 jours

; TS0 fixé à 1. TS = fraction par rapport à baseline

; IF T<LS: LVD=TS0 . IF T>LS: LVD=A(7)

; Val init run 62
$INPUT      ID TIME AMT DV CMT MDV XRT XRTT SURG SURGT BISPHO BISPHOT
            CORTICO CORTICOT KETO KETOT CHEMO CHEMOT HORMO HORMOT
            LINEC LINECT LINEH LINEHT CHEM HORM
$DATA       bdd.TS.LF.180.OK.txt IGNORE=#
$SUBROUTINE ADVAN13 TOL=9
$MODEL      NCOMP=8 COMP=(A1) ;PK chemo
            COMP=(A2) ;PK hormo
            COMP=(A3) ;TS
            COMP=(A4) ;CTC
            COMP=(A5) ;Delayed PK chemo
            COMP=(A6) ;Delayed PK hormo
            COMP=(A7) ;Delayed TS
            COMP=(A8) ;PSA
$PK  CALLFL=-2   ; Call the PK subroutine with every event record, with additional and lagged doses
MU_1=LOG(THETA(1))
TS0=EXP(MU_1+ETA(1))      ; TS0 du comp 3

MU_2=LOG(THETA(2))
K1=EXP(MU_2+ETA(2))      ; Param PK Chemo

MU_3=LOG(THETA(3))
K2=EXP(MU_3+ETA(3))      ; Param PK Hormo

MU_4=LOG(THETA(4))
Q501=EXP(MU_4+ETA(4))      ; Param PK Chemo

MU_5=LOG(THETA(5))
Q502=EXP(MU_5+ETA(5))      ; Param PK Hormo

MU_6=LOG(THETA(6))
KOUTTS=EXP(MU_6+ETA(6))      ; Param TS

MU_7=THETA(7)
TH=EXP(MU_7+ETA(7))
KINTS=(TS0*KOUTTS)/((TH)/(1+(TH)))    ; Param TS

MU_8=LOG(THETA(8))
KINPSA=EXP(MU_8+ETA(8))

MU_9=LOG(THETA(9))
KOUTPSA=EXP(MU_9+ETA(9))

MU_10=LOG(THETA(10))
PSA0=EXP(MU_10+ETA(10))

MU_11=THETA(11)
K0=MU_11+ETA(11)    ; Zero-order production rate

MU_12=THETA(12)
ALAG5=MU_12+ETA(12)      ; TR: Delay duration, ALAGn: n is the compartment number to which the parameter applies. --> To calculate A(t-TR)
ALAG6=ALAG5
ALAG7=ALAG5

F4=K0*ALAG5              ; initial condition : R0=K0*TR . Bioaivalability for central compartment

MU_13=LOG(THETA(13))
OVDP=EXP(MU_13+ETA(13))      ; TR: Delay duration, ALAGn: n is the compartment number to which the parameter applies. --> To calculate A(t-TR)

MU_14=LOG(THETA(14))
W1=EXP(MU_14+ETA(14))      ; ecart type

A_0(1)=0
A_0(2)=0
A_0(3)=TS0
A_0(5)=0
A_0(6)=0
A_0(7)=TS0
A_0(8)=PSA0

$DES
DADT(1)=-K1*A(1)          ;time course of Chemo amount
DADT(2)=-K2*A(2)          ;time course of Hormo amount

DADT(3)=KINTS*(1-(A(1)/(Q501+A(1))))*(1-(A(2)/(Q502+A(2))))-KOUTTS*A(3)       ; Dynamic tumor size, latent variable

DADT(5)=-K1*A(5)           ; delayed time course of Chemo amount
DADT(6)=-K2*A(6)           ; delayed time course of Hormo amount

DADT(7)=KINTS*(1-(A(5)/(Q501+A(5))))*(1-(A(6)/(Q502+A(6))))-KOUTTS*A(7)        ; Delayed Dynamic tumor size, latent variable
A7=TS0
IF(T.GT.ALAG5) A7=A(7)

DADT(4)=K0*A(3)-K0*A7    ; time course of nber of cells
DADT(8)=KINPSA*A(3)-KOUTPSA*A(8)

$ERROR

NCTC=A(4)*0.0015       ; CTC in aliquots (alpha: facteur d'echelle)

PSA=A(8)
IF (PSA.LT.0.00001) PSA = 0.00001

CT=DV
IF(CT.LT.0) CT=0.00001

;Approximation of the factorial (log scale)
;LFAC=CT*LOG(CT)-CT+LOG(CT*(1+4*CT*(1+2*CT)))/6+LOG(3.1415)/2
;IF(CT.LE.1) LFAC=0
LFAC=GAMLN(CT+1.)

;gamma functions of the negative binomial model expression
;LGAM1=LOG(SQRT(2*3.1415))+((CT+1/OVDP)-0.5)*LOG((CT+1/OVDP))-(CT+1/OVDP)+LOG(1+1/(12*(CT+1/OVDP)))
;LGAM2=LOG(SQRT(2*3.1415))+((1/OVDP)-0.5)*LOG((1/OVDP))-(1/OVDP)+LOG(1+1/(12*(1/OVDP)))

LGAM1=GAMLN(CT+1/OVDP)
LGAM2=GAMLN(1/OVDP)

LTRM1=(LOG(1/(1+OVDP*NCTC)))*(1/OVDP)
LTRM2=(LOG(NCTC/(NCTC+1/OVDP)))*(CT)

;Logarithm of the Negative Binomial distribution
LNB = LGAM1-LFAC-LGAM2+LTRM1+LTRM2  ;Ln(negative binomial)

IF (CMT.EQ.4) THEN
F_FLAG=2
;-2 Log Likelihood
Y=-2*LNB
ENDIF

IF (CMT.EQ.8) THEN
F_FLAG=0
IPRED=LOG(PSA)
Y=IPRED+W1*ERR(1)          ;   w1: ecart type err. ERR: va --> chgt ecart type=W1
IRES=DV-IPRED
IWRES=IRES/W1
ENDIF

IF (ABS(ETA(1)).GT.50) EXIT 1 1
IF (ABS(ETA(2)).GT.50) EXIT 1 2
IF (ABS(ETA(3)).GT.50) EXIT 1 3
IF (ABS(ETA(4)).GT.50) EXIT 1 4
IF (ABS(ETA(5)).GT.50) EXIT 1 5
IF (ABS(ETA(6)).GT.50) EXIT 1 6
IF (ABS(ETA(7)).GT.50) EXIT 1 7
IF (ABS(ETA(8)).GT.50) EXIT 1 8
IF (ABS(ETA(9)).GT.50) EXIT 1 9
IF (ABS(ETA(10)).GT.50) EXIT 1 10
IF (ABS(ETA(11)).GT.100) EXIT 1 11  ;100
IF (ABS(ETA(12)).GT.20) EXIT 1 12   ;20
IF (ABS(ETA(13)).GT.50) EXIT 1 13

A1=A(1)
A2=A(2)
TS=A(3)
A5=A(5)
A6=A(6)
TSD=A(7)
TS=A(3)

$THETA  1 FIX ; 1: TS0
 (0,0.5) ; 2 : K1 chemo                        0.5
 (0,0.5) ; 3: K2  hormo                       0.5
 (0,0.0001) ; 4: Q501 chemo                 0.0001
 (0,0.006) ; 5: Q502 hormo                    0.001
 (0,0.004) ; 6: KOUTTS                        0.007
 6 ; 7: KINTS                                7
 (0,3) ; 8: KinPSA                              1
 (0,0.008) ; 9: KOUTPSA                      0.009
 (0,150) ; 10: PSA0                         150
 (0,300) ; 11 K0                            330
 (0,50) ; 12: ALAG5                         40
 (0,3) ; 13: OVDP                            3
 (0,0.3) ; 14: W1                            0.3
$OMEGA  0.0000001  FIX  ;     1: TS0
$OMEGA  BLOCK(9)
 0.5  ;  2 : OM K1
 0.01 0.5  ;   3: OM K2
 0.01 0.01 0.5  ; 4: OM Q501
 0.01 0.01 0.01 0.5  ; 5: OM Q502
 0.01 0.01 0.01 0.01 0.5  ; 6: OM KOUTTS
 0.01 0.01 0.01 0.01 0.01 0.5  ; 7: OM KINTS
 0.01 0.01 0.01 0.01 0.01 0.01 0.5  ; 8: OM KINPSA
 0.01 0.01 0.01 0.01 0.01 0.01 0.01 0.5  ; 9: OM KOUTPSA
 0.01 0.01 0.01 0.01 0.01 0.01 0.01 0.01 0.5  ; 10: OM PSA0
$OMEGA  BLOCK(2)
 10  ;     11: K0
 1 10  ;     12: LS
$OMEGA  0.5  ; 13: OM OVDP
$OMEGA  0.0000001  FIX
$SIGMA  1  FIX  ;       ERR1
; ISAMPLE=5 NSIG=3,9 . CTYPE=3
$ESTIMATION METHOD=SAEM LAPLACE INTER NUMERICAL SLOW NOHABORT
            NBURN=3000 NITER=1500 PRINT=1 NSIG=3 SIGL=9
            GRD=DDDDDDDDDDDDDS MSFO=msf76 CTYPE=3
;$ESTIMATION METHOD=SAEM LAPLACE INTER NUMERICAL SLOW NOABORT NBURN=0 NITER=0 PRINT=1 NSIG=3 SIGL=6 GRD=DDDDDDDDDDDDDS MSFO=msf31

;$ESTIMATION METHOD=IMP INTER LAPLACE NUMERICAL SLOW NITER=5 EONLY=1

;$ESTIMATION METHOD=COND INTER LAPLACE NUMERICAL SLOW NOABORT MAXEVAL=0 GRD=DDDDDDDDDDDDDS

;$COV UNCONDITIONAL ;MATRIX=S

;$TABLE ID TIME AMT DV CMT IPRED PRED LGAM1 LGAM2 LTRM1 LTRM2 LNB OVDP NCTC NOPRINT ONEHEADER FILE=tab31
$TABLE      ID TIME AMT DV CMT IPRED PRED IWRES CWRES NPDE MDV NOPRINT
            ONEHEADER FILE=sdtab76
$TABLE      ID TIME K1 K2 Q501 Q502 KINTS KOUTTS K0 ALAG5 OVDP TS0
            KINPSA KOUTPSA PSA0 ETA1 ETA2 ETA3 ETA4 ETA5 ETA6 ETA7
            ETA8 ETA9 ETA10 ETA11 ETA12 ETA13 NOPRINT ONEHEADER
            FILE=patab76
$TABLE      ID TIME A1 A2 A5 A6 TS TSD Q501 Q502 NOPRINT ONEHEADER
            FILE=tab76

NM-TRAN MESSAGES
 WARNINGS AND ERRORS (IF ANY) FOR PROBLEM    1
 (WARNING  2) NM-TRAN INFERS THAT THE DATA ARE POPULATION.
 (WARNING  3) THERE MAY BE AN ERROR IN THE ABBREVIATED CODE. THE FOLLOWING
 ONE OR MORE RANDOM VARIABLES ARE DEFINED WITH "IF" STATEMENTS THAT DO NOT
 PROVIDE DEFINITIONS FOR BOTH THE "THEN" AND "ELSE" CASES. IF ALL
 CONDITIONS FAIL, THE VALUES OF THESE VARIABLES WILL BE ZERO.
   IPRED IRES IWRES Y
 (WARNING  118) THE DERIVATIVE OF THE LOG GAMMA OF A RANDOM VARIABLE IS
 BEING COMPUTED. IF THE FUNCTION VALUE AFFECTS THE VALUE OF THE OBJECTIVE
 FUNCTION, THE USER SHOULD ENSURE THAT THE RANDOM VARIABLE IS ALWAYS
 POSITIVE

1NONLINEAR MIXED EFFECTS MODEL PROGRAM (NONMEM) VERSION 7.3.0
 ORIGINALLY DEVELOPED BY STUART BEAL, LEWIS SHEINER, AND ALISON BOECKMANN
 CURRENT DEVELOPERS ARE ROBERT BAUER, ICON DEVELOPMENT SOLUTIONS,
 AND ALISON BOECKMANN. IMPLEMENTATION, EFFICIENCY, AND STANDARDIZATION
 PERFORMED BY NOUS INFOSYSTEMS.
 PROBLEM NO.:         1
 Model CTCs + PSA + TTT
 TOT. NO. OF OBS RECS:     1847
 TOT. NO. OF INDIVIDUALS:    223
 GENERAL NONLINEAR KINETICS MODEL USING LSODA (ADVAN13)
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 #TBLN:      1
 #METH: Stochastic Approximation Expectation-Maximization
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
 #TERM:
 STOCHASTIC PORTION WAS COMPLETED
 REDUCED STOCHASTIC PORTION WAS COMPLETED

 ETABAR IS THE ARITHMETIC MEAN OF THE ETA-ESTIMATES,
 AND THE P-VALUE IS GIVEN FOR THE NULL HYPOTHESIS THAT THE TRUE MEAN IS 0.

 ETABAR:        -3.7304E-07 -1.7818E-05  1.5994E-05 -3.9217E-05  6.1125E-07 -6.1002E-05 -1.3248E-05  1.2435E-05  1.6091E-05 -2.3045E-09
                 1.6370E-03  3.5627E-04 -7.4755E-07  1.1575E-09
 SE:             6.0847E-07  2.0897E-02  4.4671E-02  1.0675E-01  7.9637E-02  1.9422E-01  4.3478E-02  1.0099E-01  6.5460E-02  1.0204E-01
                 1.0472E+00  2.1762E-01  8.3442E-02  5.7252E-07
 N:                     223         223         223         223         223         223         223         223         223         223
                        223         223         223         223

 P VAL.:         5.3982E-01  9.9932E-01  9.9971E-01  9.9971E-01  9.9999E-01  9.9975E-01  9.9976E-01  9.9990E-01  9.9980E-01  1.0000E+00
                 9.9875E-01  9.9869E-01  9.9999E-01  9.9839E-01

 ETAshrink(%):   9.7120E+01  6.3219E+01  5.0630E+01  2.6729E+01  2.9310E+01  3.5974E+01  2.6588E+01  6.3009E+00  2.0715E+01  1.3896E+00
                 5.8621E+01  5.8618E+01  1.6684E+01  9.7290E+01
 EBVshrink(%):   9.1849E+01  6.3226E+01  5.0634E+01  2.6730E+01  2.9313E+01  3.5975E+01  2.6587E+01  6.3023E+00  2.0716E+01  1.3893E+00
                 5.8624E+01  5.8621E+01  1.6685E+01  9.3045E+01
 EPSshrink(%):   1.0000E-10


 #TERE:
 Elapsed estimation time in seconds: 27564.75

 ********************                STOCHASTIC APPROXIMATION EXPECTATION-MAXIMIZATION               ********************
 #OBJT:**************                        FINAL VALUE OF LIKELIHOOD FUNCTION                      ********************
 #OBJV:********************************************    -3783.500       **************************************************

 ********************                STOCHASTIC APPROXIMATION EXPECTATION-MAXIMIZATION               ********************
 ********************                             FINAL PARAMETER ESTIMATE                           ********************

 THETA - VECTOR OF FIXED EFFECTS PARAMETERS   *********
         TH 1      TH 2      TH 3      TH 4      TH 5      TH 6      TH 7      TH 8      TH 9      TH10      TH11      TH12
          TH13      TH14
         1.00E+00  2.48E-01  4.49E-01  2.61E-04  3.97E-03  5.13E-03  6.33E+00  1.40E+00  8.13E-03  1.53E+02  3.08E+02  5.77E+01
          4.89E+00  3.00E-01

 OMEGA - COV MATRIX FOR RANDOM EFFECTS - ETAS  ********
            ETA1      ETA2      ETA3      ETA4      ETA5      ETA6      ETA7      ETA8      ETA9      ET10      ET11      ET12
             ET13      ET14
 ETA1
+        1.00E-07
 ETA2
+        0.00E+00  7.23E-01
 ETA3
+        0.00E+00 -6.98E-01  1.83E+00
 ETA4
+        0.00E+00 -6.38E-01 -6.34E-01  4.76E+00
 ETA5
+        0.00E+00 -7.99E-01 -2.28E-01  2.93E+00  2.84E+00
 ETA6
+        0.00E+00  3.51E-01  2.25E+00 -2.65E+00 -4.24E+00  2.06E+01
 ETA7
+        0.00E+00  2.37E-01  4.00E-02 -7.51E-01 -9.54E-01  3.43E+00  7.86E-01
 ETA8
+        0.00E+00  1.31E-01  9.74E-01 -1.81E+00 -1.45E+00 -6.04E-01 -9.75E-02  2.60E+00
 ETA9
+        0.00E+00  3.12E-01  4.51E-02 -2.29E+00 -1.16E+00  1.84E+00  5.78E-01  9.67E-02  1.53E+00
 ET10
+        0.00E+00  1.15E-01  6.93E-01 -1.31E+00 -1.25E+00 -3.02E-01  1.53E-01  2.30E+00  3.48E-02  2.40E+00
 ET11
+        0.00E+00  0.00E+00  0.00E+00  0.00E+00  0.00E+00  0.00E+00  0.00E+00  0.00E+00  0.00E+00  0.00E+00  1.43E+03
 ET12
+        0.00E+00  0.00E+00  0.00E+00  0.00E+00  0.00E+00  0.00E+00  0.00E+00  0.00E+00  0.00E+00  0.00E+00  2.94E+02  6.19E+01
 ET13
+        0.00E+00  0.00E+00  0.00E+00  0.00E+00  0.00E+00  0.00E+00  0.00E+00  0.00E+00  0.00E+00  0.00E+00  0.00E+00  0.00E+00
          2.25E+00
 ET14
+        0.00E+00  0.00E+00  0.00E+00  0.00E+00  0.00E+00  0.00E+00  0.00E+00  0.00E+00  0.00E+00  0.00E+00  0.00E+00  0.00E+00
          0.00E+00  1.00E-07

 SIGMA - COV MATRIX FOR RANDOM EFFECTS - EPSILONS  ****
            EPS1
 EPS1
+        1.00E+00

 OMEGA - CORR MATRIX FOR RANDOM EFFECTS - ETAS  *******
            ETA1      ETA2      ETA3      ETA4      ETA5      ETA6      ETA7      ETA8      ETA9      ET10      ET11      ET12
             ET13      ET14
 ETA1
+        3.16E-04
 ETA2
+        0.00E+00  8.50E-01
 ETA3
+        0.00E+00 -6.06E-01  1.35E+00
 ETA4
+        0.00E+00 -3.44E-01 -2.15E-01  2.18E+00
 ETA5
+        0.00E+00 -5.58E-01 -9.99E-02  7.98E-01  1.69E+00
 ETA6
+        0.00E+00  9.10E-02  3.67E-01 -2.67E-01 -5.53E-01  4.54E+00
 ETA7
+        0.00E+00  3.15E-01  3.33E-02 -3.88E-01 -6.39E-01  8.53E-01  8.86E-01
 ETA8
+        0.00E+00  9.58E-02  4.46E-01 -5.14E-01 -5.34E-01 -8.24E-02 -6.82E-02  1.61E+00
 ETA9
+        0.00E+00  2.97E-01  2.70E-02 -8.51E-01 -5.55E-01  3.28E-01  5.27E-01  4.85E-02  1.24E+00
 ET10
+        0.00E+00  8.74E-02  3.30E-01 -3.88E-01 -4.79E-01 -4.29E-02  1.11E-01  9.20E-01  1.82E-02  1.55E+00
 ET11
+        0.00E+00  0.00E+00  0.00E+00  0.00E+00  0.00E+00  0.00E+00  0.00E+00  0.00E+00  0.00E+00  0.00E+00  3.79E+01
 ET12
+        0.00E+00  0.00E+00  0.00E+00  0.00E+00  0.00E+00  0.00E+00  0.00E+00  0.00E+00  0.00E+00  0.00E+00  9.87E-01  7.87E+00
 ET13
+        0.00E+00  0.00E+00  0.00E+00  0.00E+00  0.00E+00  0.00E+00  0.00E+00  0.00E+00  0.00E+00  0.00E+00  0.00E+00  0.00E+00
          1.50E+00
 ET14
+        0.00E+00  0.00E+00  0.00E+00  0.00E+00  0.00E+00  0.00E+00  0.00E+00  0.00E+00  0.00E+00  0.00E+00  0.00E+00  0.00E+00
          0.00E+00  3.16E-04

 SIGMA - CORR MATRIX FOR RANDOM EFFECTS - EPSILONS  ***
            EPS1
 EPS1
+        1.00E+00
 #CPUT: Total CPU Time in Seconds,    30653.369
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