;Rerun of final model excluding all data below 0.1
;Based on run32112 and run32140
;one transit compartment (or two consecutive absorption compartments)
;allometric body weigth, HIV on F
;IIV on CL, KA, MTT, IOV on CL
;Same inits as those used in run32112
$PROBLEM    EMB (log) - two compartments,IIV lag time and V3
$ABBREVIATED COMRES=11
$INPUT      ID STID=DROP DAY=DROP RATE=DROP OT1=DROP OT2=DROP TIME ODV
            DV MDV AMT ADDL II EVID AGE SEX=DROP WT HT=DROP BMI=DROP
            RACE SMOK=DROP ALC=DROP DPKG=DROP HIV HB=DROP HCT=DROP
            RBC=DROP MCV=DROP WBC=DROP AP=DROP LNAP ALT=DROP AST=DROP
            CRT=DROP TBIL=DROP UREA=DROP FDC LOC CLCR=DROP BSA=DROP
            INHP=DROP PZAP=DROP CLC2=DROP OCC DOS=DROP NDOS=DROP
            DTIM=DROP TAD=DROP TAD2
$DATA       emb10dosforscmtadMinusLOQ.csv IGNORE=@
$SUBROUTINE ADVAN5 TRANS1
$MODEL      NCOMP=4 COMP=(TRANSIT) COMP=(ABS) COMP=(CENTRAL)
            COMP=(PERIPH)
$INFN
IF (ICALL.EQ.3) THEN
  OPEN(50,FILE='cwtab32150.est')
  WRITE (50,*) 'ETAS'
  DO WHILE(DATA)
    IF (NEWIND.LE.1) WRITE (50,*) ETA
  ENDDO
  WRITE (50,*) 'THETAS'
  WRITE (50,*) THETA
  WRITE (50,*) 'OMEGAS'
  WRITE (50,*) OMEGA(BLOCK)
  WRITE (50,*) 'SIGMAS'
  WRITE (50,*) SIGMA(BLOCK)
ENDIF
$OMEGA  0.040800  ;        1CL
 0  FIX  ;        2V2
 0.366000  ;        3KA
 0  FIX  ;        4V3
 0  FIX  ;         5Q
 0.702000  ;       6MTT
$OMEGA  BLOCK(1)
 0.203000  ;    7IOV-CL
$OMEGA  BLOCK(1) SAME

$OMEGA  BLOCK(1) SAME

$OMEGA  BLOCK(1) SAME

$PK

    OC1   = 0
    OC2   = 0
    OC3   = 0
    OC4   = 0

    IF(OCC.EQ.1) OC1 = 1
    IF(OCC.EQ.2) OC2 = 1
    IF(OCC.EQ.3) OC3 = 1
    IF(OCC.EQ.4) OC4 = 1

    TVCL  = THETA(1)*(WT/50)**0.75
    TVV2  = THETA(2)*(WT/50)**1
    TVKA  = THETA(3)
    TVV3  = THETA(6)*(WT/50)**1
    TVQ   = THETA(7)*(WT/50)**0.75
    TVMTT = THETA(8)

    FCOV = 1
    IF(HIV.EQ.1) FCOV = 1 + THETA(9)

    CL    = TVCL*EXP(ETA(1)+OC1*ETA(7)+OC2*ETA(8)+OC3*ETA(9)+OC4*ETA(10))
    V2    = TVV2*EXP(ETA(2))
    KA    = TVKA*EXP(ETA(3))
    V3    = TVV3*EXP(ETA(4))
    Q     = TVQ*EXP(ETA(5))
    F1    = 1*FCOV
    MTT = TVMTT * EXP(ETA(6))
    KTR = 1/MTT

  K12 = KTR
  K23 = KA
  K34 = Q/V2
  K43 = Q/V3
  K30 = CL/V2

  S3 = V2

$ERROR
 (ONLY OBSERVATIONS)
    IF (F.EQ.0) THEN
      IPRED = 0
    ELSE
      IPRED = LOG(F)
    ENDIF
    IRES = DV - IPRED
    W = SQRT(THETA(4)**2 + (THETA(5)/(F+.0001))**2)
    IF (W.EQ.0) W = 1
    IWRES = IRES / W
    Y = IPRED + W * EPS(1)

"LAST
"  COM(1)=G(1,1)
"  COM(2)=G(2,1)
"  COM(3)=G(3,1)
"  COM(4)=G(4,1)
"  COM(5)=G(5,1)
"  COM(6)=G(6,1)
"  COM(7)=G(7,1)
"  COM(8)=G(8,1)
"  COM(9)=G(9,1)
"  COM(10)=G(10,1)
"  COM(11)=HH(1,1)
$THETA  (0,40.90000) ; 1CL
 (0,139.0000) ; 2V
 (0,0.505000) ; 3KA
 (0,0.314000) ; 4Prop error
 (0,0.120000) ; 5Add error
 (0,1110.000) ; 6V3

 (0,28.50000) ; 7Q

 (0,0.359000) ; 8MTT

 (-1,-0.15500) ; 9FCOV
$SIGMA  1  FIX
;$NONP
$ESTIMATION METHOD=1 INTER NOABORT PRINT=2 MAXEVAL=9999 MSFO=msfb32150
$COVARIANCE
$TABLE      ID TIME TAD2 IPRED IWRES LOC HIV NOPRINT ONEHEADER
            FILE=sdtab32150
$TABLE      ID CL KA MTT NOPRINT ONEHEADER FILE=patab32150
$TABLE      ID COM(1)=G11 COM(2)=G21 COM(3)=G31 COM(4)=G41 COM(5)=G51
            COM(6)=G61 COM(7)=G71 COM(8)=G81 COM(9)=G91 COM(10)=G101
            COM(11)=H11 IPRED DV MDV NOPRINT ONEHEADER
            FILE=cwtab32150.deriv
$TABLE      ID ETA1 ETA2 ETA3 ETA4 ETA5 ETA6 ETA7 ETA8 ETA9 ETA10
            FILE=prob_1.psn_etas NOAPPEND ONEHEADER NOPRINT FIRSTONLY
$TABLE      ID IWRES EVID FILE=prob_1.psn_wres NOAPPEND ONEHEADER
            NOPRINT

1NONLINEAR MIXED EFFECTS MODEL PROGRAM (NONMEM)    DOUBLE PRECISION NONMEM    VERSION VI LEVEL 2.0
 DEVELOPED AND PROGRAMMED BY STUART BEAL AND LEWIS SHEINER
 PROBLEM NO.:         1
 EMB (log) - two compartments,IIV lag time and V3
 TOT. NO. OF OBS RECS:     1869
 TOT. NO. OF INDIVIDUALS:    189
 GENERAL LINEAR KINETICS MODEL (ADVAN5)
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
0MINIMIZATION SUCCESSFUL
 HOWEVER, PROBLEMS OCCURRED WITH THE MINIMIZATION.
 REGARD THE RESULTS OF THE ESTIMATION STEP CAREFULLY, AND ACCEPT THEM ONLY
 AFTER CHECKING THAT THE COVARIANCE STEP PRODUCES REASONABLE OUTPUT.
 NO. OF FUNCTION EVALUATIONS USED:     3498
 NO. OF SIG. DIGITS IN FINAL EST.:  3.1

 ETABAR IS THE ARITHMETIC MEAN OF THE ETA-ESTIMATES,
 AND THE P-VALUE IS GIVEN FOR THE NULL HYPOTHESIS THAT THE TRUE MEAN IS 0.

 ETABAR:   0.29E-02  0.00E+00  0.25E-01  0.00E+00  0.00E+00  0.45E-01  0.74E-02  0.64E-02 -0.80E-02  0.40E-02
 SE:       0.72E-02  0.00E+00  0.17E-01  0.00E+00  0.00E+00  0.53E-01  0.18E-01  0.14E-01  0.98E-02  0.56E-02

 P VAL.:   0.69E+00  0.10E+01  0.13E+00  0.10E+01  0.10E+01  0.39E+00  0.69E+00  0.65E+00  0.41E+00  0.48E+00

 ********************                           MINIMUM VALUE OF OBJECTIVE FUNCTION                  ********************

 **************************************************      -1255.220     **************************************************

 ********************                                  FINAL PARAMETER ESTIMATE                      ********************

 THETA - VECTOR OF FIXED EFFECTS PARAMETERS   *********
            TH 1      TH 2      TH 3      TH 4      TH 5      TH 6      TH 7      TH 8      TH 9
         3.99E+01  8.24E+01  4.74E-01  3.18E-01  1.07E-01  6.23E+02  3.43E+01  7.89E-01 -1.54E-01

 OMEGA - COV MATRIX FOR RANDOM EFFECTS - ETAS  ********
            ETA1      ETA2      ETA3      ETA4      ETA5      ETA6      ETA7      ETA8      ETA9      ET10
 ETA1
+        3.81E-02
 ETA2
+        0.00E+00  0.00E+00
 ETA3
+        0.00E+00  0.00E+00  1.53E-01
 ETA4
+        0.00E+00  0.00E+00  0.00E+00  0.00E+00
 ETA5
+        0.00E+00  0.00E+00  0.00E+00  0.00E+00  0.00E+00
 ETA6
+        0.00E+00  0.00E+00  0.00E+00  0.00E+00  0.00E+00  8.62E-01
 ETA7
+        0.00E+00  0.00E+00  0.00E+00  0.00E+00  0.00E+00  0.00E+00  1.27E-01
 ETA8
+        0.00E+00  0.00E+00  0.00E+00  0.00E+00  0.00E+00  0.00E+00  0.00E+00  1.27E-01
 ETA9
+        0.00E+00  0.00E+00  0.00E+00  0.00E+00  0.00E+00  0.00E+00  0.00E+00  0.00E+00  1.27E-01
 ET10
+        0.00E+00  0.00E+00  0.00E+00  0.00E+00  0.00E+00  0.00E+00  0.00E+00  0.00E+00  0.00E+00  1.27E-01

 SIGMA - COV MATRIX FOR RANDOM EFFECTS - EPSILONS  ****
            EPS1
 EPS1
+        1.00E+00

 ********************                             STANDARD ERROR OF ESTIMATE                         ********************

 THETA - VECTOR OF FIXED EFFECTS PARAMETERS   *********
            TH 1      TH 2      TH 3      TH 4      TH 5      TH 6      TH 7      TH 8      TH 9
         1.24E+00  3.42E+01  1.13E-01  1.41E-02  2.19E-02  1.37E+02  3.59E+00  1.36E-01  6.17E-02

 OMEGA - COV MATRIX FOR RANDOM EFFECTS - ETAS  ********
            ETA1      ETA2      ETA3      ETA4      ETA5      ETA6      ETA7      ETA8      ETA9      ET10
 ETA1
+        2.17E-02
 ETA2
+       ......... .........
 ETA3
+       ......... .........  1.22E-01
 ETA4
+       ......... ......... ......... .........
 ETA5
+       ......... ......... ......... ......... .........
 ETA6
+       ......... ......... ......... ......... .........  1.69E-01
 ETA7
+       ......... ......... ......... ......... ......... .........  5.70E-02
 ETA8
+       ......... ......... ......... ......... ......... ......... ......... .........
 ETA9
+       ......... ......... ......... ......... ......... ......... ......... ......... .........
 ET10
+       ......... ......... ......... ......... ......... ......... ......... ......... ......... .........

 SIGMA - COV MATRIX FOR RANDOM EFFECTS - EPSILONS  ****
            EPS1
 EPS1
+       .........
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