08/09/2017
12:24
;; 1. Based on: run1
;; 2. Description: morphine PK in children < 3 years
;; x1. Author: user
$PROBLEM    morphine PK in children < 3 years
$INPUT      ID TIME AMT RATE DV MDV CMT BWS PNA SGA STUDY NKOD
$DATA      Combined_InternalExternalData.csv IGNORE=@

; TIME in minutes

; AMT in micrograms

; DV log-transformed (natural logarithm) in micrograms per liter

; CMT 1 = morphine, 2 = M3G, 3 = M6G

; BWS bodyweight in grams at time of study

; PNA postnatal age in days

; SGA small for gestational age 1 = yes, 0 = no

; NKOD for extra additive error on 24 hr post-infusion sample in study of Nancy
$SUBROUTINE ADVAN5
$MODEL      COMP (CENTRAL,DEFDOSE) COMP=(2) ;M3G
            COMP=(3) ;M6G
            COMP (PERIPH) ;Peripheral cmt for parent
$PK
CL2=(THETA(1)*(BWS*0.001)**THETA(4))*EXP(ETA(1))                  ;parent to M3G (CMT2)
IF (PNA.GT.10) CL2=(THETA(10)*(BWS*0.001)**THETA(4))*EXP(ETA(1))
CL2N=(THETA(1)*(BWS*0.001)**THETA(4))
CL2P=(THETA(10)*(BWS*0.001)**THETA(4))

V1 =(THETA(2)*(BWS*0.001)**THETA(5))*EXP(ETA(2))                  ;V1 parent (CMT1)
V1P=(THETA(2)*(BWS*0.001)**THETA(5))
Q  = THETA(3)                                                     ;parent CMT1 to CMT4

CL3=(THETA(6)*(BWS*0.001)**THETA(4))                              ;parent to M6G (CMT3)
IF (PNA.GT.10) CL3=(THETA(11)*(BWS*0.001)**THETA(4))
CL3N=(THETA(6)*(BWS*0.001)**THETA(4))
CL3P=(THETA(11)*(BWS*0.001)**THETA(4))

CL4= (THETA(7)*(BWS*0.001)**THETA(4))*EXP(ETA(4))                 ;excretion M3G
CL5= (THETA(9)*(BWS*0.001)**THETA(4))*EXP(ETA(3))                 ;excretion M6G

V2 = V1*THETA(8)                                                  ;V M3G
V3 = V2                                                           ;V M6G
V4 = V1                                                           ;V parent peripheral

K12=CL2/V1
K13=CL3/V1
K20=CL4/V2
K30=CL5/V3
K14=Q/V1
K41=Q/V4

S1=V1
S2=V2
S3=V3

ET1=ETA(1)
ET2=ETA(2)
ET3=ETA(3)
ET4=ETA(4)

$ERROR
COM1=0
IF (CMT.EQ.1) COM1=1
COM2=0
IF (CMT.EQ.2) COM2=1
COM3=0
IF (CMT.EQ.3) COM3=1

TEH=0
IF (TIME.GT.1900.AND.NKOD.EQ.1) TEH = 1
IF (TIME.GT.1900.AND.NKOD.EQ.2) TEH = 1

IPRE=LOG(0.000001)
IF (F.GT.0) IPRE = LOG(F)
Y1=IPRE+ERR(1)+TEH*ERR(4)
Y2=IPRE+ERR(2)+TEH*ERR(4)
Y3=IPRE+ERR(3)+TEH*ERR(4)
Y=COM1*Y1+COM2*Y2+COM3*Y3
LIPR=F
IWRE=0
IF (IPRE.GT.0) IWRE=(DV-IPRE)/IPRE

$THETA  (0,0.003) ; TH1 CL2 <10days
 (0,2) ; TH2 V1
 (0,0.029) ; TH3 Q
 (0,1.5) ; TH4 exponent BW on CL
 1 FIX ; TH5 exponent BW on V
 (0,0.0004) ; TH6 CL3 <10 days
 (0,0.002) ; TH7 CL4
 (0,0.12) ; TH8 V3 and V4 (fraction of V1)
 (0,0.001) ; TH9 CL5
 (0,0.008) ; TH10 CL2 >10days
 (0,0.0007) ; TH11 CL3 >10days
$OMEGA  0.1  ;    OM1 CL2
 0.2  ;     OM2 V1
$OMEGA  BLOCK(2)
 0.15  ;    OM4 CL5
 0.14 0.25  ;    OM5 CL4
$SIGMA  0.4  ; SIG1 prop M
 0.2  ; SIG2 prop M3G
 0.1  ; SIG3 prop M6G
 10  ; SIG4 additive 24 hrs post infusion
$ESTIMATION NOABORT PRINT=5 MAXEVAL=9999 METHOD=0 POSTHOC
$COVARIANCE COMP
$TABLE      ID TIME AMT RATE DV MDV CMT BWS PNA SGA CL2N CL2P CL3N
            CL3P CL4 CL5 V1 V2 V3 V4 Q ET1 ET2 ET3 ET4 NOAPPEND
            NOPRINT ONEHEADER FILE=sdtab4

NM-TRAN MESSAGES
 WARNINGS AND ERRORS (IF ANY) FOR PROBLEM    1
 (WARNING  2) NM-TRAN INFERS THAT THE DATA ARE POPULATION.

1NONLINEAR MIXED EFFECTS MODEL PROGRAM (NONMEM) VERSION 7.3.0
 ORIGINALLY DEVELOPED BY STUART BEAL, LEWIS SHEINER, AND ALISON BOECKMANN
 CURRENT DEVELOPERS ARE ROBERT BAUER, ICON DEVELOPMENT SOLUTIONS,
 AND ALISON BOECKMANN. IMPLEMENTATION, EFFICIENCY, AND STANDARDIZATION
 PERFORMED BY NOUS INFOSYSTEMS.
 PROBLEM NO.:         1
 morphine PK in children < 3 years
 TOT. NO. OF OBS RECS:     2809
 TOT. NO. OF INDIVIDUALS:    338
 GENERAL LINEAR KINETICS MODEL (ADVAN5)
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 #TBLN:      1
 #METH: First Order
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
 #TERM:
0MINIMIZATION SUCCESSFUL
 NO. OF FUNCTION EVALUATIONS USED:      488
 NO. OF SIG. DIGITS IN FINAL EST.:  3.0

 #TERE:
 Elapsed estimation time in seconds:   250.43
 Elapsed covariance time in seconds:   252.39

 ********************                                   FIRST ORDER                                  ********************
 #OBJT:**************                       MINIMUM VALUE OF OBJECTIVE FUNCTION                      ********************
 #OBJV:********************************************      -64.321       **************************************************

 ********************                                   FIRST ORDER                                  ********************
 ********************                             FINAL PARAMETER ESTIMATE                           ********************

 THETA - VECTOR OF FIXED EFFECTS PARAMETERS   *********
         TH 1      TH 2      TH 3      TH 4      TH 5      TH 6      TH 7      TH 8      TH 9      TH10      TH11
         3.09E-03  1.99E+00  2.89E-02  1.44E+00  1.00E+00  4.08E-04  2.19E-03  1.19E-01  1.11E-03  8.25E-03  6.99E-04

 OMEGA - COV MATRIX FOR RANDOM EFFECTS - ETAS  ********
            ETA1      ETA2      ETA3      ETA4
 ETA1
+        1.04E-01
 ETA2
+        0.00E+00  2.30E-01
 ETA3
+        0.00E+00  0.00E+00  1.85E-01
 ETA4
+        0.00E+00  0.00E+00  1.78E-01  2.58E-01

 SIGMA - COV MATRIX FOR RANDOM EFFECTS - EPSILONS  ****
            EPS1      EPS2      EPS3      EPS4
 EPS1
+        3.71E-01
 EPS2
+        0.00E+00  2.06E-01
 EPS3
+        0.00E+00  0.00E+00  9.67E-02
 EPS4
+        0.00E+00  0.00E+00  0.00E+00  9.36E+00

 OMEGA - CORR MATRIX FOR RANDOM EFFECTS - ETAS  *******
            ETA1      ETA2      ETA3      ETA4
 ETA1
+        3.23E-01
 ETA2
+        0.00E+00  4.79E-01
 ETA3
+        0.00E+00  0.00E+00  4.30E-01
 ETA4
+        0.00E+00  0.00E+00  8.17E-01  5.07E-01

 SIGMA - CORR MATRIX FOR RANDOM EFFECTS - EPSILONS  ***
            EPS1      EPS2      EPS3      EPS4
 EPS1
+        6.09E-01
 EPS2
+        0.00E+00  4.54E-01
 EPS3
+        0.00E+00  0.00E+00  3.11E-01
 EPS4
+        0.00E+00  0.00E+00  0.00E+00  3.06E+00

 ********************                                   FIRST ORDER                                  ********************
 ********************                            STANDARD ERROR OF ESTIMATE                          ********************

 THETA - VECTOR OF FIXED EFFECTS PARAMETERS   *********
         TH 1      TH 2      TH 3      TH 4      TH 5      TH 6      TH 7      TH 8      TH 9      TH10      TH11
         1.59E-04  1.29E-01  4.79E-03  3.87E-02 .........  4.64E-05  1.19E-04  2.05E-02  1.28E-04  6.75E-04  8.66E-05

 OMEGA - COV MATRIX FOR RANDOM EFFECTS - ETAS  ********
            ETA1      ETA2      ETA3      ETA4
 ETA1
+        1.91E-02
 ETA2
+       .........  4.17E-02
 ETA3
+       ......... .........  2.63E-02
 ETA4
+       ......... .........  2.38E-02  4.31E-02

 SIGMA - COV MATRIX FOR RANDOM EFFECTS - EPSILONS  ****
            EPS1      EPS2      EPS3      EPS4
 EPS1
+        4.34E-02
 EPS2
+       .........  4.00E-02
 EPS3
+       ......... .........  1.16E-02
 EPS4
+       ......... ......... .........  2.83E+00

 OMEGA - CORR MATRIX FOR RANDOM EFFECTS - ETAS  *******
            ETA1      ETA2      ETA3      ETA4
 ETA1
+        2.96E-02
 ETA2
+       .........  4.35E-02
 ETA3
+       ......... .........  3.06E-02
 ETA4
+       ......... .........  8.32E-02  4.25E-02

 SIGMA - CORR MATRIX FOR RANDOM EFFECTS - EPSILONS  ***
            EPS1      EPS2      EPS3      EPS4
 EPS1
+        3.56E-02
 EPS2
+       .........  4.40E-02
 EPS3
+       ......... .........  1.87E-02
 EPS4
+       ......... ......... .........  4.63E-01
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 #CPUT: Total CPU Time in Seconds,      508.158
