Wed Oct 18 12:10:23 CEST 2017
;; 2. Description:
;;    Original model
;; 3. Label:
;;    EONLY1
;;    STUD in 1:2 only
;; 4. Structural model:
;;    2 comp PK + indirect PK with Bound compartment
;; 5. Covariate model:
;;    No covariates
;; 6. Inter-individual variability:
;;    CL, V, Q, V2, SAP10
;; 7. Inter-occasion variability:
;; 8. Residual variability:
;;    Proportional
;; 9. Estimation:
;;    IMP
$PROBLEM    BASE MODEL
;; Based on: 244
$INPUT      ID LABL=DROP AMT CHRT DV CRCL DURATION PERD RATE REGM=DROP
            TIME TRLD EVID MDV CMT STUD AMLOAD SEX AMLIVER ORD
$DATA      INPUTforEVAL.csv IGNORE=@
$SUBROUTINE ADVAN13 TOL9
$MODEL      COMP=(PERIH1) COMP=(EFFECT) COMP=(PERIPH2) COMP=(PERIPH3)
            COMP=(SC) COMP=(COMP)
$PK

;CPHPC

MOLSAP  =   5*25000*1000                          ;; mg/mol (=Da*1000)
MOLCPH  =   340.37*1000                           ;; mg/mol (=Da*1000)

THRESH=80
IF(CRCL.GT.THRESH) THEN
CRCL2 = THRESH
ELSE
CRCL2 = CRCL
ENDIF

CRCLEFF = ( 1 + THETA(15)*(CRCL2 - THRESH))
TVCL = CRCLEFF*EXP(THETA(2))
MU_2 = LOG(TVCL)
CL = EXP(MU_2+ETA(2))

;LTVV = THETA(3)
TVV = EXP(THETA(3))
MU_3 = LOG(TVV)
V = EXP(MU_3+ETA(3))

TVQ = EXP(THETA(4))
MU_4 = LOG(TVQ)
Q = EXP(MU_4+ETA(4))

;IF(CL.LT.Q) EXIT 1 101

TVV2 = EXP(THETA(5))
MU_5 = LOG(TVV2)
V2 = EXP(MU_5+ETA(5))

TVK12 = Q/V
K12 = TVK12

TVK21 = Q/V2
K21 = TVK21

K10=CL/V

;SAP
TVV3 = V;EXP(THETA(16)) ; TVV
V3 = TVV3

;VP = 3

;V3 = VP
TVV4 = EXP(THETA(16))
MU_10 = LOG(TVV4)
V4 = EXP(MU_10+ ETA(10)) ; 12

TVSAP10 = EXP(THETA(6))
MU_6 = LOG(TVSAP10)
SAP10= EXP(MU_6+ETA(6))

TVKOUT = EXP(THETA(1))
MU_1 = LOG(TVKOUT)
KOUT = EXP(MU_1+ETA(1))

TVKON = EXP(THETA(7))
MU_7 = LOG(TVKON)
KON = EXP(MU_7+ETA(7)) ;;0.540      ;; L/h

KD = 10*10**(-9)

TVKOFF = TVKON*KD
KOFF = TVKOFF

TVKINT = THETA(8)
MU_8 = LOG(TVKINT)
KINT = EXP(MU_8+ETA(8))

TVQ4 = EXP(THETA(17))
MU_9 = LOG(TVQ4)
Q4 = EXP(MU_9+ETA(9))

TVK34 = Q4/V3
K34 = TVK34

TVK43 = Q4/V4
K43 = TVK43

KIN = KOUT*(SAP10*V3)

AM3 = SAP10/MOLSAP
AM4 = SAP10/MOLSAP

A_0(3)=AM3
A_0(4)=AM4

F1 = 1
F5 = THETA(13)

TVKSC = EXP(THETA(14))
MU_11 = LOG(TVKSC)
KSC = EXP(MU_11+ETA(11))

S1=V/(1000)
S3=1/(1000*MOLSAP)

$DES

A1=A(1)
A3=A(3)
A2=A(2)
A4=A(4)
A5=A(5)
A6=A(6)

C1 = A1/(V*MOLCPH)
C3 = A3
C3C1 = A6

C3C1_STD = C3C1*MOLCPH*V3
A1F = A1-C3C1_STD
C3F = C3-C3C1

C1F = A1F/(V*MOLCPH)

DADT1= -K10*A1F   + KSC*A5 - K12*A1F  + K21*A2 -KINT*(V*MOLCPH)*C3C1               ;; CPHPC (PLASMA) (mg)
DADT2=           K12*A1F      - K21*A2                                           ;; CPHPC (PERIPH) (mg)

DADT3=  KIN/(V3*MOLSAP)-KOUT*C3F -KINT*C3C1 + K43*A4*V4/V3  - K34*C3F               ;;  SAP PLASMA conc (mol/L)
DADT4= -K43*A4  + K34*C3F*V3/V4                                                        ;;  SAP PLASMA conc (mol/L)
DADT5=-KSC*A5
DADT6= KON*C3F*C1F - (KINT)*C3C1


DADT(1) = DADT1
DADT(2) = DADT2
DADT(3) = DADT3
DADT(4) = DADT4
DADT(5) = DADT5
DADT(6) = DADT6

$ERROR

ER1=ERR(1)
ER2=ERR(2)

IPRED = F

IF (CMT.EQ.1) THEN
W = THETA(9)
W2 = THETA(10)
Y1 = IPRED*(1+W*ER1) + W2*ER2
ELSE
W=THETA(11)
W2 = THETA(12)
Y1 = IPRED*(1+W*ER1) + W2*ER2
ENDIF

IF(IPRED.EQ.0) IPRED = 0.01
Y = Y1

IRES=DV-IPRED
IWRES = IRES/(IPRED*W)

$THETA  -3.07 ; 1. KOUT
 1.92 ; 2. CL
 2.76 ; 3. V
 0.595 ; 4. Q
 2.84 ; 5. V2
 3.37 ; 6. SAP10
 14.6 ; 7. KON
 5.71 ; 8. KINT
 (0,0.286) ; 9. PROPPK
 0 FIX ; 10. ADDPK
 (0,0.268) ; 11. PROPSAP
 0 FIX ; 12. ADDSAP
 (0,1) FIX ; 13. FSC
 0.4055 FIX ; 14. KASC
 (-1,0.0152,0.6) ; 15. CRCLCOV
 3.47 ; 16. V4
 (-20,1.49,20) ; 17. Q4
$OMEGA  0.125  ;  1. OMKOUT
 0.0474  ;    2. OMCL
 0.0836  ;     3. OMV
 0.0225  FIX  ;     4. OMQ
 0.0225  FIX  ;    5. OMV2
 0.0625  ; 6. OMSAP10
 0.0225  FIX  ;   7. OMKON
 0.0225  FIX  ;  8. OMKINT
 1.11  ;    9. OMQ4
 2.05  ;   10. OMV4
 0.0225  FIX  ;  11. OMKSC
$SIGMA  1  FIX
 1  FIX
;$EST METHOD=ITS INTER NITER=10 PRINT=1 CTYPE=1 CITER=10 GRD=DDDDDDDDSSSSDDDDD
;$EST METHOD=IMP INTER ISAMPLE=600 NITER=130 PRINT=1 CTYPE=1 CITER=10 CALPHA=0.01 GRD=DDDDDDDDSSSSDDDDD
;$EST  MAXEVAL=9999  PRINT=5 POSTHOC METHOD=0 INTERACTION MSFO=msf NOABORT SIGL=9 NSIG=3
$ESTIMATION METHOD=IMP INTER ISAMPLE=10000 NITER=5 EONLY=1
$COVARIANCE UNCONDITIONAL PRINT=E SIGL=12
$TABLE      ID CL V Q V2 KSC SAP10 KIN KOUT Q4 V4 KON KINT NOAPPEND
            NOPRINT ONEHEADER FILE=OUTPUTforEVAL.csv FORMAT=,1PE11.4f

NM-TRAN MESSAGES
 WARNINGS AND ERRORS (IF ANY) FOR PROBLEM    1
 (WARNING  2) NM-TRAN INFERS THAT THE DATA ARE POPULATION.
 (MU_WARNING 26) DATA ITEM(S) USED IN DEFINITION OF MU_(S) SHOULD BE CONSTANT FOR INDIV. REC.:
  CRCL
Note: The following floating-point exceptions are signalling: IEEE_INVALID_FLAG IEEE_DIVIDE_BY_ZERO

1NONLINEAR MIXED EFFECTS MODEL PROGRAM (NONMEM) VERSION 7.3.0
 ORIGINALLY DEVELOPED BY STUART BEAL, LEWIS SHEINER, AND ALISON BOECKMANN
 CURRENT DEVELOPERS ARE ROBERT BAUER, ICON DEVELOPMENT SOLUTIONS,
 AND ALISON BOECKMANN. IMPLEMENTATION, EFFICIENCY, AND STANDARDIZATION
 PERFORMED BY NOUS INFOSYSTEMS.
 PROBLEM NO.:         1
 BASE MODEL
 TOT. NO. OF OBS RECS:     1428
 TOT. NO. OF INDIVIDUALS:     38
 GENERAL NONLINEAR KINETICS MODEL USING LSODA (ADVAN13)
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 #TBLN:      1
 #METH: Objective Function Evaluation by Importance Sampling
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
 #TERM:
 EXPECTATION ONLY PROCESS COMPLETED

 ETABAR IS THE ARITHMETIC MEAN OF THE ETA-ESTIMATES,
 AND THE P-VALUE IS GIVEN FOR THE NULL HYPOTHESIS THAT THE TRUE MEAN IS 0.

 ETABAR:         5.9533E-02 -1.6784E-02 -6.5192E-02 -1.7761E-02  1.0571E-02 -2.8658E-02 -1.5419E-02  1.8077E-02  2.9474E-02  7.9018E-02
                -2.2069E-03
 SE:             3.3339E-02  3.9546E-02  3.8084E-02  1.2942E-02  8.9339E-03  3.4702E-02  9.1284E-03  1.2264E-02  1.4332E-01  2.2976E-01
                 4.0120E-03
 N:                      38          38          38          38          38          38          38          38          38          38
                         38

 P VAL.:         7.4152E-02  6.7127E-01  8.6935E-02  1.6996E-01  2.3672E-01  4.0891E-01  9.1194E-02  1.4050E-01  8.3707E-01  7.3091E-01
                 5.8228E-01

 ETAshrink(%):   4.1090E+01  1.0000E-10  1.7714E+01  4.6100E+01  6.2792E+01  1.3284E+01  6.1982E+01  4.8922E+01  1.5016E+01  1.0000E-10
                 8.3291E+01
 EBVshrink(%):   2.6061E+01  5.2767E+00  1.1387E+01  6.0338E+01  6.0218E+01  5.9135E+00  5.7223E+01  5.2447E+01  1.2706E+01  9.7294E+00
                 8.3554E+01
 EPSshrink(%):   7.2608E+00  1.0000E+02

 #TERE:
 Elapsed estimation time in seconds:  4611.61

 Number of Negative Eigenvalues in Matrix=           1
 Most negative value=  -11.299402863449993
 Most positive value=   19614.269050915649
 Forcing positive definiteness
 Root mean square deviation of matrix from original=    7.3267194711531809E-004

 Elapsed covariance time in seconds: 11734.10

 ********************               OBJECTIVE FUNCTION EVALUATION BY IMPORTANCE SAMPLING             ********************
 #OBJT:**************                        FINAL VALUE OF OBJECTIVE FUNCTION                       ********************
 #OBJV:********************************************    20781.214       **************************************************

 ********************               OBJECTIVE FUNCTION EVALUATION BY IMPORTANCE SAMPLING             ********************
 ********************                             FINAL PARAMETER ESTIMATE                           ********************

 THETA - VECTOR OF FIXED EFFECTS PARAMETERS   *********
         TH 1      TH 2      TH 3      TH 4      TH 5      TH 6      TH 7      TH 8      TH 9      TH10      TH11      TH12
          TH13      TH14      TH15      TH16      TH17
        -3.07E+00  1.92E+00  2.76E+00  5.95E-01  2.84E+00  3.37E+00  1.46E+01  5.71E+00  2.86E-01  0.00E+00  2.68E-01  0.00E+00
          1.00E+00  4.06E-01  1.52E-02  3.47E+00  1.49E+00

 OMEGA - COV MATRIX FOR RANDOM EFFECTS - ETAS  ********
            ETA1      ETA2      ETA3      ETA4      ETA5      ETA6      ETA7      ETA8      ETA9      ET10      ET11
 ETA1
+        1.25E-01
 ETA2
+        0.00E+00  4.74E-02
 ETA3
+        0.00E+00  0.00E+00  8.36E-02
 ETA4
+        0.00E+00  0.00E+00  0.00E+00  2.25E-02
 ETA5
+        0.00E+00  0.00E+00  0.00E+00  0.00E+00  2.25E-02
 ETA6
+        0.00E+00  0.00E+00  0.00E+00  0.00E+00  0.00E+00  6.25E-02
 ETA7
+        0.00E+00  0.00E+00  0.00E+00  0.00E+00  0.00E+00  0.00E+00  2.25E-02
 ETA8
+        0.00E+00  0.00E+00  0.00E+00  0.00E+00  0.00E+00  0.00E+00  0.00E+00  2.25E-02
 ETA9
+        0.00E+00  0.00E+00  0.00E+00  0.00E+00  0.00E+00  0.00E+00  0.00E+00  0.00E+00  1.11E+00
 ET10
+        0.00E+00  0.00E+00  0.00E+00  0.00E+00  0.00E+00  0.00E+00  0.00E+00  0.00E+00  0.00E+00  2.05E+00
 ET11
+        0.00E+00  0.00E+00  0.00E+00  0.00E+00  0.00E+00  0.00E+00  0.00E+00  0.00E+00  0.00E+00  0.00E+00  2.25E-02

 SIGMA - COV MATRIX FOR RANDOM EFFECTS - EPSILONS  ****
            EPS1      EPS2
 EPS1
+        1.00E+00
 EPS2
+        0.00E+00  1.00E+00

 OMEGA - CORR MATRIX FOR RANDOM EFFECTS - ETAS  *******
            ETA1      ETA2      ETA3      ETA4      ETA5      ETA6      ETA7      ETA8      ETA9      ET10      ET11
 ETA1
+        3.54E-01
 ETA2
+        0.00E+00  2.18E-01
 ETA3
+        0.00E+00  0.00E+00  2.89E-01
 ETA4
+        0.00E+00  0.00E+00  0.00E+00  1.50E-01
 ETA5
+        0.00E+00  0.00E+00  0.00E+00  0.00E+00  1.50E-01
 ETA6
+        0.00E+00  0.00E+00  0.00E+00  0.00E+00  0.00E+00  2.50E-01
 ETA7
+        0.00E+00  0.00E+00  0.00E+00  0.00E+00  0.00E+00  0.00E+00  1.50E-01
 ETA8
+        0.00E+00  0.00E+00  0.00E+00  0.00E+00  0.00E+00  0.00E+00  0.00E+00  1.50E-01
 ETA9
+        0.00E+00  0.00E+00  0.00E+00  0.00E+00  0.00E+00  0.00E+00  0.00E+00  0.00E+00  1.05E+00
 ET10
+        0.00E+00  0.00E+00  0.00E+00  0.00E+00  0.00E+00  0.00E+00  0.00E+00  0.00E+00  0.00E+00  1.43E+00
 ET11
+        0.00E+00  0.00E+00  0.00E+00  0.00E+00  0.00E+00  0.00E+00  0.00E+00  0.00E+00  0.00E+00  0.00E+00  1.50E-01

 SIGMA - CORR MATRIX FOR RANDOM EFFECTS - EPSILONS  ***
            EPS1      EPS2
 EPS1
+        1.00E+00
 EPS2
+        0.00E+00  1.00E+00

 ********************               OBJECTIVE FUNCTION EVALUATION BY IMPORTANCE SAMPLING             ********************
 ********************                         STANDARD ERROR OF ESTIMATE (RSR)                       ********************

 THETA - VECTOR OF FIXED EFFECTS PARAMETERS   *********
         TH 1      TH 2      TH 3      TH 4      TH 5      TH 6      TH 7      TH 8      TH 9      TH10      TH11      TH12
          TH13      TH14      TH15      TH16      TH17
         3.46E-01  7.61E-02  5.95E-02  9.77E-02  7.09E-02  7.35E-02  1.01E-01  7.64E-01  1.08E-01  0.00E+00  1.62E-02  0.00E+00
          0.00E+00  0.00E+00  1.00E-02  1.00E+00  3.74E-01

 OMEGA - COV MATRIX FOR RANDOM EFFECTS - ETAS  ********
            ETA1      ETA2      ETA3      ETA4      ETA5      ETA6      ETA7      ETA8      ETA9      ET10      ET11
 ETA1
+        1.31E+00
 ETA2
+        0.00E+00  1.04E-02
 ETA3
+        0.00E+00  0.00E+00  3.69E-02
 ETA4
+        0.00E+00  0.00E+00  0.00E+00  0.00E+00
 ETA5
+        0.00E+00  0.00E+00  0.00E+00  0.00E+00  0.00E+00
 ETA6
+        0.00E+00  0.00E+00  0.00E+00  0.00E+00  0.00E+00  1.41E-01
 ETA7
+        0.00E+00  0.00E+00  0.00E+00  0.00E+00  0.00E+00  0.00E+00  0.00E+00
 ETA8
+        0.00E+00  0.00E+00  0.00E+00  0.00E+00  0.00E+00  0.00E+00  0.00E+00  0.00E+00
 ETA9
+        0.00E+00  0.00E+00  0.00E+00  0.00E+00  0.00E+00  0.00E+00  0.00E+00  0.00E+00  1.04E+00
 ET10
+        0.00E+00  0.00E+00  0.00E+00  0.00E+00  0.00E+00  0.00E+00  0.00E+00  0.00E+00  0.00E+00  1.96E+00
 ET11
+        0.00E+00  0.00E+00  0.00E+00  0.00E+00  0.00E+00  0.00E+00  0.00E+00  0.00E+00  0.00E+00  0.00E+00  0.00E+00

 SIGMA - COV MATRIX FOR RANDOM EFFECTS - EPSILONS  ****
            EPS1      EPS2
 EPS1
+        0.00E+00
 EPS2
+        0.00E+00  0.00E+00

 OMEGA - CORR MATRIX FOR RANDOM EFFECTS - ETAS  *******
            ETA1      ETA2      ETA3      ETA4      ETA5      ETA6      ETA7      ETA8      ETA9      ET10      ET11
 ETA1
+        1.85E+00
 ETA2
+       .........  2.38E-02
 ETA3
+       ......... .........  6.38E-02
 ETA4
+       ......... ......... ......... .........
 ETA5
+       ......... ......... ......... ......... .........
 ETA6
+       ......... ......... ......... ......... .........  2.83E-01
 ETA7
+       ......... ......... ......... ......... ......... ......... .........
 ETA8
+       ......... ......... ......... ......... ......... ......... ......... .........
 ETA9
+       ......... ......... ......... ......... ......... ......... ......... .........  4.91E-01
 ET10
+       ......... ......... ......... ......... ......... ......... ......... ......... .........  6.84E-01
 ET11
+       ......... ......... ......... ......... ......... ......... ......... ......... ......... ......... .........

 SIGMA - CORR MATRIX FOR RANDOM EFFECTS - EPSILONS  ***
            EPS1      EPS2
 EPS1
+       .........
 EPS2
+       ......... .........
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
 ********************               OBJECTIVE FUNCTION EVALUATION BY IMPORTANCE SAMPLING             ********************
 ********************                   EIGENVALUES OF COR MATRIX OF ESTIMATE (RSR)                  ********************

             1         2         3         4         5         6         7         8         9        10        11        12
             13        14        15        16        17        18        19
         1.79E-03  4.09E-03  1.26E-02  1.96E-02  2.32E-02  2.84E-02  6.05E-02  9.86E-02  1.35E-01  2.17E-01  2.36E-01  2.46E-01
          2.92E-01  4.47E-01  8.75E-01  1.02E+00  1.48E+00  2.58E+00  1.12E+01
 #CPUT: Total CPU Time in Seconds,    16406.303
