13/12/2017
17:58
;; 1. Based on: Executable_ModelI
;; 2. Description: Morphine PK across paediatric age-range
;; x1. Author: user
$PROBLEM    Morphine PK across paediatric age-range
$INPUT      ID TIME ;in min
            AMT ;in microgram (ug)
            RATE ;in ug/min
            DV ;natural logarithm of concentration
            MDV CONC ;ug/L
            CMT ;1=morphine central plasma
            BW ;bodyweight in kg
            POP ;1=0 - 3 years,2=6 - 15 years,3=18 - 36 years (see publication)
$DATA      Simulated_DataModel1.csv IGNORE=I
$SUBROUTINE ADVAN5
;-------------------------------------------------------------------------------
$MODEL      NCOMPARTMENTS=2 COMP (CENTRAL,DEFDOSE) ;MORPHINE CENTRAL
            COMP=(2) ;PERPHERAL COM OF MORHINE

;-------------------------------------------------------------------------------
$PK
KDEC    = THETA(1)                      ; DECREASE OF EXPONENT FOR CLM1
KMAX    = THETA(2)+KDEC                 ; MAXIMUM EXPONENT OF CLM1
KHAL    = THETA(3)                      ; K50 OF CLM1
GAMMA   = THETA(4)                      ; GAMMA OF CLM1
KBDE    = KMAX-KDEC*(BW**GAMMA)/(KHAL**GAMMA+BW**GAMMA)

;-------------------------------------------------------------------------------
TVCL    = THETA(5)*(BW/70)**KBDE        ; POPULATION CLEARANCE OF MORPHINE
CL      = TVCL*EXP(ETA(1))              ; INDIVIDUAL ...
TVQ2    = THETA(6)*(BW/70)              ; POPULATION INTERCOMPARTMENTAL CLEARANCE OF MORHPINE
IF (POP.EQ.2) TVQ2= THETA(10)
Q2      = TVQ2*EXP(ETA(2))              ; INDIVIDUAL ...

;-------------------------------------------------------------------------------
TVV1    = THETA(7)*(BW/70)              ; POPULATION VOLUME OF MORPHINE CENTRAL COMPARTMENT
IF (POP.EQ.2) TVV1=THETA(11)*(BW/70);
V1      = TVV1 * EXP(ETA(3))            ; INDIVIDUAL ...

TVV2    = THETA(8)*(BW/70)              ; POPULATION VOLUME OF MORPHINE PEREPHERAL COMPARTMENT
V2      = TVV2*EXP(ETA(4))              ; INDIVIDUAL ...

;--------------------------------------------------------------------------------------------
ET1  = ETA(1)
ET2  = ETA(2)
ET3  = ETA(3)
ET4  = ETA(4)

;-------------------------------------------------------------------------------
S1=V1
;-------------------------------------------------------------------------------
K10  = CL/V1
K12  = Q2/V1
K21  = Q2/V2

F1      = 1
IF (POP.EQ.3)  F1 = 0.88

;-------------------------------------------------------------------------------
$ERROR
IPRED=LOG(0.000001)
IF (F.GT.0) IPRED = LOG(F)
W   =  THETA(9)
IRES  = IPRED-DV
IWRES = IRES/W
Y = IPRED + ERR(1)*W

;-------------------------------------------------------------------------------
$THETA  (0.1,0.5) ; KDEC (TH1)
 (0.2,0.9) ; KMAX-KDEC OR MINMUM EXP (TH2)
 (0.05,4,20) ; KHAL (TH3)
 (1,5) ; GAMMA (TH4)
 (0.001,1.5) ; CL (TH5)
 (0.01,1.7) ; Q2 (TH6)
 (0.1,70) ; V1 (TH7)
 (0.1,100) ; V2 (TH8)
 (0,0.33) ; ERR1 (TH9)
 (0.1,1.1) ; Q2 ADO (TH10)
 (0.1,50) ; V1 ADO (TH11)
;-------------------------------------------------------------------------------
$OMEGA  0.15  ;         CL
 0  FIX  ;         Q2
 0.1  ;         V1
 0  FIX  ;         V2
;-------------------------------------------------------------------------------
$SIGMA  1  FIX  ;       ERR1
;-------------------------------------------------------------------------------
$ESTIMATION NOABORT SIGDIG=3 PRINT=15 MAXEVAL=9999 METHOD=1
            INTERACTION POSTHOC
$COVARIANCE COMP PRINT=E
$TABLE      ID TIME AMT RATE DV PRED IWRES CWRES IPRED MDV CONC CMT BW
            POP KBDE TVCL CL Q2 TVV1 V1 V2 ET1 ET2 ET3 ET4 NOPRINT
            ONEHEADER NOAPPEND FILE=sdtabSimulatedDataModel1

NM-TRAN MESSAGES
 WARNINGS AND ERRORS (IF ANY) FOR PROBLEM    1
 (WARNING  2) NM-TRAN INFERS THAT THE DATA ARE POPULATION.

1NONLINEAR MIXED EFFECTS MODEL PROGRAM (NONMEM) VERSION 7.3.0
 ORIGINALLY DEVELOPED BY STUART BEAL, LEWIS SHEINER, AND ALISON BOECKMANN
 CURRENT DEVELOPERS ARE ROBERT BAUER, ICON DEVELOPMENT SOLUTIONS,
 AND ALISON BOECKMANN. IMPLEMENTATION, EFFICIENCY, AND STANDARDIZATION
 PERFORMED BY NOUS INFOSYSTEMS.
 PROBLEM NO.:         1
 Morphine PK across paediatric age-range
 TOT. NO. OF OBS RECS:       58
 TOT. NO. OF INDIVIDUALS:     14
 GENERAL LINEAR KINETICS MODEL (ADVAN5)
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 #TBLN:      1
 #METH: First Order Conditional Estimation with Interaction
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
 #TERM:
0MINIMIZATION SUCCESSFUL
 NO. OF FUNCTION EVALUATIONS USED:      427
 NO. OF SIG. DIGITS IN FINAL EST.:  3.2
0PARAMETER ESTIMATE IS NEAR ITS BOUNDARY
 THIS MUST BE ADDRESSED BEFORE THE COVARIANCE STEP CAN BE IMPLEMENTED

 ETABAR IS THE ARITHMETIC MEAN OF THE ETA-ESTIMATES,
 AND THE P-VALUE IS GIVEN FOR THE NULL HYPOTHESIS THAT THE TRUE MEAN IS 0.

 ETABAR:         6.0594E-03  0.0000E+00 -2.8368E-03  0.0000E+00
 SE:             6.1949E-02  0.0000E+00  1.2785E-01  0.0000E+00
 N:                      14          14          14          14

 P VAL.:         9.2208E-01  1.0000E+00  9.8230E-01  1.0000E+00

 ETAshrink(%):   1.6583E+01  1.0000E+02  2.2259E+01  1.0000E+02
 EBVshrink(%):   1.9486E+01  0.0000E+00  2.4194E+01  0.0000E+00
 EPSshrink(%):   1.5829E+01

 #TERE:
 Elapsed estimation time in seconds:     4.54

 ********************               FIRST ORDER CONDITIONAL ESTIMATION WITH INTERACTION              ********************
 #OBJT:**************                       MINIMUM VALUE OF OBJECTIVE FUNCTION                      ********************
 #OBJV:********************************************      -59.778       **************************************************

 ********************               FIRST ORDER CONDITIONAL ESTIMATION WITH INTERACTION              ********************
 ********************                             FINAL PARAMETER ESTIMATE                           ********************

 THETA - VECTOR OF FIXED EFFECTS PARAMETERS   *********
         TH 1      TH 2      TH 3      TH 4      TH 5      TH 6      TH 7      TH 8      TH 9      TH10      TH11
         6.72E-01  7.77E-01  3.78E+00  7.82E+00  1.50E+00  2.44E+00  1.00E+02  1.76E+02  2.70E-01  1.10E-01  4.61E+01

 OMEGA - COV MATRIX FOR RANDOM EFFECTS - ETAS  ********
            ETA1      ETA2      ETA3      ETA4
 ETA1
+        8.32E-02
 ETA2
+        0.00E+00  0.00E+00
 ETA3
+        0.00E+00  0.00E+00  4.08E-01
 ETA4
+        0.00E+00  0.00E+00  0.00E+00  0.00E+00

 SIGMA - COV MATRIX FOR RANDOM EFFECTS - EPSILONS  ****
            EPS1
 EPS1
+        1.00E+00

 OMEGA - CORR MATRIX FOR RANDOM EFFECTS - ETAS  *******
            ETA1      ETA2      ETA3      ETA4
 ETA1
+        2.88E-01
 ETA2
+        0.00E+00  0.00E+00
 ETA3
+        0.00E+00  0.00E+00  6.39E-01
 ETA4
+        0.00E+00  0.00E+00  0.00E+00  0.00E+00

 SIGMA - CORR MATRIX FOR RANDOM EFFECTS - EPSILONS  ***
            EPS1
 EPS1
+        1.00E+00
 #CPUT: Total CPU Time in Seconds,        4.618
