21/12/2017
10:21
;; 1. Based on: run06
;; 2. Description: Paracetamol (APAP) in term and preterm newborns
;; x1. Author: user
$PROBLEM    Paracetamol (APAP) in term and preterm newborns
$INPUT      ID TIME ; in min
            AMT ; in mg
            RATE ; in mg/min
            DV ; in blood mg/L in urine mg
            CMT ; see under $MODEL and in publication
            MDV EVID BWS ; bodyweight at time of study in kg
$DATA      Simulated_ParacetamolPKnewborns.csv IGNORE=@
$SUBROUTINE ADVAN6 TOL=5
$MODEL      NCOMPARTMENTS=6 COMP=(CENTRAL,DEFDOSE) ;PLASMA APAP
            COMP ;PLASMA APAP-G
            COMP ;PLASMA APAP-S
            COMP ;URINE APAP-G
            COMP ;URINE APAP
            COMP ;URINE APAP-S
$PK
ET1=EXP(ETA(1))
ET2=EXP(ETA(2))
ET3=EXP(ETA(3))
ET4=EXP(ETA(4))

TH1=THETA(1)
TH2=THETA(2)/1000
TH3=THETA(3)/1000
TH4=THETA(4)/1000
TH5=THETA(5)
TH6=THETA(6)

V1=TH1*BWS*ET1         ;volume plasma APAP
V2=V1*0.18             ;volume metabolites
V3=V2

CLG=TH2*BWS*ET2        ;formation clearance APAP-G
CLS=TH3*BWS**TH6*ET3   ;formation clearance APAP-S
CLA=TH4*BWS*ET4        ;clearance unchanged APAP

K12=CLG/V1
K13=CLS/V1
K15=CLA/V1
K24=TH5*K15
K36=K24

CLG2=K24*V2            ;elimination clearance APAP-G
CLS2=K36*V3            ;elimination clearance APAP-S

S1=V1
S2=V2
S3=V3
S4=1
S5=1
S6=1

$DES
DADT(1)=-K12*A(1)-K13*A(1)-K15*A(1)
DADT(2)=K12*A(1)-K24*A(2)
DADT(3)=K13*A(1)-K36*A(3)
DADT(4)=K24*A(2)
DADT(5)=K15*A(1)
DADT(6)=K36*A(3)

$ERROR
COM1=0
IF(CMT.EQ.1) COM1=1
COM4=0
IF (CMT.EQ.4) COM4=1
COM5=0
IF (CMT.EQ.5) COM5=1
COM6=0
IF (CMT.EQ.6) COM6=1
IPRE=F

Y1=F*(1+ERR(1))+ERR(5) ;Y1=APAP PLASMA
Y4=F*(1+ERR(2))        ;Y4=APAP-G URINE
Y5=F*(1+ERR(3))        ;Y5=APAP URINE
Y6=F*(1+ERR(4))        ;Y6=APAP-S URINE

Y=COM1*Y1+COM4*Y4+COM5*Y5+COM6*Y6

$THETA  (0,1.06) ; TH1 V1 APAP
 (0,0.266) ; TH2 CL APAP-G
 (0,1.46) ; TH3 CL APAP-S
 (0,0.285) ; TH4 CL APAP
 (0,11.3) ; TH5 CL 24 EN 36
 (0,1.4) ; TH6 EXP on CLS
$OMEGA  0.0925  ;          V
 0.599  ;   CLAPAP-G
 0.312  ;   CLAPAP-S
 0.0879  ;     CLAPAP
$SIGMA  0.0198  ; 1 APAP plasma proportional
 0.223  ; 2 APAP-G URINE proportional
 0.188  ; 3 APAP URINE proportional
 0.332  ; 4 APAP-S URINE proportional
 0.354  ; 5 APAP PLASMA additive
$ESTIMATION PRINT=1 MAXEVAL=9999 METHOD=CONDITIONAL INTERACTION
            NOABORT
$COVARIANCE PRINT=E
$TABLE      ID TIME AMT RATE DV CMT MDV EVID BWS IPRE NOAPPEND
            ONEHEADER NOPRINT FILE=sdtab07

NM-TRAN MESSAGES
 WARNINGS AND ERRORS (IF ANY) FOR PROBLEM    1
 (WARNING  2) NM-TRAN INFERS THAT THE DATA ARE POPULATION.

1NONLINEAR MIXED EFFECTS MODEL PROGRAM (NONMEM) VERSION 7.3.0
 ORIGINALLY DEVELOPED BY STUART BEAL, LEWIS SHEINER, AND ALISON BOECKMANN
 CURRENT DEVELOPERS ARE ROBERT BAUER, ICON DEVELOPMENT SOLUTIONS,
 AND ALISON BOECKMANN. IMPLEMENTATION, EFFICIENCY, AND STANDARDIZATION
 PERFORMED BY NOUS INFOSYSTEMS.
 PROBLEM NO.:         1
 Paracetamol (APAP) in term and preterm newborns
 TOT. NO. OF OBS RECS:      158
 TOT. NO. OF INDIVIDUALS:     10
 GENERAL NONLINEAR KINETICS MODEL (ADVAN6)
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 #TBLN:      1
 #METH: First Order Conditional Estimation with Interaction
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
 #TERM:
0MINIMIZATION SUCCESSFUL
 NO. OF FUNCTION EVALUATIONS USED:      422
 NO. OF SIG. DIGITS IN FINAL EST.:  3.6

 ETABAR IS THE ARITHMETIC MEAN OF THE ETA-ESTIMATES,
 AND THE P-VALUE IS GIVEN FOR THE NULL HYPOTHESIS THAT THE TRUE MEAN IS 0.

 ETABAR:        -6.5813E-03 -8.0053E-03  7.9035E-03 -1.0374E-02
 SE:             8.4529E-02  9.8748E-02  1.0594E-01  1.5258E-01
 N:                      10          10          10          10

 P VAL.:         9.3794E-01  9.3539E-01  9.4053E-01  9.4579E-01

 ETAshrink(%):   3.6313E+00  3.0102E+01  3.8528E+00  2.6460E+01
 EBVshrink(%):   9.5480E+00  3.3493E+01  9.0101E+00  3.0593E+01
 EPSshrink(%):   1.0274E+01  6.5826E+00  5.9235E+00  2.9304E+00  1.0274E+01

 #TERE:
 Elapsed estimation time in seconds:     8.60
0S MATRIX ALGORITHMICALLY SINGULAR
0S MATRIX IS OUTPUT
0INVERSE COVARIANCE MATRIX SET TO RS*RMAT, WHERE S* IS A PSEUDO INVERSE OF S
 Elapsed covariance time in seconds:    22.27

 ********************               FIRST ORDER CONDITIONAL ESTIMATION WITH INTERACTION              ********************
 #OBJT:**************                       MINIMUM VALUE OF OBJECTIVE FUNCTION                      ********************
 #OBJV:********************************************      397.621       **************************************************

 ********************               FIRST ORDER CONDITIONAL ESTIMATION WITH INTERACTION              ********************
 ********************                             FINAL PARAMETER ESTIMATE                           ********************

 THETA - VECTOR OF FIXED EFFECTS PARAMETERS   *********
         TH 1      TH 2      TH 3      TH 4      TH 5      TH 6
         1.03E+00  4.21E-01  1.85E+00  2.24E-01  1.36E+01  1.40E+00

 OMEGA - COV MATRIX FOR RANDOM EFFECTS - ETAS  ********
            ETA1      ETA2      ETA3      ETA4
 ETA1
+        8.55E-02
 ETA2
+        0.00E+00  2.22E-01
 ETA3
+        0.00E+00  0.00E+00  1.35E-01
 ETA4
+        0.00E+00  0.00E+00  0.00E+00  4.78E-01

 SIGMA - COV MATRIX FOR RANDOM EFFECTS - EPSILONS  ****
            EPS1      EPS2      EPS3      EPS4      EPS5
 EPS1
+        2.91E-02
 EPS2
+        0.00E+00  1.58E-01
 EPS3
+        0.00E+00  0.00E+00  1.19E-01
 EPS4
+        0.00E+00  0.00E+00  0.00E+00  1.01E-01
 EPS5
+        0.00E+00  0.00E+00  0.00E+00  0.00E+00  1.05E-01

 OMEGA - CORR MATRIX FOR RANDOM EFFECTS - ETAS  *******
            ETA1      ETA2      ETA3      ETA4
 ETA1
+        2.92E-01
 ETA2
+        0.00E+00  4.71E-01
 ETA3
+        0.00E+00  0.00E+00  3.67E-01
 ETA4
+        0.00E+00  0.00E+00  0.00E+00  6.92E-01

 SIGMA - CORR MATRIX FOR RANDOM EFFECTS - EPSILONS  ***
            EPS1      EPS2      EPS3      EPS4      EPS5
 EPS1
+        1.71E-01
 EPS2
+        0.00E+00  3.97E-01
 EPS3
+        0.00E+00  0.00E+00  3.46E-01
 EPS4
+        0.00E+00  0.00E+00  0.00E+00  3.17E-01
 EPS5
+        0.00E+00  0.00E+00  0.00E+00  0.00E+00  3.24E-01

 ********************               FIRST ORDER CONDITIONAL ESTIMATION WITH INTERACTION              ********************
 ********************                            STANDARD ERROR OF ESTIMATE                          ********************

 THETA - VECTOR OF FIXED EFFECTS PARAMETERS   *********
         TH 1      TH 2      TH 3      TH 4      TH 5      TH 6
         1.03E-01  8.89E-02  5.65E-01  6.80E-02  4.74E+00  2.46E-01

 OMEGA - COV MATRIX FOR RANDOM EFFECTS - ETAS  ********
            ETA1      ETA2      ETA3      ETA4
 ETA1
+        3.87E-02
 ETA2
+       .........  1.30E-01
 ETA3
+       ......... .........  9.05E-02
 ETA4
+       ......... ......... .........  3.10E-01

 SIGMA - COV MATRIX FOR RANDOM EFFECTS - EPSILONS  ****
            EPS1      EPS2      EPS3      EPS4      EPS5
 EPS1
+        1.70E-02
 EPS2
+       .........  2.11E-02
 EPS3
+       ......... .........  1.94E-02
 EPS4
+       ......... ......... .........  9.09E-03
 EPS5
+       ......... ......... ......... .........  1.86E-01

 OMEGA - CORR MATRIX FOR RANDOM EFFECTS - ETAS  *******
            ETA1      ETA2      ETA3      ETA4
 ETA1
+        6.62E-02
 ETA2
+       .........  1.38E-01
 ETA3
+       ......... .........  1.23E-01
 ETA4
+       ......... ......... .........  2.24E-01

 SIGMA - CORR MATRIX FOR RANDOM EFFECTS - EPSILONS  ***
            EPS1      EPS2      EPS3      EPS4      EPS5
 EPS1
+        4.97E-02
 EPS2
+       .........  2.66E-02
 EPS3
+       ......... .........  2.81E-02
 EPS4
+       ......... ......... .........  1.43E-02
 EPS5
+       ......... ......... ......... .........  2.88E-01
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
 ********************               FIRST ORDER CONDITIONAL ESTIMATION WITH INTERACTION              ********************
 ********************                      EIGENVALUES OF COR MATRIX OF ESTIMATE                     ********************

             1         2         3         4         5         6         7         8         9        10        11        12
             13        14        15
         8.38E-17 -1.43E-16  1.58E-16 -2.11E-16 -7.84E-16  1.08E-09  2.65E-02  9.74E-02  2.06E-01  1.02E+00  1.28E+00  2.27E+00
          2.56E+00  3.17E+00  4.37E+00
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 #CPUT: Total CPU Time in Seconds,       31.013
