$PROBLEM    oc 2 Emax on AUC BID CMAXM1 MHHY
$INPUT      C ID TIME=WEEK MDV DV DVID AMT=AMTAUC CMAXM1 CL_IND MHHY
            BID REGI DOSE
$DATA      ..Simulated_Pimasertib_AeDropout.csv
            IGNORE=C IGNORE(DVID.EQ.3)
$SUBROUTINE ADVAN=8 TOL=4
$MODEL      COMP=(CENTRAL) COMP=(CUMHAZ)
$PK
IF(NEWIND.LE.1) CHLAST=0
MEDIANCL=39.4

IF (TIME.EQ.0) PREVSCOR=0

B01=THETA(1)
B11=THETA(2)
B21=THETA(3)
B02=THETA(4)
B12=THETA(5)
B22=THETA(6)

FPS0=0
IF (PREVSCOR.EQ.0) FPS0=1
FPS1=0
IF (PREVSCOR.EQ.1.OR.PREVSCOR.EQ.2) FPS1=1
FPS2=0
IF (PREVSCOR.GE.3) FPS2=1
B1=FPS0*B01+FPS1*B11+FPS2*B21
B2=FPS0*B02+FPS1*B12+FPS2*B22

A1=B1
A2=A1+B2

IIV=ETA(1)

TVK=THETA(7)
K=TVK*EXP(ETA(2))

EMAX0=THETA(8)
EMAX1=THETA(9)
EMAX2=THETA(10)
ED50=EXP(THETA(11))*(CL_IND/MEDIANCL)**THETA(12)
EMAX=EMAX0
IF(PREVSCOR.GE.1) EMAX=EMAX1
;IF(PREVSCOR.GE.3) EMAX=EMAX2

TCOV11=THETA(13)
TCOV13=THETA(14)
TCOV17=THETA(15)

COV11=MHHY
COV13=BID
COV17=CMAXM1
MED17=0

ALL1=(COV17-MED17)*TCOV17
ALL2=COV11*TCOV11+COV13*TCOV13
COV=ALL1+ALL2

LAMBDA= EXP(THETA(16))
ALPHA = EXP(THETA(17))
BETA1 = THETA(18)

$DES

DADT(1)=-K*A(1)
DADT(2)= LAMBDA*ALPHA*T**(ALPHA-1)*EXP(BETA1*DOSE)


$ERROR
CALLFL=0

EXPO=A(1)

$ERROR
CALLFL=0

EFF=EMAX*EXPO /(EXPO + ED50)

AA1=A1+IIV+EFF+COV
AA2=A2+IIV+EFF+COV

AA1M=AA1-IIV
AA2M=AA2-IIV

PREV=PREVSCOR
PREVSCOR=DV

PC0=1
PC1=EXP(AA1)/(1+EXP(AA1))
PC2=EXP(AA2)/(1+EXP(AA2))

P2=PC2
P1=PC1-PC2
P0=PC0-PC1

PC0M=1
PC1M=EXP(AA1M)/(1+EXP(AA1M))
PC2M=EXP(AA2M)/(1+EXP(AA2M))
P2M=PC2M
P1M=PC1M-PC2M
P0M=PC0M-PC1M

NSIM=IREP
Y=-1
IF (DVID.EQ.2.AND.DV.EQ.0) Y=P0
IF (DVID.EQ.2.AND.DV.EQ.1.OR.DV.EQ.2) Y=P1
IF (DVID.EQ.2.AND.DV.GE.3) Y=P2

CUMHAZ=A(2)
IF (DVID.EQ.5) THEN
   Y=EXP(-CUMHAZ)
   CHLAST=CUMHAZ
ELSE
   CHLAST=CHLAST
ENDIF

IF (DVID.EQ.4) THEN
   HAZARD=LAMBDA*ALPHA*TIME**(ALPHA-1)*EXP(BETA1*DOSE)
   Y=EXP(-CUMHAZ)*HAZARD
ENDIF

$THETA  -6.2 ; TH1_B01
 1.7 ; TH2_B11
 1.6 ; TH3_B21
 -3.1 ; TH4_B02
 -8.05 ; TH5_B12
 -0.2 ; TH6_B22

$THETA  2.1 ; TH7_kel
 3.55 ; TH8_EMAX0
 0.01 ; TH9_EMAX1
 0 FIX ; TH10_EMAX2
 4.2 ; TH11_LNED50
 0 FIX ; TH12_CL

$THETA  0.41 ; TH13_Cov11_MHHY
 -0.32 ; TH14_Cov13_BID
 0.00024 ; TH15_COV17_CMAXM1

$THETA  -3.1 ; TH16 LNLAMBDA
 (0,0.23,5) ; TH17 LNALPHA
 0.0000001 ; TH18 BETA

$OMEGA  0.51  ; ETA1_logit
 0  FIX  ;   ETA2_kel
$ESTIMATION METHOD=1 MAXEVALS=9999 PRINT=5 LIKE LAPLACE SIGDIGITS=1
$COVARIANCE SIGL=6

$TABLE      ID TIME EVID PREV DVID DV AMT MHHY B01 B11 B21 B02 B12 B22
            B1 B2 A1 A2 AA1 AA2 PC0 PC1 PC2 P0 P1 P2 AA1M AA2M PC0M
            PC1M PC2M P0M P1M P2M IIV K EVID ETA1 EMAX ED50 EXPO EFF
            CMAXM1 CL_IND PREVSCOR BID REGI DOSE LAMBDA ALPHA BETA1
            NOPRINT ONEHEADER FILE=ddmore.tab

NM-TRAN MESSAGES
 WARNINGS AND ERRORS (IF ANY) FOR PROBLEM    1
 (WARNING  2) NM-TRAN INFERS THAT THE DATA ARE POPULATION.

1NONLINEAR MIXED EFFECTS MODEL PROGRAM (NONMEM) VERSION 7.3.0
 ORIGINALLY DEVELOPED BY STUART BEAL, LEWIS SHEINER, AND ALISON BOECKMANN
 CURRENT DEVELOPERS ARE ROBERT BAUER, ICON DEVELOPMENT SOLUTIONS,
 AND ALISON BOECKMANN. IMPLEMENTATION, EFFICIENCY, AND STANDARDIZATION
 PERFORMED BY NOUS INFOSYSTEMS.
 PROBLEM NO.:         1
 oc 2 Emax on AUC BID CMAXM1 MHHY
 TOT. NO. OF OBS RECS:     3655
 TOT. NO. OF INDIVIDUALS:    199
 GENERAL NONLINEAR KINETICS MODEL WITH STIFF EQUATIONS (ADVAN8)
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 #TBLN:      1
 #METH: Laplacian Conditional Estimation
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
 #TERM:
0MINIMIZATION SUCCESSFUL
 HOWEVER, PROBLEMS OCCURRED WITH THE MINIMIZATION.
 REGARD THE RESULTS OF THE ESTIMATION STEP CAREFULLY, AND ACCEPT THEM ONLY
 AFTER CHECKING THAT THE COVARIANCE STEP PRODUCES REASONABLE OUTPUT.
 NO. OF FUNCTION EVALUATIONS USED:      935
 NO. OF SIG. DIGITS IN FINAL EST.:  1.2

 ETABAR IS THE ARITHMETIC MEAN OF THE ETA-ESTIMATES,
 AND THE P-VALUE IS GIVEN FOR THE NULL HYPOTHESIS THAT THE TRUE MEAN IS 0.

 ETABAR:         5.7048E-02  0.0000E+00
 SE:             4.1969E-02  0.0000E+00
 N:                     199         199

 P VAL.:         1.7405E-01  1.0000E+00

 ETAshrink(%):   4.8332E+01  1.0000E+02
 EBVshrink(%):   4.5100E+01  0.0000E+00
 EPSshrink(%):   1.0000E+02

 #TERE:
 Elapsed estimation time in seconds:   755.02
 Elapsed covariance time in seconds:  1095.75

 ********************                         LAPLACIAN CONDITIONAL ESTIMATION                       ********************
 #OBJT:**************                       MINIMUM VALUE OF OBJECTIVE FUNCTION                      ********************
 #OBJV:********************************************     2346.762       **************************************************

 ********************                         LAPLACIAN CONDITIONAL ESTIMATION                       ********************
 ********************                             FINAL PARAMETER ESTIMATE                           ********************

 THETA - VECTOR OF FIXED EFFECTS PARAMETERS   *********
         TH 1      TH 2      TH 3      TH 4      TH 5      TH 6      TH 7      TH 8      TH 9      TH10      TH11      TH12
          TH13      TH14      TH15      TH16      TH17      TH18
        -5.95E+00  1.79E+00  1.93E+00 -3.22E+00 -8.55E+00 -3.15E-01  2.19E+02  4.82E+00 -8.43E-01  0.00E+00  8.36E+00  0.00E+00
          2.94E-01 -2.79E-01  8.04E-04 -4.24E+00  3.87E-01 -2.02E-03

 OMEGA - COV MATRIX FOR RANDOM EFFECTS - ETAS  ********
            ETA1      ETA2
 ETA1
+        1.32E+00
 ETA2
+        0.00E+00  0.00E+00

 OMEGA - CORR MATRIX FOR RANDOM EFFECTS - ETAS  *******
            ETA1      ETA2
 ETA1
+        1.15E+00
 ETA2
+        0.00E+00  0.00E+00

 ********************                         LAPLACIAN CONDITIONAL ESTIMATION                       ********************
 ********************                            STANDARD ERROR OF ESTIMATE                          ********************

 THETA - VECTOR OF FIXED EFFECTS PARAMETERS   *********
         TH 1      TH 2      TH 3      TH 4      TH 5      TH 6      TH 7      TH 8      TH 9      TH10      TH11      TH12
          TH13      TH14      TH15      TH16      TH17      TH18
         5.49E-01  6.18E-01  1.13E+00  4.35E-01  8.21E-01  3.06E-01  3.96E-03  5.75E-01  5.61E-01 .........  4.87E-01 .........
          2.95E-01  3.41E-01  5.74E-04  3.69E-01  7.75E-02  1.23E-03

 OMEGA - COV MATRIX FOR RANDOM EFFECTS - ETAS  ********
            ETA1      ETA2
 ETA1
+        7.36E-01
 ETA2
+       ......... .........

 OMEGA - CORR MATRIX FOR RANDOM EFFECTS - ETAS  *******
            ETA1      ETA2
 ETA1
+        3.20E-01
 ETA2
+       ......... .........
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 #CPUT: Total CPU Time in Seconds,     1849.468
