19/05/2016
16:44
; Script generated by the pharmML2Nmtran Converter v.0.3.0
; Source	: PharmML 0.6.1
; Target	: NMTRAN 7.3.0
; Model 	: Executable_Mielosupression
; Dated 	: Thu May 19 16:44:52 CEST 2016

$PROBLEM "generated by MDL2PharmML v.6.0"

$INPUT  ID TIME=TIME RATE AMT DV CMT MDV V2I V1I CLI
$DATA "Simulated_WBC_pacl_ddmore.csv" IGNORE=@
$SUBS ADVAN13 TOL=9

$MODEL
COMP (COMP1) 	;AC
COMP (COMP2) 	;AP
COMP (COMP3) 	;CIRC
COMP (COMP4) 	;PROL
COMP (COMP5) 	;TRANSIT1
COMP (COMP6) 	;TRANSIT2
COMP (COMP7) 	;TRANSIT3

$PK
POP_CIRC0 = THETA(1)
POP_MTT = THETA(2)
POP_GAMMA = THETA(3)
POP_SLOPU = THETA(4)
PROP_ERROR = THETA(5)

ETA_CIRC0 =  ETA(1)
ETA_MTT =  ETA(2)
ETA_SLOPU =  ETA(3)

MU_1 = LOG(POP_CIRC0)
CIRC0 =  EXP(MU_1 +  ETA(1)) ;

MU_2 = LOG(POP_MTT)
MTT =  EXP(MU_2 +  ETA(2)) ;

MU_3 = LOG(POP_SLOPU)
SLOPU =  EXP(MU_3 +  ETA(3)) ;

GAMMA = POP_GAMMA

A_0(1) = 0
A_0(2) = 0
A_0(3) = CIRC0
A_0(4) = CIRC0
A_0(5) = CIRC0
A_0(6) = CIRC0
A_0(7) = CIRC0

$DES
AC_DES = A(1)
AP_DES = A(2)
CIRC_DES = A(3)
PROL_DES = A(4)
TRANSIT1_DES = A(5)
TRANSIT2_DES = A(6)
TRANSIT3_DES = A(7)
Q_DES = 204
NN_DES = 3
KTR_DES = ((NN_DES+1)/MTT)
CONC_DES = (AC_DES/V1I)
EDRUG_DES = (1-(SLOPU*CONC_DES))
FEED_DES = ((CIRC0/CIRC_DES)**GAMMA)
DADT(1) = ((((-(Q_DES)/V1I)*AC_DES)-((CLI/V1I)*AC_DES))+((Q_DES/V2I)*AP_DES))
DADT(2) = (((Q_DES/V1I)*AC_DES)-((Q_DES/V2I)*AP_DES))
DADT(3) = ((KTR_DES*TRANSIT3_DES)-(KTR_DES*CIRC_DES))
DADT(4) = ((((KTR_DES*PROL_DES)*EDRUG_DES)*FEED_DES)-(KTR_DES*PROL_DES))
DADT(5) = ((KTR_DES*PROL_DES)-(KTR_DES*TRANSIT1_DES))
DADT(6) = ((KTR_DES*TRANSIT1_DES)-(KTR_DES*TRANSIT2_DES))
DADT(7) = ((KTR_DES*TRANSIT2_DES)-(KTR_DES*TRANSIT3_DES))

$ERROR
AC = A(1)
AP = A(2)
CIRC = A(3)
PROL = A(4)
TRANSIT1 = A(5)
TRANSIT2 = A(6)
TRANSIT3 = A(7)
Q = 204
NN = 3
KTR = ((NN+1)/MTT)
CONC = (AC/V1I)
EDRUG = (1-(SLOPU*CONC))
FEED = ((CIRC0/CIRC)**GAMMA)
IPRED = CIRC
W = PROP_ERROR*IPRED
Y = IPRED+W*EPS(1)
IRES = DV - IPRED
IWRES = IRES/W

$THETA
( 2.0 , 7.21 , 13.0 )	;POP_CIRC0
( 0.0 , 124.0 )	;POP_MTT
( 0.0 , 0.239 )	;POP_GAMMA
( 0.0 , 28.9 )	;POP_SLOPU
( 0.0 , 0.286 )	;PROP_ERROR

$OMEGA
(0.107 )	;OMEGA_CIRC0
(0.0296 )	;OMEGA_MTT
(0.176 )	;OMEGA_SLOPU

$SIGMA
1.0 FIX	;SIGMA_ERROR

$EST METHOD=COND INTER NSIG=3 SIGL=9 MAXEVALS=9999 PRINT=10 NOABORT

$TABLE  ID TIME RATE AMT CMT MDV V2I V1I CLI PRED IPRED RES IRES WRES IWRES Y DV NOAPPEND NOPRINT FILE=sdtab

$TABLE  ID CIRC0 MTT SLOPU GAMMA ETA_CIRC0 ETA_MTT ETA_SLOPU NOAPPEND NOPRINT FILE=patab

$TABLE  ID V2I V1I CLI NOAPPEND NOPRINT FILE=cotab

NM-TRAN MESSAGES
 WARNINGS AND ERRORS (IF ANY) FOR PROBLEM    1
 (WARNING  2) NM-TRAN INFERS THAT THE DATA ARE POPULATION.
 (WARNING  97) A RANDOM QUANTITY IS RAISED TO A POWER. IF THE RESULT AFFECTS
 THE VALUE OF THE OBJECTIVE FUNCTION, THE USER SHOULD ENSURE THAT THE
 RANDOM QUANTITY IS NEVER 0 WHEN THE POWER IS < 1.

1NONLINEAR MIXED EFFECTS MODEL PROGRAM (NONMEM) VERSION 7.3.0
 ORIGINALLY DEVELOPED BY STUART BEAL, LEWIS SHEINER, AND ALISON BOECKMANN
 CURRENT DEVELOPERS ARE ROBERT BAUER, ICON DEVELOPMENT SOLUTIONS,
 AND ALISON BOECKMANN. IMPLEMENTATION, EFFICIENCY, AND STANDARDIZATION
 PERFORMED BY NOUS INFOSYSTEMS.
 PROBLEM NO.:         1
 "generated by MDL2PharmML v.6.0"
 TOT. NO. OF OBS RECS:      530
 TOT. NO. OF INDIVIDUALS:     46
 GENERAL NONLINEAR KINETICS MODEL USING LSODA (ADVAN13)
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 #TBLN:      1
 #METH: First Order Conditional Estimation with Interaction
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
 #TERM:
0MINIMIZATION SUCCESSFUL
 HOWEVER, PROBLEMS OCCURRED WITH THE MINIMIZATION.
 REGARD THE RESULTS OF THE ESTIMATION STEP CAREFULLY, AND ACCEPT THEM ONLY
 AFTER CHECKING THAT THE COVARIANCE STEP PRODUCES REASONABLE OUTPUT.
 NO. OF FUNCTION EVALUATIONS USED:      180
 NO. OF SIG. DIGITS IN FINAL EST.:  3.4

 ETABAR IS THE ARITHMETIC MEAN OF THE ETA-ESTIMATES,
 AND THE P-VALUE IS GIVEN FOR THE NULL HYPOTHESIS THAT THE TRUE MEAN IS 0.

 ETABAR:         1.3904E-02 -4.7672E-03  6.5120E-02
 SE:             4.5792E-02  2.2134E-02  5.0063E-02
 N:                      45          45          45

 P VAL.:         7.6141E-01  8.2947E-01  1.9334E-01

 ETAshrink(%):   5.0865E+00  1.3913E+01  2.0512E+01
 EBVshrink(%):   6.4250E+00  1.2960E+01  2.1816E+01
 EPSshrink(%):   8.4781E+00

 #TERE:
 Elapsed estimation time in seconds:  2111.08

 ********************               FIRST ORDER CONDITIONAL ESTIMATION WITH INTERACTION              ********************
 #OBJT:**************                       MINIMUM VALUE OF OBJECTIVE FUNCTION                      ********************
 #OBJV:********************************************     1223.057       **************************************************

 ********************               FIRST ORDER CONDITIONAL ESTIMATION WITH INTERACTION              ********************
 ********************                             FINAL PARAMETER ESTIMATE                           ********************

 THETA - VECTOR OF FIXED EFFECTS PARAMETERS   *********
         TH 1      TH 2      TH 3      TH 4      TH 5
         7.21E+00  1.23E+02  2.38E-01  2.87E+01  2.86E-01

 OMEGA - COV MATRIX FOR RANDOM EFFECTS - ETAS  ********
            ETA1      ETA2      ETA3
 ETA1
+        1.07E-01
 ETA2
+        0.00E+00  3.04E-02
 ETA3
+        0.00E+00  0.00E+00  1.83E-01

 SIGMA - COV MATRIX FOR RANDOM EFFECTS - EPSILONS  ****
            EPS1
 EPS1
+        1.00E+00

 OMEGA - CORR MATRIX FOR RANDOM EFFECTS - ETAS  *******
            ETA1      ETA2      ETA3
 ETA1
+        3.27E-01
 ETA2
+        0.00E+00  1.74E-01
 ETA3
+        0.00E+00  0.00E+00  4.27E-01

 SIGMA - CORR MATRIX FOR RANDOM EFFECTS - EPSILONS  ***
            EPS1
 EPS1
+        1.00E+00
 #CPUT: Total CPU Time in Seconds,     2111.021
