NOTE: the same output is associated with real and simulated datasets, as alterations to make the simulated dataset did not modify key dosage and concentration data

;; PK-Pop model of sultiame with nonlinear distribution
;; Related article : Pharmacokinetic Profile of Sultiame in Healthy Volunteers with In Vitro Characterization of Its Uptake by Red Blood Cells
;; Kim Dao, Paul Thoueille, Laurent Arthur Decosterd, Thomas Mercier, Monia Guidi, Carine Bardinet, Sébastien Lebon, Eva Choong,
;; Arnaud Castang, Catherine Guittet, Luc-André Granier, Thierry Buclin
;; Under submission
;; Model author: Kim Dao
;; Date: Mon Jun 24 09:01:09 CEST 2019
;; Output for simulated data

$PROBLEM    PK
$INPUT      ID TTT DAT1=DROP TIME DV UVOL AMT MDV EVID CMT
$DATA      Simulated_data_PK_sultiame.csv IGNORE=I
$SUBROUTINE ADVAN13 TOL=3
$MODEL      NCOMP=4
$PK
IF (AMT.GT.0) THEN
 TDOS=TIME
 TAD=0.0
 ENDIF
 IF (AMT.EQ.0) TAD=TIME-TDOS

CL = THETA(1) * EXP(ETA(1))
V2 = THETA(2) * EXP(ETA(2))
V3 = THETA(3)
KON = THETA(4)
BTOT = THETA(5) *EXP(ETA(4))
KOFF = THETA(6)
KA = THETA(7)
KE = CL/V2
QREN = THETA(8) * EXP(ETA(3))
S2 = V2
S3 = V3
S4 = UVOL/1000

$DES
DADT(1) = -KA * A(1)
DADT(2) = KA * A(1) - KE * A(2) - KON * A(2) * (BTOT - A(3)) + KOFF * A(3)
DADT(3) = KON * A(2) * (BTOT - A(3)) - KOFF * A(3)
DADT(4) = KE * A(2) * QREN

$ERROR
Q2=0
Q3=0
Q4=0

IF(CMT==2) THEN
Q2=1
IPRED2 = A(2)/S2
    W2 = SQRT(THETA(9)**2*IPRED2**2 + THETA(10)**2)
    Y2 = IPRED2 + W2*EPS(1)
 IRES2 = DV-IPRED2
IWRES2 = IRES2/W2
ENDIF

IF(CMT==3) THEN
Q3=1
IPRED3 = A(3)/S3
    W3 = SQRT(THETA(11)**2*IPRED3**2 + THETA(12)**2)
    Y3 = IPRED3 + W3*EPS(1)
 IRES3 = DV-IPRED3
IWRES3 = IRES3/W3
ENDIF

IF(CMT.EQ.4.AND.EVID.EQ.0) THEN
Q4=1
IPRED4 = A(4)/S4

    W4 = SQRT(THETA(13)**2*IPRED4**2 + THETA(14)**2)
Y4 = IPRED4 + W4*EPS(1)
 IRES4 = DV-IPRED4
IWRES4 = IRES4/W4
ENDIF

IPRED=Q2*IPRED2+Q3*IPRED3+Q4*IPRED4
Y=Y2*Q2+Q3*Y3+Y4*Q4
IRES=Q2*IRES2+Q3*IRES3+Q4*IRES4
IWRES=Q2*IWRES2+Q3*IWRES3+Q4*IWRES4

$THETA  (0,7.4) ; CL
 (0,0.7) ; V2 (plasma)
 (0,3.1) ; V3 (RBC)
 (0,2) ; KON
 (0,140) ; bTOT
 (0,0.3) ; KOFF
 1 FIX ; KA
 (0,0.5,1) ; Qren (%)
 (0,0.7) ; Prop.RE (sd)
 0 FIX ; Add.RE (sd)
 (0,0.22) ; Prop.RE (sd)_
 (0,0.0003) ; Add.RE (sd)_
 (0,0.1) ; Prop.RE (sd)__
 0 FIX ; Add.RE (sd)__
$OMEGA  0.1  ;     IIV CL
 0.1  ;     IIV V2
 0.1  ;   IIV QRen
 0.1  ;   IIV btot
$SIGMA  1  FIX  ; Proportional error PK
$ESTIMATION METHOD=1 INTER MAXEVAL=9999 NOABORT SIGL=3 NSIG=1 PRINT=1
            POSTHOC
$COVARIANCE
$TABLE      ID TIME DV CMT AMT MDV EVID NOPRINT NOHEADER FILE=tab0010
; Xpose
$TABLE      ID TIME TAD AMT DV UVOL MDV CMT EVID IPRED IWRES CWRES
            ONEHEADER NOPRINT FILE=sdtab0010
$TABLE      CL V2 V3 KA KE KON BTOT KOFF FIRSTONLY ONEHEADER NOPRINT
            FILE=patab0010

NM-TRAN MESSAGES
 WARNINGS AND ERRORS (IF ANY) FOR PROBLEM    1
 (WARNING  2) NM-TRAN INFERS THAT THE DATA ARE POPULATION.
 (WARNING  3) THERE MAY BE AN ERROR IN THE ABBREVIATED CODE. THE FOLLOWING
 ONE OR MORE RANDOM VARIABLES ARE DEFINED WITH "IF" STATEMENTS THAT DO NOT
 PROVIDE DEFINITIONS FOR BOTH THE "THEN" AND "ELSE" CASES. IF ALL
 CONDITIONS FAIL, THE VALUES OF THESE VARIABLES WILL BE ZERO.
   IPRED2 W2 Y2 IRES2 IWRES2 IPRED3 W3 Y3 IRES3 IWRES3 IPRED4 W4 Y4 IRES4
 IWRES4

1NONLINEAR MIXED EFFECTS MODEL PROGRAM (NONMEM) VERSION 7.4.2
 ORIGINALLY DEVELOPED BY STUART BEAL, LEWIS SHEINER, AND ALISON BOECKMANN
 CURRENT DEVELOPERS ARE ROBERT BAUER, ICON DEVELOPMENT SOLUTIONS,
 AND ALISON BOECKMANN. IMPLEMENTATION, EFFICIENCY, AND STANDARDIZATION
 PERFORMED BY NOUS INFOSYSTEMS.
 PROBLEM NO.:         1
 PK
 TOT. NO. OF OBS RECS:      433
 TOT. NO. OF INDIVIDUALS:        4
 GENERAL NONLINEAR KINETICS MODEL WITH STIFF/NONSTIFF EQUATIONS (LSODA, ADVAN13)
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 #TBLN:      1
 #METH: First Order Conditional Estimation with Interaction
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
 #TERM:
0MINIMIZATION SUCCESSFUL
 HOWEVER, PROBLEMS OCCURRED WITH THE MINIMIZATION.
 REGARD THE RESULTS OF THE ESTIMATION STEP CAREFULLY, AND ACCEPT THEM ONLY
 AFTER CHECKING THAT THE COVARIANCE STEP PRODUCES REASONABLE OUTPUT.
 NO. OF FUNCTION EVALUATIONS USED:     1682
 NO. OF SIG. DIGITS IN FINAL EST.:  1.1

 ETABAR IS THE ARITHMETIC MEAN OF THE ETA-ESTIMATES,
 AND THE P-VALUE IS GIVEN FOR THE NULL HYPOTHESIS THAT THE TRUE MEAN IS 0.

 ETABAR:        -2.1175E-02  8.5682E-03  4.4556E-03  6.3263E-03
 SE:             1.2461E-01  2.9922E-02  1.5009E-01  5.5986E-02
 N:                       4           4           4           4

 P VAL.:         8.6507E-01  7.7461E-01  9.7632E-01  9.1003E-01

 ETASHRINKSD(%)  1.0000E-10  2.5421E+01  1.0000E-10  1.0000E-10
 ETASHRINKVR(%)  1.0000E-10  4.4379E+01  1.0000E-10  1.0000E-10
 EBVSHRINKSD(%)  2.4343E+00  3.3656E+01  4.8378E+00  3.6632E+00
 EBVSHRINKVR(%)  4.8094E+00  5.5985E+01  9.4415E+00  7.1922E+00
 EPSSHRINKSD(%)  1.4210E+00
 EPSSHRINKVR(%)  2.8218E+00


 TOTAL DATA POINTS NORMALLY DISTRIBUTED (N):          433
 N*LOG(2PI) CONSTANT TO OBJECTIVE FUNCTION:    795.80076975524651
 OBJECTIVE FUNCTION VALUE WITHOUT CONSTANT:   -43.499533496224274
 OBJECTIVE FUNCTION VALUE WITH CONSTANT:       752.30123625902229
 REPORTED OBJECTIVE FUNCTION DOES NOT CONTAIN CONSTANT

 TOTAL EFFECTIVE ETAS (NIND*NETA):                            16


 #TERE:
 Elapsed estimation  time in seconds:   204.39
0S MATRIX ALGORITHMICALLY SINGULAR
0S MATRIX IS OUTPUT
0INVERSE COVARIANCE MATRIX SET TO RS*RMAT, WHERE S* IS A PSEUDO INVERSE OF S
 Elapsed covariance  time in seconds:    48.29
 Elapsed postprocess time in seconds:     0.27

 ********************               FIRST ORDER CONDITIONAL ESTIMATION WITH INTERACTION              ********************
 #OBJT:**************                       MINIMUM VALUE OF OBJECTIVE FUNCTION                      ********************
 #OBJV:********************************************      -43.500       **************************************************

 ********************               FIRST ORDER CONDITIONAL ESTIMATION WITH INTERACTION              ********************
 ********************                             FINAL PARAMETER ESTIMATE                           ********************

 THETA - VECTOR OF FIXED EFFECTS PARAMETERS   *********
         TH 1      TH 2      TH 3      TH 4      TH 5      TH 6      TH 7      TH 8      TH 9      TH10      TH11      TH12
          TH13      TH14
         1.10E+01  5.63E+01  2.93E+00  9.49E-01  9.71E+01  7.96E-01  1.00E+00  2.47E-01  5.67E-01  0.00E+00  2.63E-01  1.20E-02
          4.33E-01  0.00E+00

 OMEGA - COV MATRIX FOR RANDOM EFFECTS - ETAS  ********
         ETA1      ETA2      ETA3      ETA4
 ETA1
+        7.61E-02
 ETA2
+        0.00E+00  8.58E-03
 ETA3
+        0.00E+00  0.00E+00  9.95E-02
 ETA4
+        0.00E+00  0.00E+00  0.00E+00  1.45E-02

 SIGMA - COV MATRIX FOR RANDOM EFFECTS - EPSILONS  ****
         EPS1
 EPS1
+        1.00E+00

 OMEGA - CORR MATRIX FOR RANDOM EFFECTS - ETAS  *******
         ETA1      ETA2      ETA3      ETA4
 ETA1
+        2.76E-01
 ETA2
+        0.00E+00  9.27E-02
 ETA3
+        0.00E+00  0.00E+00  3.15E-01
 ETA4
+        0.00E+00  0.00E+00  0.00E+00  1.21E-01

 SIGMA - CORR MATRIX FOR RANDOM EFFECTS - EPSILONS  ***
         EPS1
 EPS1
+        1.00E+00

 ********************               FIRST ORDER CONDITIONAL ESTIMATION WITH INTERACTION              ********************
 ********************                            STANDARD ERROR OF ESTIMATE                          ********************

 THETA - VECTOR OF FIXED EFFECTS PARAMETERS   *********
         TH 1      TH 2      TH 3      TH 4      TH 5      TH 6      TH 7      TH 8      TH 9      TH10      TH11      TH12
          TH13      TH14
         1.27E+00  1.36E+01  1.71E-01  2.46E-01  8.58E+00  2.49E-01 .........  3.74E-02  8.24E-02 .........  1.49E-02  6.83E-04
          7.00E-02 .........

 OMEGA - COV MATRIX FOR RANDOM EFFECTS - ETAS  ********
         ETA1      ETA2      ETA3      ETA4
 ETA1
+        2.57E-02
 ETA2
+       .........  2.01E-02
 ETA3
+       ......... .........  2.62E-01
 ETA4
+       ......... ......... .........  1.36E-02

 SIGMA - COV MATRIX FOR RANDOM EFFECTS - EPSILONS  ****
         EPS1
 EPS1
+       .........

 OMEGA - CORR MATRIX FOR RANDOM EFFECTS - ETAS  *******
         ETA1      ETA2      ETA3      ETA4
 ETA1
+        4.66E-02
 ETA2
+       .........  1.08E-01
 ETA3
+       ......... .........  4.15E-01
 ETA4
+       ......... ......... .........  5.62E-02

 SIGMA - CORR MATRIX FOR RANDOM EFFECTS - EPSILONS  ***
         EPS1
 EPS1
+       .........
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 Elapsed finaloutput time in seconds:     0.10
 #CPUT: Total CPU Time in Seconds,      253.173
