14.06.2016
18:09
; Script generated by the pharmML2Nmtran Converter v.0.3.0
; Source	: PharmML 0.6.1
; Target	: NMTRAN 7.3.0
; Model 	: terheine1
; Dated 	: Tue Jun 14 18:09:17 CEST 2016

$PROBLEM "generated by MDL2PharmML v.6.0"

$INPUT  ID TIME=TIME DV IPR=DROP AMT DVID MDV EVID II TAD=DROP L2=DROP CYP3A4 CYP2D6 SS
$DATA "SS1_Day20T_L2v1_new.csv" IGNORE=@
$SUBS ADVAN13 TOL=9

$MODEL
COMP (COMP1) 	;GUT
COMP (COMP2) 	;CMT_TAM
COMP (COMP3) 	;CMT_ENDX

$PK
POP_CL20 = THETA(1)
POP_V2 = THETA(2)
POP_K12 = THETA(3)
POP_CL23 = THETA(4)
POP_Q1 = THETA(5)
POP_ALAG1 = THETA(6)
BETA_CL23_PHENO2D6 = THETA(7)
BETA_CL23_PHENO3A4 = THETA(8)
RUV_TAM = THETA(9)
RUV_ENDX = THETA(10)

ETA_CL20 =  ETA(1)
ETA_V2 =  ETA(2)
ETA_CL23 =  ETA(3)

LOGPHENO2D6 = LOG((CYP2D6/1560))

LOGPHENO3A4 = LOG((CYP3A4/44.7))

MTAM = 371.51456
MENDX = 373.48738
V3 = 400
CL30 = 5.1
K30 = (CL30/V3)

MU_1 = LOG(POP_CL20)
CL20 =  EXP(MU_1 +  ETA(1)) ;

MU_2 = LOG(POP_V2)
V2 =  EXP(MU_2 +  ETA(2)) ;

K12 = POP_K12

MU_3 = LOG(POP_CL23) + BETA_CL23_PHENO2D6 * LOGPHENO2D6 + BETA_CL23_PHENO3A4 * LOGPHENO3A4
CL23 =  EXP(MU_3 +  ETA(3)) ;

Q1 = POP_Q1

NM_ALAG1 = POP_ALAG1

A_0(1) = 0
A_0(2) = 0
A_0(3) = 0

$DES
GUT_DES = A(1)
CMT_TAM_DES = A(2)
CMT_ENDX_DES = A(3)
SC2_DES = ((V2*MTAM)/(10**6))
SC3_DES = ((V3*MENDX)/(10**6))
C2_DES = (CMT_TAM_DES/V2)
RATEIN_DES = 0
IF (T.GE.NM_ALAG1) THEN
	RATEIN_DES = (GUT_DES*K12)
ENDIF
C_HEP_DES = ((RATEIN_DES+(Q1*C2_DES))/(Q1+CL23))
CTAM_DES = (CMT_TAM_DES/SC2_DES)
CENDX_DES = (CMT_ENDX_DES/SC3_DES)
DADT(1) = -(RATEIN_DES)
DADT(2) = (((Q1*C_HEP_DES)-(Q1*C2_DES))-(CL20*C2_DES))
DADT(3) = ((CL23*C_HEP_DES)-(K30*CMT_ENDX_DES))

$ERROR
GUT = A(1)
CMT_TAM = A(2)
CMT_ENDX = A(3)
SC2 = ((V2*MTAM)/(10**6))
SC3 = ((V3*MENDX)/(10**6))
C2 = (CMT_TAM/V2)
RATEIN = 0
IF (TIME.GE.NM_ALAG1) THEN
	RATEIN = (GUT*K12)
ENDIF
C_HEP = ((RATEIN+(Q1*C2))/(Q1+CL23))
CTAM = (CMT_TAM/SC2)
CENDX = (CMT_ENDX/SC3)

IF(DVID.EQ.2) THEN
	IPRED = CTAM
W = RUV_TAM*IPRED
Y = IPRED+W*EPS(1)
IRES = DV - IPRED
IWRES = IRES/W

ENDIF

IF(DVID.EQ.3) THEN
	IPRED = CENDX
W = RUV_ENDX*IPRED
Y = IPRED+W*EPS(1)
IRES = DV - IPRED
IWRES = IRES/W

ENDIF

$THETA
( 0.0 , 10.0 , 10000.0 )	;POP_CL20
( 5.0 , 800.0 , 20000.0 )	;POP_V2
( 0.01 , 2.0 , 10.0 )	;POP_K12
( 0.0 , 0.3 , 10000.0 )	;POP_CL23
( 0.0 , 10.0 , 10000.0 )	;POP_Q1
( 0.0 , 0.5 , 10.0 )	;POP_ALAG1
( 0.01 , 0.2 , 10.0 )	;BETA_CL23_PHENO2D6
( 0.01 , 0.2 , 10.0 )	;BETA_CL23_PHENO3A4
(0.1 )	;RUV_TAM
(0.1 )	;RUV_ENDX

$OMEGA BLOCK(2)   SD
(0.1 )	;PPV_CL20
(0.01 )	;ETA_CL20_ETA_V2
(0.1 )	;PPV_V2

$OMEGA
(0.1 SD )	;PPV_CL23

$SIGMA
1.0 FIX
1.0 FIX

$EST METHOD=COND INTER NSIG=3 SIGL=9 MAXEVALS=9999 PRINT=10 NOABORT

$TABLE  ID TIME AMT DVID MDV EVID II CYP3A4 CYP2D6 SS PRED IPRED RES IRES WRES IWRES Y DV NOAPPEND NOPRINT FILE=sdtab

$TABLE  ID CL20 V2 K12 CL23 Q1 NM_ALAG1 ETA_CL20 ETA_V2 ETA_CL23 NOAPPEND NOPRINT FILE=patab

$TABLE  ID CYP3A4 CYP2D6 LOGPHENO2D6 LOGPHENO3A4 NOAPPEND NOPRINT FILE=cotab

NM-TRAN MESSAGES
 WARNINGS AND ERRORS (IF ANY) FOR PROBLEM    1
 (WARNING  2) NM-TRAN INFERS THAT THE DATA ARE POPULATION.
 (WARNING  3) THERE MAY BE AN ERROR IN THE ABBREVIATED CODE. THE FOLLOWING
 ONE OR MORE RANDOM VARIABLES ARE DEFINED WITH "IF" STATEMENTS THAT DO NOT
 PROVIDE DEFINITIONS FOR BOTH THE "THEN" AND "ELSE" CASES. IF ALL
 CONDITIONS FAIL, THE VALUES OF THESE VARIABLES WILL BE ZERO.
   IPRED W IRES IWRES Y
 (WARNING  73) COMPARTMENT AMOUNTS ARE INITIALIZED IN $PK ABBREVIATED CODE,
 BUT THE SS DATA ITEM IS DEFINED. THE SS DOSE EVENT RECORDS SHOULD SPECIFY
 SS=2 OR SS=3.
 (MU_WARNING 26) DATA ITEM(S) USED IN DEFINITION OF MU_(S) SHOULD BE CONSTANT FOR INDIV. REC.:
  CYP2D6 CYP3A4

1NONLINEAR MIXED EFFECTS MODEL PROGRAM (NONMEM) VERSION 7.3.0
 ORIGINALLY DEVELOPED BY STUART BEAL, LEWIS SHEINER, AND ALISON BOECKMANN
 CURRENT DEVELOPERS ARE ROBERT BAUER, ICON DEVELOPMENT SOLUTIONS,
 AND ALISON BOECKMANN. IMPLEMENTATION, EFFICIENCY, AND STANDARDIZATION
 PERFORMED BY NOUS INFOSYSTEMS.
 PROBLEM NO.:         1
 "generated by MDL2PharmML v.6.0"
 TOT. NO. OF OBS RECS:     1800
 TOT. NO. OF INDIVIDUALS:    100
 GENERAL NONLINEAR KINETICS MODEL USING LSODA (ADVAN13)
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 #TBLN:      1
 #METH: First Order Conditional Estimation with Interaction
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
 #TERM:
0MINIMIZATION SUCCESSFUL
 NO. OF FUNCTION EVALUATIONS USED:      583
 NO. OF SIG. DIGITS IN FINAL EST.:  3.6

 ETABAR IS THE ARITHMETIC MEAN OF THE ETA-ESTIMATES,
 AND THE P-VALUE IS GIVEN FOR THE NULL HYPOTHESIS THAT THE TRUE MEAN IS 0.

 ETABAR:        -1.1621E-05 -6.9539E-06 -1.4638E-04
 SE:             3.4857E-02  2.0858E-02  2.3115E-02
 N:                     100         100         100

 P VAL.:         9.9973E-01  9.9973E-01  9.9495E-01

 ETAshrink(%):   3.7757E-01  3.7759E-01  3.6907E+00
 EBVshrink(%):   8.7706E-01  8.7709E-01  4.1604E+00
 EPSshrink(%):   5.1309E+00  1.0000E+02

 #TERE:
 Elapsed estimation time in seconds:  2900.85

 ********************               FIRST ORDER CONDITIONAL ESTIMATION WITH INTERACTION              ********************
 #OBJT:**************                       MINIMUM VALUE OF OBJECTIVE FUNCTION                      ********************
 #OBJV:********************************************    10685.238       **************************************************

 ********************               FIRST ORDER CONDITIONAL ESTIMATION WITH INTERACTION              ********************
 ********************                             FINAL PARAMETER ESTIMATE                           ********************

 THETA - VECTOR OF FIXED EFFECTS PARAMETERS   *********
         TH 1      TH 2      TH 3      TH 4      TH 5      TH 6      TH 7      TH 8      TH 9      TH10
         9.94E+00  6.29E+02  7.75E-01  2.98E-01  5.30E+01  2.02E+00  2.56E-01  2.39E-01  1.44E-01  1.86E-01

 OMEGA - COV MATRIX FOR RANDOM EFFECTS - ETAS  ********
            ETA1      ETA2      ETA3
 ETA1
+        1.24E-01
 ETA2
+        7.40E-02  4.43E-02
 ETA3
+        0.00E+00  0.00E+00  5.82E-02

 SIGMA - COV MATRIX FOR RANDOM EFFECTS - EPSILONS  ****
            EPS1      EPS2
 EPS1
+        1.00E+00
 EPS2
+        0.00E+00  1.00E+00

 OMEGA - CORR MATRIX FOR RANDOM EFFECTS - ETAS  *******
            ETA1      ETA2      ETA3
 ETA1
+        3.52E-01
 ETA2
+        1.00E+00  2.10E-01
 ETA3
+        0.00E+00  0.00E+00  2.41E-01

 SIGMA - CORR MATRIX FOR RANDOM EFFECTS - EPSILONS  ***
            EPS1      EPS2
 EPS1
+        1.00E+00
 EPS2
+        0.00E+00  1.00E+00
 #CPUT: Total CPU Time in Seconds,     2912.820
